/*!
 * \file   viscochab.mfront
 * \brief
 *   resolution implicite jabobienne programmée
 * \author jmp
 * \date   15 04 2014
 */
@Parser Implicit;
@Behaviour Viscochab;

//@CompareToNumericalJacobian true;
//@JacobianComparisonCriterium 1.e-4 ;

@Theta 1. ;
@Epsilon 1.e-12;
@IterMax 200 ;
@MaterialProperty real young;
@MaterialProperty real nu;
@MaterialProperty real R_inf;
@MaterialProperty real R_0;
@MaterialProperty real b;
@MaterialProperty real C[2];
@MaterialProperty real g[2];
@MaterialProperty real m;
@MaterialProperty stress UNsurK;
@Includes{
#include"TFEL/Material/Lame.hxx"
}
@StateVariable real    p;
@StateVariable Stensor a[2];
@LocalVariable real lambda;
@LocalVariable real mu;
@InitLocalVars{
  using namespace tfel::material::lame;
  lambda = computeLambda(young,nu);
  mu     = computeMu(young,nu);
}
@ComputeStress{
  sig = lambda*trace(eel)*Stensor::Id()+2*mu*eel;
}
@TangentOperator{
  using namespace tfel::material::lame;
  if((smt==ELASTIC)||(smt==SECANTOPERATOR)){
    computeElasticStiffness<N,Type>::exe(Dt,lambda,mu);
  } else if (smt==CONSISTANTTANGENTOPERATOR){
    StiffnessTensor De;
    Stensor4 Je;
    computeElasticStiffness<N,Type>::exe(De,lambda,mu);
    getPartialJacobianInvert(Je);
    Dt = De*Je;
  } else {
    return false;
  }
}
@Integrator{
  Stensor n(real(0));
  const real eps           = 1.e-12;
    // Les variables suivies de _ sont en t+theta*dt
  const real p_           = p +theta*dp ;
  const real Rp = R_inf + (R_0-R_inf)*exp(-b*p_) ;
    Stensor a_[2];
    // calcul du tenseur Sigma-X
    Stensor scin = deviator(sig);
  for(unsigned short i=0;i!=2;++i){
      a_[i]       = a[i]+theta*da[i];
      scin       -= C[i]*a_[i]/1.5;
  }
  const stress seq = sigmaeq(scin);
  const real F = seq - Rp ;
  real vp=0.;
  real inv_seq = 0. ;
  if(F > 0){
    const real Fexp   = UNsurK*pow(F*UNsurK,m-1) ;
    if(seq>eps*young){
      inv_seq=1./seq ;
      n = 1.5*deviator(scin)*inv_seq;
      vp  = Fexp*F ;
    }
    feel = deel - deto + dp*n ;
    fp   = dp - vp*dt;
    for(unsigned short i=0;i!=2;++i){
      fa[i] = da[i] - dp*(n-g[i]*a_[i]);
    }
    // jacobienne
    const Stensor4 Jmn  = Stensor4::M() - (n^n);
    dfeel_ddeel += 2.*mu*theta*dp*Jmn*inv_seq ;
    dfeel_ddp    = n;    // ajouter termes dn/dp si C fonction de p
    dfp_ddeel    = - Fexp*m*dt* 2.*mu*theta*(n| Stensor4::M() )/1.5;
    dfp_ddp      = 1 + theta* Fexp *m *dt*b*(R_inf-Rp);
    for(unsigned short i=0;i!=2;++i){
       dfeel_dda(i)   = -C[i]*dp*theta* inv_seq/1.5*Jmn ;
       dfp_dda(i)     =  Fexp*m*dt*C[i]*theta/1.5*n;
       dfa_ddeel(i)   = -2.*mu*theta*dp*Jmn *inv_seq;
       dfa_ddp(i)     = -n + g[i]*a_[i];
       dfa_dda(i,i)   =  (1+dp*g[i]*theta)*Stensor4::Id()+C[i]*dp*theta*inv_seq/1.5*Jmn;
    }
    dfa_dda(0,1)   =  C[1]*dp*theta*inv_seq/1.5*Jmn;
    dfa_dda(1,0)   =  C[0]*dp*theta*inv_seq/1.5*Jmn;
  } else {
    // solution elastique
    feel = deel - deto;
  }
}
