@Parser IsotropicMisesCreep;
@Behaviour Norton;
@Author Helfer Thomas;
@Date 23/11/06;

@Coef real A;
@Coef real E;

@FlowRule{
  const real tmp = A*pow(seq,E-1.);
  f       = tmp*seq;
  df_dseq = E*tmp;
}
