@DSL Default;
@Behaviour BehaviourVariableFactory2;

@BehaviourVariableFactory f1 {
  file: "BehaviourVariablePlasticity.mfront",
  variables_suffix: "1",
  external_names_prefix: "FirstPhase",
  shared_external_state_variables: {".+"}
};

@ProvidesTangentOperator;
@Integrator{
  auto b1 = f1.make();
  if (!initialize(b1)) {
    return false;
  }
  b1.eto = eto;
  b1.deto = deto;
  const auto r = b1.integrate(smflag, smt);
  if (!r) {
    return false;
  }
  // updating the stress
  sig = b1.sig;
  if (computeTangentOperator_) {
    Dt = b1.getTangentOperator();
  }
  updateAuxiliaryStateVariables(b1);
}
