@DSL RungeKuttaModel;
@Model ExternalModelCaller4;
@Model "ExternalModel2.mfront" {
  shared_material_properties : {".+"},
  shared_external_state_variables : {".+"}
};

@Algorithm rk54;
@Epsilon 1e-8;

@StateVariable real x2;

@Derivative  {
  dx2 = -x2;
}
