@Behaviour GenerateMTestFileOnFailure;
@Author Helfer Thomas;
@Date 23/11/06;
@Description{
 A very first test
 (the most simple one in fact).
}

// Material properties
@MaterialProperty stress young;
young.setGlossaryName("YoungModulus");
@MaterialProperty real   nu;
nu.setGlossaryName("PoissonRatio");

@StrainMeasure Hencky;

@CastemGenerateMTestFileOnFailure[castem] true;
@AsterGenerateMTestFileOnFailure[aster] true;
@AbaqusGenerateMTestFileOnFailure[abaqus] true;
@CyranoGenerateMTestFileOnFailure[cyrano] true;
@EPXGenerateMTestFileOnFailure[epx] true;

@MaterialProperty real mp[24];
@StateVariable real iv1[13];
@StateVariable real iv2;
@StateVariable Stensor iv3;
@StateVariable Stensor iv4[7];
@AuxiliaryStateVariable real aiv1[13];
@AuxiliaryStateVariable real aiv2;
@AuxiliaryStateVariable Stensor aiv3;
@AuxiliaryStateVariable Stensor aiv4[7];
@ExternalStateVariable real ev1[25];
@ExternalStateVariable real ev12;

// Lame Coefficients
@LocalVariable stress lambda,mu;

@InitLocalVariables{
  lambda = computeLambda(young,nu);
  mu = computeMu(young,nu);
}

@Integrator{
  sig = lambda*trace(eto+deto)*StrainStensor::Id()+2*mu*(eto+deto);
  if(computeTangentOperator_){
    Dt = lambda*Stensor4::IxI()+2*mu*Stensor4::Id();
  }
}
