@Parser    Implicit;
@Behaviour GursonTvergaardNeedlemanViscoPlasticFlow_NumericalJacobian;
@Author    Jeremy Hure;
@Date      10 Février 2014;

@Algorithm NewtonRaphson_NumericalJacobian;
@RequireStiffnessTensor;
@Theta 1;

@Includes{
#include"TFEL/Material/Lame.hxx"
#include"TFEL/Material/GursonTvergaardNeedleman.hxx"
}

/* Paramètres matériau */
@MaterialProperty real young;
young.setGlossaryName("YoungModulus");
@MaterialProperty real nu;
nu.setGlossaryName("PoissonRatio");
@MaterialProperty real rho;
rho.setGlossaryName("MassDensity");
@MaterialProperty real alpha;
alpha.setGlossaryName("ThermalExpansion");

/* Variables d'état
 * p      : déformation plastique cumulée
 * f+f0   : porosité totale
 * T+Temp : température due à l'échauffement adiabatique
 */
@StateVariable real p;
p.setGlossaryName("EquivalentViscoPlasticStrain");
@StateVariable real f;
f.setGlossaryName("Porosity");
@StateVariable real Temp;
Temp.setGlossaryName("LocalTemperature");

/* Paramètres matériau */
// test des différentes façon d'initialiser un paramètre
@Parameter R0{500};
@Parameter Q1(1000000000);
@Parameter b1    = 0.000001;
@Parameter Q2    = 0;
@Parameter b2    = 0;
@Parameter k1    = 1.;
@Parameter n1    = 1.;
@Parameter k2    = 1.;
@Parameter n2    = 1.;
@Parameter f0    = 1.e-3;
@Parameter fc    = 1.e-2;
@Parameter delta = 2;
@Parameter beta  = 0;
@Parameter Cp    = 1;
@Parameter alp   = 1.e-5;
@Parameter q1    = 1.5;
@Parameter q2    = 1.0;

/* Variables utilisées lors de l'intégration */
@LocalVariable real  Fel;
@LocalVariable real  lambda;
@LocalVariable real  mu;

@InitLocalVars{
  using namespace tfel::material::lame;
  /* Calcul des paramètres matériaux */
  lambda = computeLambda(young,nu);
  mu = computeMu(young,nu);
  /* prédicteur élastique */
  const real fstel = max(f + f0,fc + delta*(f + f0 - fc));
  const Stensor s0 = lambda*trace(eel+deto)*Stensor::Id() + 2*mu*(eel + deto);
  const real sel   = computeFlowStressGTN(sigmaeq(s0),trace(s0),fstel,q1,q2);
  const real Rel   = R0 + Q1*(1-exp(-b1*p)) + Q2*(1-exp(-b2*p));
  Fel = sel - Rel;
}

@ComputeStress{
  sig =  lambda*trace(eel)*Stensor::Id() + 2*mu*(eel);
}

@Integrator{
  using tfel::math::stdfunctions::power;
  const Stensor dedt  = alp*dTemp*Stensor::Id();
  if (Fel>0){
    const real pt          = p+theta*dp;
    const real ft          = f + f0 + theta*df;
    const real Rpt         = R0 + Q1*(1-exp(-b1*pt)) + Q2*(1-exp(-b2*pt));
    const real fst         = max(f + f0 + theta*df,fc + delta*(f + f0 + theta*df - fc));
    const real sst         = computeFlowStressGTN(sigmaeq(sig),trace(sig),fst,q1,q2);
    const real F           = sst - Rpt;
    const real sh          = sinh((q2*trace(sig))/(2*sst));
    const real dS_dsst     = (-2*power<2>(sigmaeq(sig)/sst)/sst) - (((q1*q2*fst*trace(sig))/(sst*sst))*sh);
    const Stensor dS_dsig  = (3*deviator(sig)/(sst*sst)) + (((q1*q2*fst)/(sst))*sh)*Stensor::Id();
    const Stensor n        = -dS_dsig/dS_dsst;
    const real P1          = pow(F/k1,n1+1);
    const real P2          = pow(F/k2,n2+1);
    const real FP          = 1./((1./(P1/(F/k1)))+(1./(P2/(F/k2))));
    const Stensor dedt     = alp*theta*dTemp*Stensor::Id();
    feel   = deel + (1 - ft)*dp*n - (deto - dedt);
    fp     = dp - FP*dt;
    ff     = df - (1 - ft)*(1 - ft)*dp*(n|Stensor::Id());
    fTemp  = dTemp - (beta/Cp)*dp*sst;
  } else {
    feel = deel - (deto - dedt);
  }
}

@TangentOperator{
  using namespace tfel::material::lame;
  if((smt==ELASTIC)||(smt==SECANTOPERATOR)){
    computeElasticStiffness<N,Type>::exe(Dt,lambda,mu);
  } else if (smt==CONSISTANTTANGENTOPERATOR){
    StiffnessTensor De;
    Stensor4 Je;
    computeElasticStiffness<N,Type>::exe(De,lambda,mu);
    getPartialJacobianInvert(Je);
    Dt = De*Je;
  } else {
    return false;
  }
}
