@DSL Implicit{parameters_as_static_variables : true};
@Behaviour ImplicitElasticityParametersAsStaticVariables;
@Author Thomas Helfer;
@Date 23 / 11 / 06;

@Epsilon 1.e-14;
@Theta 1;

@Brick StandardElasticity;

// defining a source just to generate a source file. Otherwise, this would lead
// to an error because the `mfront_behaviour_check_library` function used by
// TFEL' cmake infrastructure does not support when no sources are generated
@Sources {
  [[maybe_unused]] static void f(){}
}
