@DSL MultipleIsotropicMisesFlows;
@Behaviour MultipleFlows3;
@Author Helfer Thomas;
@Date 31 / 01 / 25;

@Epsilon 1e-15;
@UseQt true;
@Theta 1;

@IsotropicHardeningRules{
  flow_id : 0,
  isotropic_hardening : "Voce" {R0 : 125e6, Rinf : 500e6, b : 20},
  isotropic_hardening : "Linear" {R0 : 50e6}
};

@FlowRule Plasticity {
  f = seq - R;
  df_dseq = 1;
  df_dp = -dR_dp;
}
