@DSL IsotropicPlasticMisesFlow;
@Behaviour Plasticity1;
@Author Helfer Thomas;
@Date 31 / 01 / 25;

@Epsilon 1e-15;
@UseQt true;

@IsotropicHardeningRules{
  isotropic_hardening : "Voce" {R0 : 125e6, Rinf : 500e6, b : 20}
};

@FlowRule {
  f = seq - R;
  df_dseq = 1;
  df_dp = -dR_dp;
}
