@DSL IsotropicPlasticMisesFlow;
@Behaviour Plasticity3;
@Author Helfer Thomas;
@Date 23 / 11 / 06;

@Epsilon 1e-15;
@UseQt true;

@IsotropicHardeningRules{
  isotropic_hardening : "Voce" {R0 : 125e6, Rinf : 500e6, b : 20},
  isotropic_hardening : "Linear" {R0 : 25e6}
};
