@DSL IsotropicPlasticMisesFlow;
@Behaviour Plasticity4;
@Author Helfer Thomas;
@Date 31 / 01 / 23;

@Epsilon 1e-15;
@UseQt true;

@IsotropicHardeningRule "Voce" {R0 : 125e6, Rinf : 500e6, b : 20};

@FlowRule {
  f = seq - R;
  df_dseq = 1;
  df_dp = -dR_dp;
}
