@Behaviour LogarithmicStrainElasticity2;
@Author Helfer Thomas;
@Date   24/02/14;
@Description{
 "A very first test of the logarithmic finite strain"
 "formulation proposed by Miehe et al."
 "(the most simple one in fact)."
 "We check that the stress at the beginning"
 "of the time step (which is calculated using"
 "the Cauchy stress) is equal to the stress "
 "computed at the end of the previous time step "
 "(before it was turned into the Cauchy stress "
 "after the integration."
}

@UMATFiniteStrainStrategy[umat] MieheApelLambrechtLogarithmicStrain;

@UseQt true;
@ProvidesSymmetricTangentOperator;

@MaterialProperty stress young;
young.setGlossaryName("YoungModulus");
@MaterialProperty real nu;
nu.setGlossaryName("PoissonRatio");
@MaterialProperty real rho;
rho.setGlossaryName("MassDensity");
@MaterialProperty real alpha;
alpha.setGlossaryName("ThermalExpansion");

@LocalVariable stress lambda;
@LocalVariable stress mu;

@AuxiliaryStateVariable StressStensor ps;
ps.setGlossaryName("PreviousStress");

@Includes{
#include"TFEL/Material/Lame.hxx"
}

@InitLocalVars{
  using namespace tfel::material::lame;
  lambda = computeLambda(young,nu);
  mu = computeMu(young,nu);
  if(sqrt((sig-ps)|(sig-ps))>10*young*numeric_limits<stress>::epsilon()){
    string msg("invalid stress value at the beginning "
	       "of the time step");
    throw(runtime_error(msg));
  }
}

@Integrator{
  sig = lambda*trace(eto+deto)*StrainStensor::Id()+2*mu*(eto+deto);
  if(computeTangentOperator_){
    Dt = lambda*Stensor4::IxI()+2*mu*Stensor4::Id();
  }
  // saving the compute stress
  ps=sig;
}
