@Parser    DefaultParser;
@Behaviour OrthotropicElastic;
@Author    Helfer Thomas;
@Date      10/03/11;

@ModellingHypotheses {".+"};

@OrthotropicBehaviour;
@RequireStiffnessTensor<Altered>;
@ProvidesSymmetricTangentOperator;

@PredictionOperator{
  if(!((smt==ELASTIC)||(smt==SECANTOPERATOR)||(smt==TANGENTOPERATOR))){
    return FAILURE;
  }
  Dt=D;
}

@Integrator{
  sig = D*(eto+deto);
  if(computeTangentOperator_){
    Dt = D;
  }
}
