@DSL DefaultDSL;
@Behaviour OrthotropicElastic8;
@Author    Helfer Thomas;
@Date      10/03/11;

@OrthotropicBehaviour<Pipe>;
@RequireStiffnessTensor;
@ProvidesSymmetricTangentOperator;

@ComputeThermalExpansion{
  thermal_expansion1 : "ThermalExpansionCoefficientTest_1.mfront",
  thermal_expansion2 : "ThermalExpansionCoefficientTest_2.mfront",
  thermal_expansion3 : "ThermalExpansionCoefficientTest_3.mfront",
  save_thermal_expansion : true
};

@PredictionOperator{
  if(!((smt==ELASTIC)||(smt==SECANTOPERATOR)||(smt==TANGENTOPERATOR))){
    return FAILURE;
  }
  Dt=D;
}

@Integrator{
  sig = D*(eto+deto);
  if(computeTangentOperator_){
    Dt = D;
  }
}
