@Behaviour OrthotropicSwelling;
@Author Helfer Thomas;
@Date   06/08/16;
@Description{
 A test for the `@Swelling` keyword
}

@OrthotropicBehaviour<Pipe>;
@RequireStiffnessTensor<Altered>;

@ExternalStateVariable real s[3];
s.setEntryName("OrthotropicSwelling");
@Swelling<Orthotropic> s;

@ProvidesSymmetricTangentOperator;
@Integrator{
  sig = D*(eto+deto);
  if(computeTangentOperator_){
    static_cast<void>(smt);
    Dt = D;
  }
}
