@DSL DefaultModel{
  compatibility_mode : "5.2.0",
  automatic_declaration_of_the_temperature_as_first_external_state_variable :
      false
};
@Model PhysicalConstants_v5_2_0;
@Author Thomas Helfer;
@Date 9/11/2026;

@AuxiliaryStateVariable real x;

@Integrator {
  x = PhysicalConstants::StefanBoltzmannConstant;
}
