@DSL IsotropicPlasticMisesFlow{use_stress_update_algorithm : true};
@Behaviour Plasticity8;
@Author Thomas Helfer;
@Date 15 / 02 / 2025;

@Epsilon 1e-15;
@UseQt true;

@Parameter temperature Ta = 2e3;
@Parameter stress s0 = 1e9;
s0.setGlossaryName("YieldStrength");

// the Poisson ratio depends formally on the temperature, so that it is
// evaluated at the beginning of the time step by the stress update
// algorithm, but is constant: the results are the ones of Plasticity6
@ElasticMaterialProperties{"150e9*(1-T/Ta)", "0.3+0*T/Ta"};

@FlowRule {
  f = seq - s0;
  df_dseq = 1;
  df_dp = stress{};
}
