@DSL IsotropicPlasticMisesFlow{
  automatic_declaration_of_the_temperature_as_first_external_state_variable : false
};

@Behaviour PlasticityWithoutAutomaticTemperatureDeclaration;
@Author Helfer Thomas;
@Date 17 / 01 / 2022;

@UseQt true;
@Epsilon 1.e-14;

@MaterialProperty stress H;
@MaterialProperty stress s0;

@FlowRule {
  f = seq - H * p - s0;
  df_dseq = 1;
  df_dp = -H;
}
