@Parser RungeKutta;
@Algorithm rk54;
@Behaviour PolyCristals;
@OrthotropicBehaviour;
@RequireStiffnessTensor;

@Epsilon 1.e-6 ;

@MaterialProperty real m;
@MaterialProperty real K;
@MaterialProperty real C;
@MaterialProperty real R0;
@MaterialProperty real Q;
@MaterialProperty real b;
@MaterialProperty real H;
@MaterialProperty real d1;
@MaterialProperty real Mu;
@StateVariable StrainStensor    epsp;
@StateVariable StrainStensor    epsg[30];

// comment declarer 12*ng ?
@StateVariable strain           g[360];
@StateVariable strain           a[360];
@StateVariable strain           p[360];
@AuxiliaryStateVariable real    pg;

@Includes{
#include"TFEL/Material/PolyCristalsSlidingSystems.hxx"
#include"TFEL/Material/MetallicCFCSlidingSystems.hxx"
#include"TFEL/Material/MetallicCFCGenericSlidingSystemsInteractionMatrix.hxx"
}

@Members{
  // Mono cristal  sliding system
  typedef MetallicCFCSlidingSystems<real> MCSlidingSystems;
  // number of sliding systems
  static const unsigned short Nss = MCSlidingSystems::Nss;
  // number of phases (grains)
  static const unsigned short Np  = 30;
  // Poly cristals sliding system
  typedef PolyCristalsSlidingSystems<Np,MCSlidingSystems,real> PCSlidingSystems;
  // Interaction matrix
  typedef MetallicCFCGenericSlidingSystemsInteractionMatrix<real> InteractionMatrix;
}

//! fraction volumique
@LocalVariable real  fv[30];
//! interaction matrix
@LocalVariable tfel::math::tmatrix<12,12,real> mh;

@InitLocalVariables{
  // fractions volumiques
  for(unsigned short i=0;i!=Np;++i){
    fv[i]=1.0/static_cast<real>(Np) ;
  }
  // matrice d'interaction
  const real h1 = 1.;
  const real h2 = 1.;
  const real h3 = 1.;
  const real h4 = 1.;
  const real h5 = 1.;
  const real h6 = 1.;
  mh = InteractionMatrix::getInteractionMatrix(h1,h2,h3,
					       h4,h5,h6);
}

@ComputeStress{
  sig = D*eel;
}

@Derivative{
  const PCSlidingSystems& gs =
    PCSlidingSystems::getPolyCristalsSlidingSystems("PolyCristalsAngles.txt");
  StressStensor sigg(real(0)) ;
  depsp=Stensor(real(0)) ;
  // boucle sur le nombre de phases (ou grains)
  real pe[12] ;
  for(unsigned short k=0;k!=Np;++k){
    // localisation BZ
    real seq=sigmaeq(sig);
    if (seq>0){
      real alph=1./(1.0+1.5*Mu*pg/seq) ;
      sigg=sig+Mu*alph*(epsp-epsg[k]);
    }
    for(unsigned short i=0;i!=Nss;++i){
      pe[i] = Q*(1.-exp(-b*p[Nss*k+i])) ;
    }
    depsg[k]=Stensor(real(0)) ;
    for(unsigned short i=0;i!=Nss;++i){
      real Rp = R0 ;
      for(unsigned short j=0;j!=Nss;++j){
	Rp +=mh(i,j)*pe[j] ;
      }
      // tenseurs mus de chaque grain / systeme dans le repere global
      StrainStensor mu_ki(gs.mus[k][i].begin());
      real tau = mu_ki | sigg ;
      real tma = tau-C*a[Nss*k+i] ;
      real tmR = abs(tma)-Rp ;
      if(tmR > 1.e5){return false;}
      if (tmR>0.){
	real sgn=tma/abs(tma);
	dg[Nss*k+i]  = sgn*pow((tmR/K),m);
      }
      else{
	dg[Nss*k+i]=0.;
      }
      dp[Nss*k+i]  = abs(dg[Nss*k+i]);
      da[Nss*k+i]  = dg[Nss*k+i]-d1*a[Nss*k+i]*abs(dg[Nss*k+i]);
      depsg[k]+=dg[Nss*k+i]*mu_ki ;
    }
    depsp+=depsg[k]*fv[k] ;
  }
  deel = -depsp+deto;
}

@UpdateAuxiliaryStateVars{
  static const real INV_SQRT_3_2 = real(1)/sqrt(real(3)/real(2));
  pg+=dt_*sqrt(depsp|depsp)*INV_SQRT_3_2;
}
