@DSL Implicit;
@Behaviour IsotropicStandardElasticity10;
@Algorithm NewtonRaphson_NumericalJacobian;
@Author Thomas Helfer;
@Date   5/06/2016;
@Description{
  "This file is used to test the StandardElasticity brick for "
  "an isotropic behaviour. Here we use a computed "
  "stiffness tensor."
}

@Epsilon 1e-14;
@PerturbationValueForNumericalJacobianComputation 1.e-8;
@ModellingHypotheses {".+"};
@Brick "StandardElasticity";
@ComputeStiffnessTensor<UnAltered> {"YoungModulusTest.mfront",0.3};
