@DSL Implicit;
@Behaviour IsotropicStandardElasticity3;
@Author Thomas Helfer;
@Date   5/06/2016;
@Description{
  "This file is used to test the StandardElasticity brick for "
  "an isotropic behaviour. Elastic properties are defined through "
  "elastic material properties."
}

@Epsilon 1e-14;
@ModellingHypotheses {".+"};
@Brick "StandardElasticity";
@ElasticMaterialProperties {78e9,0.3};
