@DSL Implicit;
@Behaviour OrthotropicStandardElasticity3;
@Author Thomas Helfer;
@Date   5/06/2016;
@Description{
  "This file is used to test the StandardElasticity brick for "
  "an isotropic behaviour. Elastic properties are defined through "
  "parameters."
}

@OrthotropicBehaviour;
@Epsilon 1e-14;
@ModellingHypotheses {".+"};
@Brick "StandardElasticity";

@RequireStiffnessTensor;
