@DSL Implicit;
@Behaviour RousselierTanguyBesson2002_qt;
@Author Tristan Chenaille;
@Date 03 / 11 / 2026;
@UseQt true;
@Description {
  The Rousselier-Tanguy-Besson 2002 criterion with quantities.
}

@ModellingHypotheses{".+"};
@Algorithm NewtonRaphson;
@Epsilon 1.e-14;
@Theta 1;

@Brick StandardElastoViscoPlasticity{
  stress_potential : "Hooke" {young_modulus : 200e3, poisson_ratio : 0.3},
  inelastic_flow : "Plastic" {
    criterion : "RousselierTanguyBesson2002" {
      qR : 0.89,
      DR : 2.2
    },
    isotropic_hardening : "Linear" {R0 : 200.}
  },
  porosity_evolution : {
    safety_factor_for_the_upper_bound_of_the_porosity : 0.95,
    safety_factor_for_the_upper_bound_of_the_porosity_for_fracture_detection : 0.94
  }
};
