@DSL Implicit;
@Behaviour Test13;
@Author Thomas Helfer;

@Epsilon 1e-14;
@Theta 1;

@ModellingHypotheses {".+"};

@Brick StandardElastoViscoPlasticity{
  stress_potential : Hooke{young_modulus : 150e9, poisson_ratio : 0.3},
  inelastic_flow : "Plastic" {
    criterion : "Mises",
    isotropic_hardening : "Linear" {R0 : 33e6, H : 438e6},
    save_yield_surface_radius : true
  }
};
