@DSL Implicit;
@Behaviour Test7;
@Author Thomas Helfer;
@Date 26 / 03 / 2018;
@Description {
  "This behaviour defines an isotropic elastic material behaviour."
  "\note The elastic material properties will be given by user defined "
  "material properties."
}

@ModellingHypotheses {".+"};

@Brick StandardElastoViscoPlasticity{
  stress_potential : Hooke{
    young_modulus : 150e9,
    poisson_ratio : 0.3,
    thermal_expansion : 1e-5,
    save_thermal_expansion : true
  }
};
