@Author Jamel Tirari;
@Date   13/03/2018;
@Description{implicit

};

@MaximumNumberOfSubSteps 1;
@XMLOutputFile @xml_output@;
@Behaviour<castem> @library@ @behaviour@;

@MaterialProperty<constant> 'YoungModulus' 160e9;
@MaterialProperty<constant> 'PoissonRatio' 0.3;

@ExternalStateVariable 'Temperature' 293.15;

@ImposedStress 'SXX' {0:0,0.3:1.3e8,0.6:-1.33e8,1:1.38e8};

@Test<file> @reference_file@ 'EXX' 2 4e-13;
@Test<file> @reference_file@ 'SXX' 8 1e-3;
@Test<file> @reference_file@ 'EquivalentViscoplasticStrain' 20 1e-12;

@Times {0,1 in 1000};
