@Author Jamel Tirari;
@Date   13/03/2018;
@Description{implicit

};

@XMLOutputFile @xml_output@;
@MaximumNumberOfSubSteps 1;
@Behaviour<castem> @library@ @behaviour@;

@MaterialProperty<constant> 'YoungModulus' 160e9;
@MaterialProperty<constant> 'PoissonRatio' 0.3;

@ExternalStateVariable 'Temperature' 293.15;

@ImposedStrain 'EXX' {0:0,0.3:1.14e-2,0.6:-1.14e-2,1:3e-2};

@Test<file> @reference_file@ 'EXX' 2 1.e-14;
@Test<file> @reference_file@ 'SXX' 8 1.e-3;
@Test<file> @reference_file@ 'EquivalentViscoplasticStrain' 20 1.e-14;

@Times {0,1 in 100};
