@Author Jamel Tirari;
@Date   13/03/2018;
@Description{implicit

};

@XMLOutputFile @xml_output@;
@MaximumNumberOfSubSteps 1;
@Behaviour<castem> @library@ @behaviour@;

@MaterialProperty<constant> 'YoungModulus' 160e9;
@MaterialProperty<constant> 'PoissonRatio' 0.3;

@ExternalStateVariable 'Temperature' 293.15;

@ImposedStress 'SXX' {0:0,0.3:1.42e8,0.6:-1.42e8,1:1.448e8};

@Test<file> @reference_file@ 'EXX' 2 1.e-10;
@Test<file> @reference_file@ 'SXX' 8 1.e-2;
@Test<file> @reference_file@ 'EquivalentPlasticStrain' 20 1.e-10;

@Times {0,1 in 500};
