@Author HELFER Thomas 202608;
@Date   12/05/2018;
@Description{

};

@XMLOutputFile @xml_output@;
@MaximumNumberOfSubSteps 1;
@Behaviour<castem> @library@ @behaviour@;

@MaterialProperty<constant> 'YoungModulus' 1.5e+11;
@MaterialProperty<constant> 'PoissonRatio' 0.3;

@ExternalStateVariable 'Temperature' 293.15 ;

@ImposedStrain 'EXX' {0:0,1:1.e-2};

@Times {0,1 in 10};
