@Author HELFER Thomas 202608;
@Date   13/02/2020;

@XMLOutputFile @xml_output@;
@MaximumNumberOfSubSteps 1;
@Behaviour<castem> @library@ @behaviour@;

@MaterialProperty<constant> 'YoungModulus' 160e9;
@MaterialProperty<constant> 'PoissonRatio' 0.3;

@ExternalStateVariable 'Temperature' 293.15 ;

@ImposedStrain 'EXX' {0:0,1:1.e-2};

@Times {0,1 in 10};

@Test<file> @reference_file@ 'SXX' 8 5e-2;
