@Author Thomas Helfer;
@Date   06/04/2018;
@Description{

};

@XMLOutputFile @xml_output@;
@MaximumNumberOfSubSteps 1;
@Behaviour<castem> @library@ @behaviour@;

@MaterialProperty<constant> 'YoungModulus' 150e9;
@MaterialProperty<constant> 'PoissonRatio' 0.3;

@ExternalStateVariable 'Temperature' 293.15 ;

@ImposedStrain 'EXX' {0:0,1:0.3};
@Times {0,1 in 10};

@Real 'R0' 33e6;
@Real 'Rinf' 137e6;
@Real 'b' 88;

@Test<file> @reference_file@ {'EquivalentPlasticStrain' : 20} 1.e-12;
@Test<function> {
  'SYY' : '0', 'SZZ' : '0'
}
1.e-2;
