@MaximumNumberOfSubSteps 1;
@XMLOutputFile @xml_output@;
@Behaviour<generic> @library@ 'Test9';

@ExternalStateVariable 'Temperature' 293.15 ;

@ImposedStrain 'EXX' {0 : 0, 1 : 1e-2};
@Times{0, 1. in 100};

@Real 'E' 150e9;
@Real 'R0' '33e6';
@Real 'Hy' '438e6';

@Evolution<
    function> 'EquivalentStressValue' 'EXX < (R0 / E) ? E * EXX : Hy * E / (2 * E + Hy) * EXX + 2 * E * R0 / (2 * E + Hy)';

@Test<function> 'EquivalentStress0' 'EquivalentStressValue'  1e-3;
@Test<function> 'EquivalentStress1' 'EquivalentStressValue'  1e-3;
