@DSL Default;
@Behaviour UnilateralMazars;
@Author François Hamon;
@Date 26 / 05 / 2015;
@Description {
  "An unilateral version of the Mazars model"
  "based on the following paper:"

  "A new 3D damage model for concrete"
  "under monotonic, cyclic and dynamic"
  "loadings."

  "Jacky Mazars, François Hamon and Stéphane Grange"

  "Materials and Structures ISSN 1359-5997"
  "DOI 10.1617/s11527-014-0439-8"
}

@MaterialProperty stress young;
young.setGlossaryName("YoungModulus");
@MaterialProperty real nu;
nu.setGlossaryName("PoissonRatio");

@MaterialProperty real At;
@MaterialProperty real Bt;
@MaterialProperty real Ac;
@MaterialProperty real Bc;
@MaterialProperty real st_max;
@MaterialProperty real sc_max;
@MaterialProperty real k;
@StateVariable real Yt;
@StateVariable real Yc;
@StateVariable real d;
@StateVariable real Yt0;
@StateVariable real Yc0;
@StateVariable real Tmax;

@LocalVariable stress lambda, mu;

@InitLocalVariables {
  lambda = computeLambda(young, nu);
  mu = computeMu(young, nu);
}
@ProvidesSymmetricTangentOperator;
@Integrator {
  constexpr auto id = Stensor::Id();
  constexpr real dmax = 0.99999;
  constexpr auto eeps = real(1.e-12);
  const auto seps = eeps * young;
  const real limint = st_max / young;
  const real liminc = abs(sc_max / young);
  //
  const auto e = eval(eto + deto);
  const strain tr = trace(e);
  const auto [e1, e2, e3] = e.computeEigenValues();
  // eigen values of s0
  const stress s1 = 2 * mu * e1 + lambda * tr;
  const stress s2 = 2 * mu * e2 + lambda * tr;
  const stress s3 = 2 * mu * e3 + lambda * tr;
  const stress sn = max(abs(s1), max(abs(s2), abs(s3)));
  const stress pps1 = max(stress(0), s1);
  const stress pps2 = max(stress(0), s2);
  const stress pps3 = max(stress(0), s3);
  const stress r =
      (sn > seps)
          ? min((pps1 + pps2 + pps3) / (abs(s1) + abs(s2) + abs(s3)), real(1))
          : 0;
  const auto Inv1 = e1 + e2 + e3;
  const auto Inv2 =
      ((e1 - e2) * (e1 - e2) + (e2 - e3) * (e2 - e3) + (e3 - e1) * (e3 - e1)) /
      2;
  auto EPTM = max(Yt0, limint);
  const real ept = Inv1 / (2 * (1 - 2 * nu)) + sqrt(Inv2) / (2 * (1 + nu));
  if ((ept > EPTM) && (r > 0) && (d < dmax)) {
    EPTM = ept;
  }
  auto EPCM = max(Yc0, liminc);
  const real epc = (6 * sqrt(Inv2) / (1 + nu) + Inv1 / (1 - 2 * nu)) / 5;
  Yt = max(Yt, EPTM);
  if ((epc > EPCM) && (r < 1) && (d < dmax)) {
    EPCM = epc;
  }
  Yc = max(Yc, EPCM);
  const auto A = At * (2 * r * r * (1 - 2 * k) - r * (1 - 4 * k)) +
           Ac * (2 * r * r - 3 * r + 1);
  const auto B =
      pow(r, power<2>(r - 1) + 1) * Bt + (1 - pow(r, power<2>(r - 1) + 1)) * Bc;
  const real Y0 = r * limint + (1 - r) * liminc;
  const real Y = r * EPTM + (1 - r) * EPCM;
  const real dmu = (Y < Y0) ? 0 : 1 - (1 - A) * Y0 / Y - A * exp(-B * (Y - Y0));
  d = min(max(real(0), dmu), dmax);
  Yt0 = EPTM;
  Yc0 = EPCM;
  // stresses at the end
  sig = (1 - d) * (lambda * trace(e) * id + 2 * mu * e);
  // auxiliary task
  Tmax = max(Tmax, T);
  if (computeTangentOperator_) {
    StiffnessTensor Hooke;
    computeAlteredElasticStiffness<hypothesis, Type>::exe(Hooke, lambda, mu);
    if ((smt == ELASTIC) || (smt == TANGENTOPERATOR)) {
      Dt = Hooke;
    } else if (smt == SECANTOPERATOR) {
      Dt = (1 - d) * Hooke;
    } else {
      return FAILURE;
    }
  }
}
