/*!
 * \file    castemfiniterotationsmallstrainelasticity2-shear-2-2D.mtest
 * \brief
 * \author Helfer Thomas
 * \brief  26 nov. 2013
 */

@ModellingHypothesis 'Axisymmetrical';
@AccelerationAlgorithm 'Cast3M';
@Behaviour<abaqus_explicit> @library@ 'FINITEROTATIONSMALLSTRAINELASTICITY2_AXIS';
@MaterialProperty<constant> 'MassDensity'  15000.;
@MaterialProperty<constant> 'YoungModulus'     215.e9;
@MaterialProperty<constant> 'PoissonRatio'       0.3;

@ImposedDrivingVariable 'FRR' 1.;
@ImposedDrivingVariable 'FTT' 1.;
@ImposedDrivingVariable 'FZZ' 1.;
@ImposedDrivingVariable 'FRZ' 0.;
@ImposedDrivingVariable 'FZR' {0:0.,1.:0.2};

@ExternalStateVariable 'Temperature' 293.15;

@Times {0.,1 in 10};

@Real 'lambda' 'PoissonRatio*YoungModulus/((1+PoissonRatio)*(1-2*PoissonRatio))';
@Real 'mu'     'YoungModulus/(2*(1+PoissonRatio))';
@Test<function> {'SRR':'((2*mu+lambda)*FZR**2)/2'} 1.e-2;
@Test<function> {'STT':'((2*mu+lambda)*FZR**4+(4*mu+lambda)*FZR**2)/2'} 1.e-2;
@Test<function> {'SZZ':'(lambda*FZR**2)/2 '} 1.e-2;
@Test<function> {'SRZ':'sqrt(2)*((2*mu+lambda)*FZR**3+2*mu*FZR)/2'} 1.e-2;
