/*!
 * \file    castemfiniterotationsmallstrainelasticity2-uniaxialloading-2-2D.mtest
 * \brief
 * \author Helfer Thomas
 * \brief  26 nov. 2013
 */

@ModellingHypothesis 'Axisymmetrical';
@AccelerationAlgorithm 'Cast3M';
@Behaviour<abaqus_explicit> @library@ 'FINITEROTATIONSMALLSTRAINELASTICITY2_AXIS';
@MaterialProperty<constant> 'MassDensity'  15000.;
@MaterialProperty<constant> 'YoungModulus'     215.e9;
@MaterialProperty<constant> 'PoissonRatio'       0.3;

@ImposedDrivingVariable 'FRR' {0:1.,1.:1.2};
@ImposedDrivingVariable 'FTT' 1.;
@ImposedDrivingVariable 'FZZ' 1.;
@ImposedDrivingVariable 'FRZ' 0.;
@ImposedDrivingVariable 'FZR' 0.;

@ExternalStateVariable 'Temperature' 293.15;

@Times {0.,1 in 10};

@Real 'lambda' 'PoissonRatio*YoungModulus/((1+PoissonRatio)*(1-2*PoissonRatio))';
@Real 'mu'     'YoungModulus/(2*(1+PoissonRatio))';
@Test<function> {'SRR':'FRR*(lambda+2*mu)*(FRR**2-1)/2'} 1.e-2;
@Test<function> {'STT':'lambda*(FRR**2-1)/(2*FRR)'}      1.e-2;
@Test<function> {'SZZ':'lambda*(FRR**2-1)/(2*FRR)'}      1.e-2;
@Test<function> {'SRZ':'0'}          1.e-2;
