@Author Helfer Thomas;
@Date  22/09/2016;

@UseCastemAccelerationAlgorithm true;
@MaximumNumberOfSubSteps 1;
@ModellingHypothesis 'Axisymmetrical';

@Behaviour<abaqus_explicit> @library@ 'IMPLICITSIMOMIEHEELASTOPLASTICITY_AXIS';
@MaterialProperty<constant> 'YoungModulus'     200.e9;
@MaterialProperty<constant> 'PoissonRatio'       0.3;
@MaterialProperty<constant> 'ThermalExpansion'   0.;
@MaterialProperty<constant> 'MassDensity'        0.;
@MaterialProperty<constant> 's_y' 200e6;
@MaterialProperty<constant> 'ET'  20e9;


@ImposedDeformationGradient 'FRR' {0:1.,3600.:1.7};
@ImposedDeformationGradient 'FRZ' 0.;
@ImposedDeformationGradient 'FZR' 0.;

// Initial value of the elastic strain
@InternalStateVariable 'be' {1.,1.,1.,0.};

@ExternalStateVariable 'Temperature' 293.15;

@Times {0.,3600 in 20};

@Test<file> '@top_srcdir@/mfront/tests/behaviours/references/implicitsimomieheelastoplasticity.ref' {'FZZ':3} 1.e-6 ;
@Test<file> '@top_srcdir@/mfront/tests/behaviours/references/implicitsimomieheelastoplasticity.ref' {'FTT':4} 1.e-6 ;
@Test<function> 'FRZ' '0.' 1.e-8 ;
@Test<function> 'FZR' '0.' 1.e-8 ;
@Test<file> '@top_srcdir@/mfront/tests/behaviours/references/implicitsimomieheelastoplasticity.ref' {'SRR':7} 1.e5 ;
@Test<function> 'SZZ' '0.' 1.e5;
@Test<function> 'STT' '0.' 1.e5;
@Test<function> 'SRZ' '0.' 1.e5;
@Test<file> '@top_srcdir@/mfront/tests/behaviours/references/implicitsimomieheelastoplasticity.ref' {'EquivalentPlasticStrain':11} 1.e-6 ;
