/*!
 * \file   abaqus_explicitmieheapellambrechtlogarithmicstrainnorton-uniaxialloading-1-2D.mtest
 * \brief
 * \author Helfer Thomas
 * \brief  4 dec. 2013
 */

@ModellingHypothesis 'Axisymmetrical';
@UseCastemAccelerationAlgorithm true;
@MaximumNumberOfSubSteps 1;

@Behaviour<abaqus_explicit> @library@ 'LOGARITHMICSTRAINNORTONCREEP_AXIS';
@DrivingVariableEpsilon 1.e-10;
@StressEpsilon          2.e3;

@MaterialProperty<constant> 'MassDensity'  15000.;
@MaterialProperty<constant> 'YoungModulus'      80.e9;
@MaterialProperty<constant> 'PoissonRatio'       0.35;
@MaterialProperty<constant> 'A'   '0.003944e-6**4.39';
@MaterialProperty<constant> 'E'   4.39;

@ImposedDrivingVariable 'FRR' {0:1.,1.:4.5};
@ImposedDrivingVariable 'FRZ' 0.;
@ImposedDrivingVariable 'FZR' 0.;

@ExternalStateVariable 'Temperature' 293.15;

@Times {0.,1 in 500};

@Test<file> '@top_srcdir@/mfront/tests/behaviours/references/logarithmicstrainnortoncreepuniaxialtesting.ref' {'FRR':2,'FTT':3,'FZZ':3} 1e-5;
@Test<file> '@top_srcdir@/mfront/tests/behaviours/references/logarithmicstrainnortoncreepuniaxialtesting.ref' {'SRR':4} 1.3e3;
// @Test<file> '@top_srcdir@/mfront/tests/behaviours/references/logarithmicstrainnortoncreepuniaxialtesting.ref' {'EquivalentViscoplasticStrain':5} 1e-4;
@Test<function> {'SZZ':'0','STT':'0','SRZ':'0'} 1.e3;
@Test<function> {'FRZ': '0', 'FZR':'0'} 1.e-10;
