@Author T. Helfer;
@Date 15/09/2015;
@Description{
  "This test describes an uniaxial loading "
  "by imposing the deformation gradient in "
  "one direction. "
  "The perpendicular directions are "
  "stress-free. The shear components of the "
  "deformation gradient are set to zero. "
  "The results are compared to analytical solutions."
};

@AccelerationAlgorithm 'Cast3M';
@Behaviour<abaqus_explicit> @library@ 'SAINTVENANTKIRCHHOFFELASTICITY_3D';
@MaterialProperty<constant> 'MassDensity'  15000.;
@MaterialProperty<constant> 'YoungModulus'     215.e9;
@MaterialProperty<constant> 'PoissonRatio'       0.3;

@ImposedDrivingVariable 'FXX' {0:1.,1.:1.2};

@ImposedDrivingVariable 'FXY' 0.;
@ImposedDrivingVariable 'FYX' 0.;
@ImposedDrivingVariable 'FXZ' 0.;
@ImposedDrivingVariable 'FZX' 0.;
@ImposedDrivingVariable 'FYZ' 0.;
@ImposedDrivingVariable 'FZY' 0.;

@ExternalStateVariable 'Temperature' 293.15;

@Times {0.,1 in 10};

@Test<function> {'SXX':'YoungModulus*(FXX**2-1)*FXX/(2*(1-PoissonRatio*(FXX**2-1)))'} 1.e-2;
@Test<function> {'SXY':'0'} 1.e-2;
@Test<function> {'SXZ':'0'} 1.e-2;
@Test<function> {'SYZ':'0'} 1.e-2;

@Test<function> {'FYY':'sqrt(1-PoissonRatio*(FXX**2-1))'} 1.e-8;
@Test<function> {'FZZ':'sqrt(1-PoissonRatio*(FXX**2-1))'} 1.e-8;
