@Author Thomas Helfer;
@Date   19/11/2021;
@Description{
  Test support of tensorial external state variables.
};

@MaximumNumberOfSubSteps 1;
@ModellingHypothesis 'Tridimensional';
@Behaviour<abaqus_explicit> @library@ 'TENSORIALEXTERNALSTATEVARIABLETEST_3D';

// material properties
@MaterialProperty<constant> 'YoungModulus' 150e9;
@MaterialProperty<constant> 'PoissonRatio' 0.3;
@MaterialProperty<constant> 'MassDensity' 0;

@InternalStateVariable 'v_isv' {2, 0, 4};
@InternalStateVariable 'v2_isv[0]' {3, 4, 0};
@InternalStateVariable 'v2_isv[1]' {0, 2, 0};
@InternalStateVariable 's_isv' {0, 1, 2, 0, 4, 0};
@InternalStateVariable 's2_isv[0]' {0, 2, 0, 3, 4, 0};
@InternalStateVariable 's2_isv[1]' {0, 2, 0, 3, 4, 0};
@InternalStateVariable 't_isv' {0, 1, 2, 0, 6, 4, 7, 0, 8};
@InternalStateVariable 't2_isv[0]' {0, 2, 0, 3, 6, 4, 7, 0, 8};
@InternalStateVariable 't2_isv[1]' {0, 2, 0, 3, 8, 4, 7, 0, 12};

// External state variable
@ExternalStateVariable 'Temperature' 293.15;
// Vectorial external state variables
@ExternalStateVariable<function> 'v_esv' {'2', '3 * t', '4'};
@ExternalStateVariable<function> 'v2_esv[0]X'  '3';
@ExternalStateVariable<function> 'v2_esv[0]Y'  '4';
@ExternalStateVariable<function> 'v2_esv[0]Z'  '5*t';
@ExternalStateVariable<function> 'v2_esv[1]' {'5*t', '2', '3 * t'};
// Symmetric tensors external state variables
@ExternalStateVariable<function> 's_esv' {'0', '1', '2', '3 * t', '4', '5 * t'};
@ExternalStateVariable<function> 's2_esv[0]XX'  '0';
@ExternalStateVariable<function> 's2_esv[0]YY'  '2';
@ExternalStateVariable<function> 's2_esv[0]ZZ'  't';
@ExternalStateVariable<function> 's2_esv[0]XY'  '3';
@ExternalStateVariable<function> 's2_esv[0]XZ'  '4';
@ExternalStateVariable<function> 's2_esv[0]YZ'  '5*t';
@ExternalStateVariable<function> 's2_esv[1]' {'0',     '1', '2',
                                              '3 * t', '4', '5 * t'};
// Tensors external state variables
@ExternalStateVariable<function> 't_esv' {'0', '1', '2',     '3 * t', '6',
                                          '4', '7', '5 * t', '8'};
@ExternalStateVariable<function> 't2_esv[0]XX'  '0';
@ExternalStateVariable<function> 't2_esv[0]YY'  '2';
@ExternalStateVariable<function> 't2_esv[0]ZZ'  't';
@ExternalStateVariable<function> 't2_esv[0]XY'  '3';
@ExternalStateVariable<function> 't2_esv[0]YX'  '6';
@ExternalStateVariable<function> 't2_esv[0]XZ'  '4';
@ExternalStateVariable<function> 't2_esv[0]ZX'  '7';
@ExternalStateVariable<function> 't2_esv[0]YZ'  '5*t';
@ExternalStateVariable<function> 't2_esv[0]ZY'  '8';

@ExternalStateVariable<function> 't2_esv[1]' {'0', '1', '2',     '3 * t', '8',
                                              '4', '7', '5 * t', '12'};

@ImposedDrivingVariable 'FXX' 1.;
@ImposedDrivingVariable 'FYY' 1.;
@ImposedDrivingVariable 'FZZ' 1.;
@ImposedDrivingVariable 'FXY' 0.;
@ImposedDrivingVariable 'FYX' 0.;
@ImposedDrivingVariable 'FXZ' 0.;
@ImposedDrivingVariable 'FZX' 0.;
@ImposedDrivingVariable 'FYZ' 0.;
@ImposedDrivingVariable 'FZY' 0.;

@Times{0, 1};// in 10};
//
@Test<function> {'v_isvX' : 'v_esvX',
                 'v_isvY' : 'v_esvY',
                 'v_isvZ' : 'v_esvZ'
} 1.e-14;
@Test<function> {'v2_isv[0]X' : 'v2_esv[0]X',
                 'v2_isv[0]Y' : 'v2_esv[0]Y',
                 'v2_isv[0]Z' : 'v2_esv[0]Z'
} 1.e-14;
@Test<function> {'v2_isv[1]X' : 'v2_esv[1]X',
                 'v2_isv[1]Y' : 'v2_esv[1]Y',
                 'v2_isv[1]Z' : 'v2_esv[1]Z'
} 1.e-14;
//
@Test<function> {'s_isvXX' : 's_esvXX',
                 's_isvYY' : 's_esvYY',
                 's_isvZZ' : 's_esvZZ',
                 's_isvXY' : 's_esvXY',
                 's_isvXZ' : 's_esvXZ',
                 's_isvYZ' : 's_esvYZ'
} 1.e-14;
@Test<function> {'s2_isv[0]XX' : 's2_esv[0]XX',
                 's2_isv[0]YY' : 's2_esv[0]YY',
                 's2_isv[0]ZZ' : 's2_esv[0]ZZ',
                 's2_isv[0]XY' : 's2_esv[0]XY',
                 's2_isv[0]XZ' : 's2_esv[0]XZ',
                 's2_isv[0]YZ' : 's2_esv[0]YZ'
} 1.e-14;
@Test<function> {'s2_isv[1]XX' : 's2_esv[1]XX',
                 's2_isv[1]YY' : 's2_esv[1]YY',
                 's2_isv[1]ZZ' : 's2_esv[1]ZZ',
                 's2_isv[1]XY' : 's2_esv[1]XY',
                 's2_isv[1]XZ' : 's2_esv[1]XZ',
                 's2_isv[1]YZ' : 's2_esv[1]YZ'
} 1.e-14;
//
@Test<function> {'t_isvXX' : 't_esvXX',
                 't_isvYY' : 't_esvYY',
                 't_isvZZ' : 't_esvZZ',
                 't_isvXY' : 't_esvXY',
                 't_isvYX' : 't_esvYX',
                 't_isvXZ' : 't_esvXZ',
                 't_isvZX' : 't_esvZX',
                 't_isvYZ' : 't_esvYZ',
                 't_isvZY' : 't_esvZY'
} 1.e-14;
@Test<function> {'t2_isv[0]XX' : 't2_esv[0]XX',
                 't2_isv[0]YY' : 't2_esv[0]YY',
                 't2_isv[0]ZZ' : 't2_esv[0]ZZ',
                 't2_isv[0]XY' : 't2_esv[0]XY',
                 't2_isv[0]YX' : 't2_esv[0]YX',
                 't2_isv[0]XZ' : 't2_esv[0]XZ',
                 't2_isv[0]ZX' : 't2_esv[0]ZX',
                 't2_isv[0]YZ' : 't2_esv[0]YZ',
                 't2_isv[0]ZY' : 't2_esv[0]ZY'
} 1.e-14;
@Test<function> {'t2_isv[1]XX' : 't2_esv[1]XX',
                 't2_isv[1]YY' : 't2_esv[1]YY',
                 't2_isv[1]ZZ' : 't2_esv[1]ZZ',
                 't2_isv[1]XY' : 't2_esv[1]XY',
                 't2_isv[1]YX' : 't2_esv[1]YX',
                 't2_isv[1]XZ' : 't2_esv[1]XZ',
                 't2_isv[1]ZX' : 't2_esv[1]ZX',
                 't2_isv[1]YZ' : 't2_esv[1]YZ',
                 't2_isv[1]ZY' : 't2_esv[1]ZY'
} 1.e-14;
