@Author Helfer Thomas;
@Date   09 avril 2013;
@Description{
  This test verify the @RotationMatrix
  keyword.
 };

@Behaviour<abaqus> @library@ 'ABAQUSORTHOTROPICELASTIC_3D';
@MaterialProperty<constant> 'YoungModulus1'     100.e9;
@MaterialProperty<constant> 'YoungModulus2'     300.e9;
@MaterialProperty<constant> 'YoungModulus3'     100.e9;
@MaterialProperty<constant> 'PoissonRatio12'      0.3;
@MaterialProperty<constant> 'PoissonRatio13'      0.3;
@MaterialProperty<constant> 'PoissonRatio23'      0.25;
@MaterialProperty<constant> 'ShearModulus12'    100.e9;
@MaterialProperty<constant> 'ShearModulus13'     85.e9;
@MaterialProperty<constant> 'ShearModulus23'    120.e9;

@ExternalStateVariable 'Temperature' 293.15;

@ImposedStress 'SXX' {0.:0.,1:50.e6};

@Times {0.,1.};
@RotationMatrix{{0,1,0},
                {1,0,0},
		{0,0,1}};

@Test<function> {'EXX':'SXX/YoungModulus2',
                 'EYY':'-PoissonRatio12*SXX/YoungModulus1',
                 'EZZ':'-PoissonRatio23*SXX/YoungModulus2'} 1.e-12;
