/*!
 * \file   castemmieheapellambrechtlogarithmicstrain-uniaxialloading-1-2D.mtest
 * \brief
 * \author Helfer Thomas
 * \brief  4 dec. 2013
 */

@Behaviour<abaqus> @library@ 'LOGARITHMICSTRAINELASTICITY_3D';
@MaterialProperty<constant> 'YoungModulus'     215.e9;
@MaterialProperty<constant> 'PoissonRatio'       0.3;

@ImposedDrivingVariable 'FXX' {0:1.,1.:1.};
@ImposedDrivingVariable 'FYY' {0:1.,1.:1.};
@ImposedDrivingVariable 'FZZ' {0:1.,1.:1.};
@ImposedDrivingVariable 'FYZ' {0:0.,1.:0.8};
@ImposedDrivingVariable 'FZY' 0.;
@ImposedDrivingVariable 'FXY' 0.;
@ImposedDrivingVariable 'FYX' 0.;
@ImposedDrivingVariable 'FXZ' 0.;
@ImposedDrivingVariable 'FZX' 0.;

@ExternalStateVariable 'Temperature' 293.15;

@Times {0.,1 in 15};

@Test<file> '@top_srcdir@/mfront/tests/behaviours/references/logarithmicstrainelasticity-shear.ref' {'SYY':7} 1.;
@Test<file> '@top_srcdir@/mfront/tests/behaviours/references/logarithmicstrainelasticity-shear.ref' {'SZZ':8} 1.;
@Test<file> '@top_srcdir@/mfront/tests/behaviours/references/logarithmicstrainelasticity-shear.ref' {'SXX':9} 1.;
@Test<file> '@top_srcdir@/mfront/tests/behaviours/references/logarithmicstrainelasticity-shear.ref' {'SYZ':10} 1.;
@Test<function> {'SXY':'0'} 1.;
@Test<function> {'SXZ':'0'} 1.;
