/*!
 * \file   castemmieheapellambrechtlogarithmicstrain-uniaxialloading-3-plantestrss.mtest
 * \brief
 * \author Helfer Thomas
 * \brief  7 avril. 2014
 */

@ModellingHypothesis 'PlaneStress';
@AccelerationAlgorithm 'Alternate2Delta';
@Behaviour<umat> @library@ 'umatlogarithmicstrainelasticity';
@StressEpsilon 1.e-4;
@MaterialProperty<constant> 'YoungModulus'     215.e9;
@MaterialProperty<constant> 'PoissonRatio'       0.3;

@ImposedDrivingVariable 'FYY' {0:1.,1.:1.8};
@ImposedDrivingVariable 'FXY' 0.;
@ImposedDrivingVariable 'FYX' 0.;

@ExternalStateVariable 'Temperature' 293.15;

@Times {0.,1 in 10};

@Evolution<function> 'eyy' 'log(FYY**2)/2';
@Evolution<function> 'exx' '-PoissonRatio*eyy';
@Evolution<function> 'ezz' '-PoissonRatio*eyy';
@Evolution<function> 'J'   'sqrt(exp(2*exx)*exp(2*ezz))*FYY';
@Evolution<function> 'Tyy' 'YoungModulus*eyy';

@Test<function> {'SXX':'0','SZZ':'0'} 1.e-2;
@Test<function> {'SYY':'Tyy/J'}       1.e-2;
@Test<function> {'SXY':'0'}           1.e-2;
@Test<function> {'FXX': 'sqrt(exp(2*exx))'} 1.e-7;
@Test<function> {'FZZ': '1'} 1.e-7;
@Test<function> {'FXY': '0', 'FYX':'0'} 1.e-10;
