/*!
 * \file   chaboche.mtest
 * \brief
 * \author jmp
 * \brief 18 avril 2013
 */

@AccelerationAlgorithm 'AlternateDelta2';
@MaximumNumberOfSubSteps 1.;

@Behaviour<umat> @library@ 'umatchaboche';
@Parameter 'epsilon' 1e-16;
@StrainEpsilon '1e-8';
@StressEpsilon '145200.*1e-8';

@MaterialProperty<constant> 'YoungModulus' 145200. ;
@MaterialProperty<constant> 'PoissonRatio'  0.3 ;
@MaterialProperty<constant> 'ThermalExpansion' 0. ;
@MaterialProperty<constant> 'R_inf' 151. ;
@MaterialProperty<constant> 'R_0' 87. ;
@MaterialProperty<constant> 'b'  2.3 ;
@MaterialProperty<constant> 'k'  0.43;
@MaterialProperty<constant> 'w'  6.09 ;
@MaterialProperty<constant> 'C_inf[0]' 63767.;
@MaterialProperty<constant> 'C_inf[1]' 498336.;
@MaterialProperty<constant> 'g_0[0]'   341. ;
@MaterialProperty<constant> 'g_0[1]'   17184. ;
@MaterialProperty<constant> 'a_inf'   1.;

@ExternalStateVariable 'Temperature' 293.15;

@ImposedStress 'SXX' {0.: 0., 1.435: 143.5};
@ImposedStress 'SXY' {0.: 0., 1.435: '143.5*1.414'};

@Times {0.,0.4 in 1,1.435 in 12};

@Test<file> '@top_srcdir@/mfront/tests/behaviours/references/chaboche-aster.ref'
            {'EXX':2,'EYY':3} 8.e-5 ;
@Test<file> '@top_srcdir@/mfront/tests/behaviours/references/chaboche-aster.ref'
            {'SXX':8} 1.e0 ;
