/*!
 * \file   castemmieheapellambrechtlogarithmicstrain-uniaxialloading-1-planestress.mtest
 * \brief
 * \author Helfer Thomas
 * \brief  4 dec. 2013
 */

@AccelerationAlgorithm 'AlternateDelta2';
@ModellingHypothesis 'PlaneStress';
@Behaviour<umat> @library@ 'umatlogarithmicstrainelasticity';
@StressEpsilon 1.e-4;
@MaterialProperty<constant> 'YoungModulus'     215.e9;
@MaterialProperty<constant> 'PoissonRatio'       0.3;

@ImposedDrivingVariable 'FXX' {0:1.,1.:1.8};
@ImposedDrivingVariable 'FXY' 0.;
@ImposedDrivingVariable 'FYX' 0.;
@ExternalStateVariable 'Temperature' 293.15;

@Times {0.,1 in 10};

@Evolution<function> 'exx' 'log(FXX**2)/2';
@Evolution<function> 'ezz' '-PoissonRatio*exx';
@Evolution<function> 'eyy' '-PoissonRatio*exx';
@Evolution<function> 'J'   'sqrt(exp(2*eyy)*exp(2*ezz))*FXX';
@Evolution<function> 'Txx' 'YoungModulus*exx';

@Test<function> {'SZZ':'0','SYY':'0'}           1.e-2;
@Test<function> {'SXX':'Txx/J','SXY':'0'}       1.e-2;
@Test<function> {'FYY': 'sqrt(exp(2*eyy))','FZZ': '1'} 1.e-7;
@Test<function> {'FXY': '0', 'FYX':'0'} 1.e-10;
