/*!
 * \file   elasticity7.mtest
 * \brief
 * \author Helfer Thomas
 * \brief  09 avril 2013
 */

@Behaviour<aster> @library@ 'asterelasticity';

@Real 'E'  150.e9;
@Real 'nu'   0.3333;
@Real 'a'    2.e-5;
@MaterialProperty<constant> 'YoungModulus'     'E';
@MaterialProperty<constant> 'PoissonRatio'     'nu';
@MaterialProperty<constant> 'ThermalExpansion' 'a';

@ExternalStateVariable 'Temperature' {0:293.15,3600.:800};
@Real 'ThermalExpansionReferenceTemperature' 293.15;
@Real 'Tref' 'ThermalExpansionReferenceTemperature';

@ImposedStrain 'EXX' 0.;
@ImposedStrain 'EYY' 0.;
@ImposedStrain 'EZZ' 0.;

@Times {0.,3600 in 20};

@Test<function> 'SXX' '-E/(1-2*nu)*a*(Temperature-Tref)'  1.e-3;
@Test<function> 'SYY' '-E/(1-2*nu)*a*(Temperature-Tref)'  1.e-3;
@Test<function> 'SZZ' '-E/(1-2*nu)*a*(Temperature-Tref)'  1.e-3;
@Test<function> {'EXY':'0.','EXZ':'0.','EYZ':'0.'} 1.e-12;
