@Author Helfer Thomas;
@Date   2/09/2015;
@Description{
  This test checks that the "Strict" out of
  bounds policy does lead to throwing an exception
  when a material property is out its bounds.
};

@MaximumNumberOfSubSteps 1;
@Behaviour<aster> @library@ 'asterexternalstatevariablesboundscheck';
@OutOfBoundsPolicy 'Strict';

@ExternalStateVariable 'Temperature' 293.15;
@ExternalStateVariable 'ExternalStateVariable' 50;

@Times {0.,1};
