@DSL Implicit;
@Behaviour CamClayElasticity2_qt;
@Author Thomas Helfer;
@Date 08 / 03 / 2022;

@UseQt true;

@Algorithm NewtonRaphson;
@Epsilon 1.e-14;
@Theta 1;

@Brick CamClayElasticity{
  unloading_reloading_slope : 0.01,
  initial_void_ratio : 0.5,
  poisson_ratio : 0.3,
  pressure_threshold : 1,
  incremental_deviatoric_part : false
};
