@DSL Implicit;
@Behaviour CamClayElasticity5;
@Author Thomas Helfer;
@Date 08 / 03 / 2022;

@Algorithm NewtonRaphson;
@Epsilon 1.e-14;
@Theta 1;

// all the material coefficients are declared as material properties
@Brick CamClayElasticity{deduce_shear_modulus_from_poisson_ratio : false};
