@DSL Implicit;
@Behaviour ChuNeedleman1980StrainBasedNucleationModelTest;
@Author Thomas Helfer;
@Date 4/08/2020;

@Epsilon 1.e-14;
@Theta 1;

@Brick StandardElastoViscoPlasticity{
  stress_potential : "Hooke" {young_modulus : 200e3, poisson_ratio : 0.3},
  inelastic_flow : "Plastic" {
    criterion : "Mises",
    isotropic_hardening : "Linear" {R0 : 274}
  },
  porosity_evolution : {
    nucleation_model : "Chu-Needleman 1980 (strain)" {
      fn : 0.1,
      en : 1e-2,
      sn : 1e-3
    }
  }
};
