@DSL Implicit;
@Behaviour ChuNeedleman1980StressBasedNucleationModelTest;
@Author Thomas Helfer;
@Date 4/08/2020;

@Epsilon 1.e-14;
@Theta 1;

@Brick StandardElastoViscoPlasticity{
  stress_potential : "Hooke" {young_modulus : 200e3, poisson_ratio : 0.3},
  inelastic_flow : "Plastic" {
    criterion : "Mises",
    isotropic_hardening : "Linear" {R0 : 274}
  },
  porosity_evolution : {
    nucleation_model : "Chu-Needleman 1980 (stress)" {
      fn : 0.1,
      sigm : 20e6,
      sn : 10e6,
      fmax : 0.1
    }
  }
};
