@DSL Implicit;
@Behaviour StandardElastoViscoPlasticityHarmonicSumOfNortonHoffViscoplasticFlowsTest2_nj;
@Author Thomas Helfer;
@Date 02 / 11 / 2020;

@Algorithm NewtonRaphson_NumericalJacobian;
@PerturbationValueForNumericalJacobianComputation 1.e-8;
@Epsilon 1.e-14;
@Theta 1;

@Brick StandardElastoViscoPlasticity{
  stress_potential : "Hooke" {young_modulus : 150e9, poisson_ratio : 0.3},
  inelastic_flow : "HarmonicSumOfNortonHoffViscoplasticFlows" {
    criterion : "Mises",
    A : {2, 2},
    K : {100e6, 100e6},
    n : {3.2, 3.2}
  }
};
