@DSL Implicit;
@Behaviour StandardElastoViscoPlasticityNortonTest7_nj;
@Author Thomas Helfer;
@Date 06/04/2018;

@ModellingHypotheses {".+"};
@Algorithm NewtonRaphson_NumericalJacobian;
@Epsilon 1.e-16;
@PerturbationValueForNumericalJacobianComputation 1.e-8;
@IterMax 100;
@Theta 1;

@Brick "StandardElastoViscoPlasticity" {
  stress_potential : "Hooke" {
    young_modulus : "2.e5 - (1.e5*((T - 100.)/960.)**2)",
    poisson_ratio : 0.3,
    thermal_expansion : "1.e-5 + (1.e-5  * ((T - 100.)/960.) ** 4)",
    thermal_expansion_reference_temperature : 0
  },
  inelastic_flow : "Norton" {
    criterion : "Mises",
    isotropic_hardening : "Voce" {R0 : 200, Rinf : 100, b : 20},
    kinematic_hardening : "Armstrong-Frederick" {
      C : "1.e6 - 98500 * (T - 100) / 96",  //
      D : "5000 - 5* (T - 100)"
    },
    K : "(4200. * (T + 20.) - 3. * (T + 20.0)**2)/4900.",
    n : "7. - (T - 100.) / 160.",
    Ksf : 3
  }
};
