@DSL Implicit;
@Behaviour StandardElastoViscoPlasticityPlasticityTest5;
@Author Thomas Helfer;
@Date 11/04/2018;

@ModellingHypotheses {".+"};

@Epsilon 1.e-16;
@Theta 1;

@Brick "StandardElastoViscoPlasticity" {
  stress_potential : "Hooke" {young_modulus : 150e9, poisson_ratio : 0.3},
  inelastic_flow : "Plastic" {
    //
    criterion : "Mises",
    isotropic_hardening : "Linear" {R0 : 33e6},
    isotropic_hardening : "Linear" {H : 438e6}
  }
};
