@Author Thomas Helfer;
@Date 31 / 03 / 2018;
@Description{

};

@XMLOutputFile @xml_output@;
@MaximumNumberOfSubSteps 1;
@Behaviour<castem> @library@ @behaviour@;

@Parameter 'theta' 0.5;

@MaterialProperty<constant> 'YoungModulus' 150e9;
@MaterialProperty<constant> 'PoissonRatio' 0.3;

@ExternalStateVariable 'Temperature' {0 : 500, 3600 : 793.15};

@Real 's' 41e6;
@Real 'e0' 's/YoungModulus';
@Strain{'e0', '-e0*PoissonRatio', '-e0*PoissonRatio', 0, 0, 0};
@Stress{'s', 0, 0, 0, 0, 0};
@InternalStateVariable 'ElasticStrain' {'e0', '-e0*PoissonRatio', '-e0*PoissonRatio', 0, 0, 0};

@Real 'p0' 1.e-6;

@ImposedStress 'SXX' 's';
@Times{0, 3600 in 100};

@Real 'T0' '500';
@Real 'dT_dt' '(793.15-T0)/3600';
@Real 'Ta'  700;
@Real 'de0' 1.4e-5;
@Real 'K' 100e6;
@Real 'n' 3.2;

@Real 'A' 'de0*(s/K)**3.2';
@Real 'a' 'T0/Ta';
@Real 'b' 'dT_dt/Ta';

// analytical solution giving the evolution of the
// equivalent plastic strain as a function of time
@Evolution<function> 'p' 'A/b*(exp(-a)-exp(-(a+b*t)))';

@Test<function> 'EquivalentViscoplasticStrain' 'p' 5.e-4;
@Test<function> {
  'SYY' : '0', 'SZZ' : '0'
}
1.e-2;
