@Author Jamel Tirari;
@Date   13/03/2018;
@Description{implicit

};

@XMLOutputFile @xml_output@;
@MaximumNumberOfSubSteps 1;
@Behaviour<castem> @library@ @behaviour@;

@MaterialProperty<constant> 'YoungModulus' 160e9;
@MaterialProperty<constant> 'PoissonRatio' 0.3;

@ExternalStateVariable 'Temperature' 293.15;

@ImposedStress 'SXX' {0:0,10:1.5e8};

@Times {0,10 in 100};

@Test<file> @reference_file@ 'EXX' 2 4.e-13;
@Test<file> @reference_file@ 'SXX' 8 1.e-3;
@Test<file> @reference_file@ 'EquivalentViscoplasticStrain' 20 4.e-13;
