@Author Franck Milliard;
@Date   27 Novembre 2013;
@Description{
"Test de deux lois viscoplastiques en sinh"
};

@UseCastemAccelerationAlgorithm true;
@MaximumNumberOfSubSteps 1 ;
@Behaviour<@interface@> @library@ 'umatt91viscoplasticbehaviour';

@MaterialProperty<constant> 'YoungModulus' 2.e+11;
@MaterialProperty<constant>  'PoissonRatio' 0.3;

// Satoh :
@ExternalStateVariable 'Temperature' {0. :312.95, 1.99 : 312.95, 60.:1473.15};

@Evolution<function> 'T' 'Temperature';

@InternalStateVariable 'ksi' 1. ;

 // Satoh :
@ImposedStrain 'EXX' {0. : 0., 60. : 0.};
@Times { 0.0, 46.4932 in 300, 46.4936 in 10, 50. in 90, 60. in 50};

@Test<file> @reference_file@ {'SXX':8} 5.e3 ;
@Test<file> @reference_file@ {'EYY':3,'EZZ':3} 1.e-7;
