@Author  Franck Milliard;
@Date 27 Novembre 2013;
@Description{
"Test de deux lois viscoplastiques en sinh"
};

@UseCastemAccelerationAlgorithm true;
@MaximumNumberOfSubSteps 1 ;
@Behaviour<@interface@> @library@ 'umatt91viscoplasticbehaviour';

@Real 'ThermalExpansionReferenceTemperature' 0.;

// For Cast3M interface
@MaterialProperty<constant> 'YoungModulus' 2.e+11;
@MaterialProperty<constant>  'PoissonRatio' 0.3;

// For constant Temperature
@Real 'TCL' 473.15 ;
@ExternalStateVariable 'Temperature' {0. : 'TCL' , 3600. : 'TCL'};

@InternalStateVariable 'ksi' 1. ;

// For Tensile Testing
@Real 'DY1' 0.07 ;

@ImposedStrain 'EXX' { 0.: 0.0, 15. : 0.015 , 115. : 0.025, 615.:0.03, 630. : 0.045, 730.: 0.055, 1230.:0.06, 1245.:'DY1' , 1801.:'DY1'};
@Times { 0.0, 1.9 in 1, 2.2 in 5, 15. in 10, 16. in 5, 115. in 10, 125. in 5, 615 in 10, 615.2 in 5, 630 in 10,631. in 5, 730. in 10, 740. in 5, 1230. in 10, 1230.3 in 5, 1245 in 10, 1246. in 10, 1800. in 10};
