/*!
 * \file   castemelasticity_LogarithmicStrain1DWrapper-uniaxialloading-1-1D.mtest
 * \brief
 * \author Helfer Thomas
 * \brief  11 dec. 2014
 */

@UseCastemAccelerationAlgorithm true;
@ModellingHypothesis 'AxisymmetricalGeneralisedPlaneStrain';
@Behaviour<@interface@, LogarithmicStrain1D> @library@ 'umatelasticity';
@MaterialProperty<constant> 'YoungModulus'     215.e9;
@MaterialProperty<constant> 'PoissonRatio'       0.3;

@ImposedDrivingVariable 'ERR' {0:0,1.:0.8};

@ExternalStateVariable 'Temperature' 293.15;

@Times {0.,1 in 10};

@Evolution<function> 'FRR' '1+ERR';
// Logarithmic strain
@Evolution<function> 'err' 'log(FRR**2)/2';
@Evolution<function> 'ezz' '-PoissonRatio*err';
@Evolution<function> 'ett' '-PoissonRatio*err';
@Evolution<function> 'J'   'sqrt(exp(2*ett)*exp(2*ezz))*FRR';
@Evolution<function> 'Trr' 'YoungModulus*err';

@Test<function> {'SZZ':'0','STT':'0'} 1.e-3;
@Test<function> {'SRR':'Trr/(1+ERR)'} 1.e-3;
@Test<function> {'ETT': 'sqrt(exp(2*ett))-1','EZZ': 'sqrt(exp(2*ezz))-1'} 1.e-10;
