@Author Helfer Thomas;
@Date   2/09/2015;
@Description{
  This test checks that the "Strict" out of
  bounds policy does lead to throwing an exception
  when an external state variable is out its bounds.
};

@MaximumNumberOfSubSteps 1;
@Behaviour<@interface@> @library@ 'umatexternalstatevariablesboundscheck';
@OutOfBoundsPolicy 'Strict';
@MaterialProperty<constant> 'YoungModulus'   50.e9;
@MaterialProperty<constant> 'PoissonRatio'    0.3;

@ExternalStateVariable 'Temperature' 293.15;
@ExternalStateVariable 'ExternalStateVariable' 50;

@Times {0.,1};
