@Author Helfer Thomas;
@Date   2/09/2015;
@Description{
  This test checks that an exception is throw
  when an external state variable is out its
  physical bounds.

  Here, the external  state variable is in the
  bounds at the beginning of the time step and
  of out of bounds at the end.
};

@MaximumNumberOfSubSteps 1;
@Behaviour<@interface@> @library@ 'umatexternalstatevariablesboundscheck';
@OutOfBoundsPolicy 'None';
@MaterialProperty<constant> 'YoungModulus'  150.e9;
@MaterialProperty<constant> 'PoissonRatio'   -2;

@ExternalStateVariable 'Temperature' 293.15;
@ExternalStateVariable 'ExternalStateVariable' {0:100,1:-100};

@Times {0.,1};
