/*!
 * \file   castemsinglecrystal2.mtest
 * \brief
 * \author jmp
 * \brief 20 mai 2013
 */

@UseCastemAccelerationAlgorithm true;
@MaximumNumberOfSubSteps 1;
@PredictionPolicy 'LinearPrediction';

@Real 'young' 208000.;
@Real 'nu'    0.3;
@Real 'G'     'young/2.6';

@Behaviour<@interface@>    @library@  'umatfinitestrainsinglecrystal2';

@MaterialProperty<constant> 'YoungModulus1'     'young';
@MaterialProperty<constant> 'YoungModulus2'     'young';
@MaterialProperty<constant> 'YoungModulus3'     'young';
@MaterialProperty<constant> 'PoissonRatio12'       'nu';
@MaterialProperty<constant> 'PoissonRatio13'       'nu';
@MaterialProperty<constant> 'PoissonRatio23'       'nu';
@MaterialProperty<constant> 'ShearModulus12'    'young';
@MaterialProperty<constant> 'ShearModulus13'    'young';
@MaterialProperty<constant> 'ShearModulus23'    'young';
@MaterialProperty<constant> 'm'      10.0;
@MaterialProperty<constant> 'K'      25.0;
@MaterialProperty<constant> 'C'      14363.;
@MaterialProperty<constant> 'R0'     66.62;
@MaterialProperty<constant> 'Q'      11.43;
@MaterialProperty<constant> 'b'      2.1;
@MaterialProperty<constant> 'd1'     494.0;

@ExternalStateVariable 'Temperature' 293.15;

@InternalStateVariable 'Fe' {1.,1.,1.,
                             0.,0.,0.,
                             0.,0.,0.};

@ImposedDeformationGradient 'FZZ' {0.: 1., 2.0E-1 : 1.2 };
@ImposedDeformationGradient 'FXX' 1;
@ImposedDeformationGradient 'FYY' 1;
@ImposedDeformationGradient 'FXY' 0;
@ImposedDeformationGradient 'FYX' 0;
@ImposedDeformationGradient 'FXZ' 0;
@ImposedDeformationGradient 'FZX' 0;
@ImposedDeformationGradient 'FYZ' 0;
@ImposedDeformationGradient 'FZY' 0;

@Times {0., 2.e-1 in 100};
