/*!
 * \file   castemimplicitsimomieheelastoplasticity.mtest
 * \brief
 * \author Helfer Thomas
 * \brief  25 nov. 2013
 */

@UseCastemAccelerationAlgorithm true;
@MaximumNumberOfSubSteps 1;
@ModellingHypothesis 'Axisymmetrical';

@Behaviour<@interface@> @library@ 'umatimplicitsimomieheelastoplasticity';
@MaterialProperty<constant> 'YoungModulus'     200.e9;
@MaterialProperty<constant> 'PoissonRatio'       0.3;
@MaterialProperty<constant> 's_y' 200e6;
@MaterialProperty<constant> 'ET'  20e9;


@ImposedDeformationGradient 'FRR' {0:1.,3600.:1.7};
@ImposedDeformationGradient 'FRZ' 0.;
@ImposedDeformationGradient 'FZR' 0.;

// Initial value of the elastic strain
@InternalStateVariable 'be' {1.,1.,1.,0.};

@ExternalStateVariable 'Temperature' 293.15;

@Times {0.,3600 in 20};

@Test<file> @reference_file@ {'FZZ':3} 1.e-6 ;
@Test<file> @reference_file@ {'FTT':4} 1.e-6 ;
@Test<function> 'FRZ' '0.' 1.e-8 ;
@Test<function> 'FZR' '0.' 1.e-8 ;
@Test<file> @reference_file@ {'SRR':7} 1.e5 ;
@Test<function> 'SZZ' '0.' 1.e5;
@Test<function> 'STT' '0.' 1.e5;
@Test<function> 'SRZ' '0.' 1.e5;
@Test<file> @reference_file@ {'EquivalentPlasticStrain':11} 1.e-6 ;
