/*!
 * \file   castemincompressibleplanestressgornetdesmoratbehaviourbiaxialtesting.mtest
 * \brief
 * \author Helfer Thomas
 * \brief  09 avril 2013
 */

@UseCastemAccelerationAlgorithm true;
@ModellingHypothesis 'PlaneStress';
@Behaviour<@interface@> @library@ 'umatincompressibleplanestressgornetdesmoratbehaviour';

@Real 'C_1' '0.183';
@Real 'C_2' '0.0034';
@Real 'E'   '3*(2*(C_1+C_2))';

@MaterialProperty<constant> 'YoungModulus'    '20000*E';
@MaterialProperty<constant> 'PoissonRatio'     0.49999;
@MaterialProperty<constant> 'H1' '0.142236';
@MaterialProperty<constant> 'H2' '1.5854659e-2';
@MaterialProperty<constant> 'H3' '3.4946541e-4';

@ExternalStateVariable 'Temperature' {0:293.15,3600.:800};

@ImposedDeformationGradient 'FXX' {0:1,1:8.};
@ImposedDeformationGradient 'FYY' {0:1,1:6.};
@ImposedDeformationGradient 'FXY' 0;
@ImposedDeformationGradient 'FYX' 0;

@Times {0.,1 in 10};

@Test<function> {'SXX':'(FXX**2 - 1/(FXX**2*FYY**2))*(2*H1*(exp (H3 *((FXX**2 + FYY**2 + 1/(FXX**2*FYY**2) - 3)**2)))+2*3.*H2/sqrt(FXX**2 * FYY**2 + 1/FXX**2 + 1/FYY**2)*FYY**2)'} 1.e-10;
@Test<function> {'SYY':'(FYY**2 - 1/(FXX**2*FYY**2))*(2*H1*(exp (H3 *((FXX**2 + FYY**2 + 1/(FXX**2*FYY**2) - 3)**2)))+2*3.*H2/sqrt(FXX**2 * FYY**2 + 1/FXX**2 + 1/FYY**2)*FXX**2)'} 1.e-10;
@Test<function> {'SZZ':'0.','SXY':'0.'} 1.e-2;
