/*!
 * \file   castemmieheapellambrechtlogarithmicstrain-uniaxialloading-1-2D.mtest
 * \brief
 * \author Helfer Thomas
 * \brief  4 dec. 2013
 */

@UseCastemAccelerationAlgorithm true;
@Behaviour<@interface@> @library@ 'umatlogarithmicstrainelasticity_malls';
@MaterialProperty<constant> 'YoungModulus'     215.e9;
@MaterialProperty<constant> 'PoissonRatio'       0.3;

@ImposedDrivingVariable 'FXX' {0:1.,1.:1.};
@ImposedDrivingVariable 'FYY' {0:1.,1.:1.};
@ImposedDrivingVariable 'FZZ' {0:1.,1.:1.};
@ImposedDrivingVariable 'FZX' {0:0.,1.:0.8};
@ImposedDrivingVariable 'FXZ' 0.;
@ImposedDrivingVariable 'FXY' 0.;
@ImposedDrivingVariable 'FYX' 0.;
@ImposedDrivingVariable 'FYZ' 0.;
@ImposedDrivingVariable 'FZY' 0.;

@ExternalStateVariable 'Temperature' 293.15;

@Times {0.,1 in 15};

// @Test<file> 'logarithmicstrainelasticity-shear.ref' {'SXX':7} 1.;
// @Test<file> 'logarithmicstrainelasticity-shear.ref' {'SYY':8} 1.;
@Test<file> @reference_file@ {'SYY':9} 1.;
@Test<file> @reference_file@ {'SXZ':10} 1.;
@Test<function> {'SXY':'0'} 1.;
@Test<function> {'SYZ':'0'} 1.;
