@Author  Thomas Helfer;
@Date    1/01/2018;

@Behaviour<@interface@> @library@ 'umatparametertest2';
@ExternalStateVariable 'Temperature' {0:293.15,3600.:800};
@MaterialProperty<constant> 'YoungModulus' 150e9;
@MaterialProperty<constant> 'PoissonRatio' 0.3;

@Parameter 'ArrayOfParameters[0]' 15;
@Parameter 'ArrayOfParameters[1]' -3;

@Real 'e0' 1.e-3;
@ImposedStrain<function> 'EXX' 'e0*sin(t/900.)';

@Times {0.,3600 in 20};

@Real 'young' 150e9;
@Real 'nu' 0.3;
// stresses
@Test<function> 'SXX' 'young*EXX'  1.e-3;
@Test<function> 'SYY' '0.'         1.e-3;
@Test<function> 'SZZ' '0.'         1.e-3;
@Test<function> 'SXY' '0.'         1.e-3;
@Test<function> 'SXZ' '0.'         1.e-3;
@Test<function> 'SYZ' '0.'         1.e-3;
// strains
@Test<function> 'EYY' '-nu*EXX'    1.e-8;
@Test<function> 'EZZ' '-nu*EXX'    1.e-8;
@Test<function> 'EXY' '0.'         1.e-8;
@Test<function> 'EXZ' '0.'         1.e-8;
@Test<function> 'EYZ' '0.'         1.e-8;
