@Author Helfer Thomas;
@Date   09 avril 2013;
@Description{
  "Essai de fluage sur un matériau modéliser"
  "par une loi de type Lemaître (loi viscoplastique "
  "avec écroussage)."
  "Vérification de la réponse fournie par "
  "une loi générée par l'analyseur "
  "IsotropicStrainHardeningMisesCreep de mfront."
  "Comparaison à la solution analytique."
};

@ModellingHypothesis 'Axisymmetrical';
@UseCastemAccelerationAlgorithm true;

@Behaviour<@interface@> @library@ 'umatstrainhardeningcreep3';
@MaterialProperty<constant> 'YoungModulus'     150.e9;
@MaterialProperty<constant> 'PoissonRatio'       0.3;

@Real 'tm' '10';
@Real 'dt' '10/200';
@ExternalStateVariable<function> 'Temperature' '293.15+(t/tm)*(500-293.15)';

@Real 'nu' 0.3;
@Evolution<function> 'TC' '20+((t-(dt/2))/tm)*(500-293.15)';
@Evolution<function> 'TC_tdt' 'Temperature-273.15';
@Evolution<function> 'E'  '(-3.1636e-3*TC*TC-3.8654*TC+2.1421e+4)*1e7';
@Evolution<function> 'E_tdt'  '(-3.1636e-3*TC_tdt*TC_tdt-3.8654*TC_tdt+2.1421e+4)*1e7';
@Evolution<function> 'lc'     'nu*E/((1+nu)*(1-2*nu))';
@Evolution<function> 'mc'     'E/(2*(1+nu))';
@Evolution<function> 'lc_tdt' 'nu*E_tdt/((1+nu)*(1-2*nu))';
@Evolution<function> 'mc_tdt' 'E_tdt/(2*(1+nu))';

@Times {0.,10. in 200};
@Test<function> 'l'     'lc'     1.e-3;
@Test<function> 'm'     'mc'     1.e-3;
@Test<function> 'l_tdt' 'lc_tdt' 1.e-3;
@Test<function> 'm_tdt' 'mc_tdt' 1.e-3;
