/*!
 * \file   tvergaard.mtest
 * \brief
 * \author Helfer Thomas
 * \brief  09 avril 2013
 */

@Behaviour<@interface@> @library@ 'umattvergaard';
@MaterialProperty<constant> 'NormalStiffness'              2.e16;
@MaterialProperty<constant> 'TangentialStiffness'          2.e16;
@MaterialProperty<constant> 'UltimateTensileStrength'     200.e6;
@MaterialProperty<constant> 'MaximumOpeningDisplacement'   3.e-6;

@ExternalStateVariable 'Temperature' 293.15;

@ImposedOpeningDisplacement 'Un' {0.:0.,1800.:1.5e-6,
    2400.:0.,2600:-1.e-8,3000:0.,3600.:3.e-6};

@Times {0.,1800 in 10, 2400,
    2600 in 5, 3000 in 1,3600 in 20};

@Test<file> @reference_file@ {'Ut1':6} 1.e-10;
@Test<file> @reference_file@ {'Ut2':6} 1.e-10;
@Test<file> @reference_file@ {'Tn':5} 1.e3;
@Test<file> @reference_file@ {'Tt1':6} 1.e3;
@Test<file> @reference_file@ {'Tt2':7} 1.e3;
