'OPTION' 'ERREUR' 'FATALE' ;
'OPTION' 'DIME' 2 'ELEM' qua4;
'OPTION' 'MODELISER' 'AXISYMETRIE';

TMAX = 1.;
NPAS = 10;
UMAX = 7.e-1;

O = 0. 0.;
A = 1. 0.;

l1 = 'DROIT' 1 O A;
l2 = l1 'PLUS' (0. 1.);

s1 = l1 'REGLER' 1 l2;

coel2D = 'MOTS' 'YOUN' 'NU' 'RHO' 'ALPH' 'S_Y' 'ET';
stav2D = 'MOTS'  'P' 'BERR' 'BEZZ' 'BETT' 'BERZ';
para2D = 'MOTS' 'T';
cmp='TABLE' ;
cmp.'LIBRAIRIE' = '../libMFrontCastemBehaviours.so' ;
cmp.'MODELE'    = 'umatimplicitsimomieheelastoplasticity';

mod1 = 'MODELISER' s1 'MECANIQUE' 'ELASTIQUE' 'ISOTROPE'
   'NON_LINEAIRE' 'UTILISATEUR' 'EPSILON' 'UTILISATEUR'
   'DESC_LOI' cmp
   'C_MATERIAU' coel2D
   'C_VARINTER' stav2D
   'PARA_LOI'   para2D
   'CONS' M;

MAT1 = 'MATERIAU' MOD1 'YOUN' 200e9 'NU' 0.3 'ALPH' 0. 'RHO' 0.
   'S_Y' 200e6 'ET' 20e9;

***
LIT1 = PROG 0. PAS (TMAX/ NPAS)  TMAX;

*** CONDITIONS AUX LIMITES
************************************************
* Conditions aux limites éprouvette
CL1 = 'BLOQUE' 'UZ'  L1 ;
CL2 = 'BLOQUE' 'UZ'  L2 ;
CLE1 = CL1 ET CL2;

* Chargement mécanique et thermique
LI1 = PROG 0. TMAX ;
LI2 = PROG 0. 1. ;
EV = EVOL MANU T LI1 F(T) LI2 ;
DEP1 = DEPI CL2 UMAX;
CHA1 = CHAR 'DIMP' DEP1 EV ;

* Champ de température
TEK = 293.15;
THE1 = MANU 'CHPO' S1 1 'T' TEK ;
EV2 = EVOL MANU (prog 0. TMAX) (prog 1. 1.) ;
CHARTHER = CHAR 'T' THE1 EV2 ;

be0 = 'MANUEL' 'CHML' MOD1 'BERR' 1. 'BEZZ' 1. 'BETT' 1.
      'STRESSES' 'TYPE' 'VARIABLES_INTERNES';

** CALCUL
* Définition des pas de calcul et de sauvegarde
************************************************************
* Définition de la table de la phase de charge
TAB1 = TABLE ;
*TAB1.'K_SIGMA' =  FAUX;
TAB1.'MOVA' = 'MOT' 'RIEN' ;
TAB1.'TEMPERATURES' = TABLE ;
TAB1.'VARIABLES_INTERNES' = TABLE ;
TAB1.'BLOCAGES_MECANIQUES' = CLE1 ;
TAB1.'MODELE' = MOD1 ;
TAB1.'CHARGEMENT' = CHA1 'ET' CHARTHER ;
TAB1.'TEMPERATURES' . 0 = THE1 ;
TAB1.'CARACTERISTIQUES' = MAT1 ;
TAB1.'TEMPS_CALCULES' = LIT1 ;
TAB1.'TEMPS_SAUVES' = LIT1 ;
TAB1.VARIABLES_INTERNES.0 = (ZERO MOD1 'VARINTER') '+' be0;
TAB1.'GRANDS_DEPLACEMENTS' = VRAI;
TAB1.'PRECISION' = 1.e-8;

* Lancement du calcul de la phase de charge
PASAPAS TAB1 ;

'REPETER' i ('DIME' tab1.'CONTRAINTES');
   idx = &i '-' 1;
   s = tab1.'CONTRAINTES' . idx;
   d = tab1.'DEPLACEMENTS'. idx;
   v = tab1.'VARIABLES_INTERNES'. idx;
   'MESSAGE' ('MAXIMUM' ('EXCO' d 'UZ')) ' '
             ('MINIMUM' ('EXCO' d 'UR')) ' '
             ('MAXIMUM' ('EXCO' s 'SMZZ')) ' '
             ('MAXIMUM' ('EXCO' v 'P'));
'FIN' i;

nb = ('DIME' tab1.'CONTRAINTES');
s = tab1.'CONTRAINTES' . (nb '-' 1);
d = tab1.'DEPLACEMENTS'. (nb '-' 1);
v = tab1.'VARIABLES_INTERNES'. (nb '-' 1);

ur = ('MINIMUM' ('EXCO' d 'UR'));
sz = ('MAXIMUM' ('EXCO' s 'SMZZ'));
pm = ('MAXIMUM' ('EXCO' v 'P'));

OK = VRAI;

'SI' ('>' ('ABS' (ur '+' 0.22452)) 1.e-4);
   'MESSAGE' 'ERREUR SUR LE DEPLACEMENT (' ur ' vs ' 0.22452 ')';
   OK = FAUX;
'FINSI';
'SI' ('>' ('ABS' (sz '-'  1.10432E+10)) 1.e6);
   'MESSAGE' 'ERREUR SUR LA CONTRAINTE (' sz ' vs ' 1.10432E+10 ')';
   OK = FAUX;
'FINSI';
'SI' ('>' ('ABS' (pm '-' 0.49904)) 1.e-3);
   'MESSAGE' 'ERREUR SUR LA DEFORMATION PLASTIQUE EQUIVALENTE ('
     pm ' vs '  0.49904 ')';
   OK = FAUX;
'FINSI';


'SI' ('NON' OK);
  'MESS' ' ---------------------' ;
  'MESS' '  ECHEC DU CAS-TEST !' ;
  'MESS' ' ---------------------' ;
  'ERREUR' 5 ;
'SINON' ;
  'MESS' ' ----------------------' ;
  'MESS' '  SUCCES DU CAS-TEST !' ;
  'MESS' ' ----------------------' ;
'FINSI' ;
'SAUTER' 1 'LIGNE' ;

'FIN';
