/*!
 * \file   castemburger.mtest
 * \brief
 * \author François Hammon/Jean-Michel Proix
 * \brief  23 mai 2013
 */

@StiffnessMatrixType 'ConsistentTangentOperator';

@Behaviour<umat> @library@ 'umatburger';
@MaterialProperty<constant> 'YoungModulus' 31000. ;
@MaterialProperty<constant> 'PoissonRatio'     0.3 ;
@MaterialProperty<constant> 'MassDensity'      0.;
@MaterialProperty<constant> 'ThermalExpansion' 0.;
@MaterialProperty<constant> 'KRS'   2.0E5 ;
@MaterialProperty<constant> 'NRS'   4.0E10 ;
@MaterialProperty<constant> 'KAPPA' 3.E-3 ;
@MaterialProperty<constant> 'NIS'   1.0E11 ;
@MaterialProperty<constant> 'KRD'   5.0E4 ;
@MaterialProperty<constant> 'NRD'   1.0E10;
@MaterialProperty<constant> 'NID'   1.0E11 ;
@MaterialProperty<constant> 'NFD'   0.;
@MaterialProperty<constant> 'Cini'  1.;

@ExternalStateVariable 'Temperature' 293.15;
@ExternalStateVariable 'C' 1.;

@ImposedStress 'SZZ' {0.: 0., 1.: -1., 31536010. : -1.};

@Times {0.,1. in 1, 138629.44 in 10,8640000. in 10 };

@Test<file> '@top_srcdir@/mfront/tests/behaviours/references/burger.ref' {'EZZ':4} 1.e-8 ;
