/*!
 * \file   elasticity.mtest
 * \brief
 * \author Helfer Thomas
 * \brief  09 avril 2013
 */

@StiffnessMatrixType 'ConsistentTangentOperator';
@Behaviour<umat> @library@ 'umatelasticity';
@MaterialProperty<constant> 'YoungModulus'     150.e9;
@MaterialProperty<constant> 'PoissonRatio'       0.3;
@MaterialProperty<constant> 'MassDensity'        0.;
@MaterialProperty<constant> 'ThermalExpansion'   0.;

@ExternalStateVariable 'Temperature' {0:293.15,3600.:800};

@Real 'e0' 1.e-3;
@ImposedStrain<function> 'EXX' 'e0*sin(t/900.)';

@Times {0.,3600 in 20};

// stresses
@Test<function> 'SXX' 'YoungModulus*EXX'  1.e-3;
@Test<function> 'SYY' '0.'                1.e-3;
@Test<function> 'SZZ' '0.'                1.e-3;
@Test<function> 'SXY' '0.'                1.e-3;
@Test<function> 'SXZ' '0.'                1.e-3;
@Test<function> 'SYZ' '0.'                1.e-3;
// strains
@Test<function> 'EYY' '-PoissonRatio*EXX' 1.e-8;
@Test<function> 'EZZ' '-PoissonRatio*EXX' 1.e-8;
@Test<function> 'EXY' '0.'                1.e-8;
@Test<function> 'EXZ' '0.'                1.e-8;
@Test<function> 'EYZ' '0.'                1.e-8;
