@Author Jeremy Hure;
@Date 10 Février 2014;

@StiffnessMatrixType 'ConsistentTangentOperator';
@Behaviour<umat> @library@ 'umatgursontvergaardneedlemanviscoplasticflow_numericaljacobian';

@MaterialProperty<constant> 'YoungModulus' 200000.;
@MaterialProperty<constant> 'PoissonRatio' 0.3;
@MaterialProperty<constant> 'MassDensity' 0.;
@MaterialProperty<constant> 'ThermalExpansion' 0.;

@ExternalStateVariable 'Temperature' 0.;

@ImposedStrain<function> 'EXX' 't*0.02';
@ImposedStrain<function> 'EYY' 't*0.1';
@ImposedStrain<function> 'EZZ' 't*0.';
@Times {0.,0.3 in 100};


@Test<function> 'SXY'  '0' 1.e-3;
@Test<function> 'SXZ'  '0' 1.e-3;
@Test<function> 'SYZ'  '0' 1.e-3;

@Test<function> 'EXY'  '0' 1.e-3;
@Test<function> 'EXZ'  '0' 1.e-3;
@Test<function> 'EYZ'  '0' 1.e-3;
