/*!
 * \file  hayhurst.mtest
 * \brief
 * \author jmp
 * \brief 20 mai 2013
 */

@StiffnessMatrixType 'ConsistentTangentOperator';

@Behaviour<umat> @library@ 'umatimplicithayhurst';
@MaterialProperty<constant> 'YoungModulus'      1.45000E5;
@MaterialProperty<constant> 'PoissonRatio'         0.3;
@MaterialProperty<constant> 'MassDensity'        7800.0;
@MaterialProperty<constant> 'ThermalExpansion'   1.E-05;
@MaterialProperty<constant> 'K'          9.691              ;
@MaterialProperty<constant> 'epsi0'      5.82514751E-11     ;
@MaterialProperty<constant> 'sigma0'     27.931695458       ;
@MaterialProperty<constant> 'h1'         3.E4               ;
@MaterialProperty<constant> 'h2'         -280.0             ;
@MaterialProperty<constant> 'H1star'     0.33               ;
@MaterialProperty<constant> 'H2star'     1.0                ;
@MaterialProperty<constant> 'A0'         9.70759313E-08     ;
@MaterialProperty<constant> 'alphaD'     0.5                ;
@MaterialProperty<constant> 'delta1'     1.0                ;
@MaterialProperty<constant> 'delta2'     0.0                ;

@ExternalStateVariable 'Temperature' 293.15;

@ImposedStress 'SYY' {0.: 0., 100.: 160., 100000000.: 160.};

@Times {0.,2000. in 2000};
