/*!
 * \file   castemmonocrystal_dd_cc_irradiation_numericaljacobian.mtest
 * \brief
 * \author jmp
 * \brief  2 déc. 2013
 */

@StiffnessMatrixType 'ConsistentTangentOperator';

@ModellingHypothesis 'Tridimensional';
@Behaviour<umat> @library@ 'umatmonocrystal_dd_cc_irradiation_numericaljacobian';

@MaterialProperty<constant> 'PoissonRatio12' 0.35;
@MaterialProperty<constant> 'PoissonRatio13' 0.35;
@MaterialProperty<constant> 'PoissonRatio23' 0.35;
@MaterialProperty<constant> 'ShearModulus12' 83157.407407407;
@MaterialProperty<constant> 'ShearModulus13' 83157.407407407;
@MaterialProperty<constant> 'ShearModulus23' 83157.407407407;
@MaterialProperty<constant> 'YoungModulus1' 224525;
@MaterialProperty<constant> 'YoungModulus2' 224525;
@MaterialProperty<constant> 'YoungModulus3' 224525;
@MaterialProperty<constant> 'ThermalExpansion1' 0.;
@MaterialProperty<constant> 'ThermalExpansion2' 0.;
@MaterialProperty<constant> 'ThermalExpansion3' 0.;
@MaterialProperty<constant> 'MassDensity' 0.;
@MaterialProperty<constant> 'V1X'   1.;
@MaterialProperty<constant> 'V1Y'   0.;
@MaterialProperty<constant> 'V1Z'   0.;
@MaterialProperty<constant> 'V2X'   0.;
@MaterialProperty<constant> 'V2Y'   1.;
@MaterialProperty<constant> 'V2Z'   0.;

// Material properties
@MaterialProperty<constant> 'DeltaG_0' 0.84;
@MaterialProperty<constant> 'H' 100000000000;
@MaterialProperty<constant> 'K_f' 30;
@MaterialProperty<constant> 'K_self' 100;
@MaterialProperty<constant> 'Mu' 83157.407407407;
@MaterialProperty<constant> 'a_irr' '0.3';
@MaterialProperty<constant> 'b' 2.48e-07;
@MaterialProperty<constant> 'd' 1e-05;
@MaterialProperty<constant> 'd_lath' 1000;
@MaterialProperty<constant> 'epsi_1' 3.e-04;
@MaterialProperty<constant> 'gamma0' 1.e-3;
@MaterialProperty<constant> 'h0' 0.1024;
@MaterialProperty<constant> 'h1' 0.7;
@MaterialProperty<constant> 'h2' 0.1;
@MaterialProperty<constant> 'h3' 0.1;
@MaterialProperty<constant> 'h4' 0.1;
@MaterialProperty<constant> 'h5' 0.1;
@MaterialProperty<constant> 'k_b' 8.62e-05;
@MaterialProperty<constant> 'omega_mob' 6.1504e-09;
@MaterialProperty<constant> 'pn' 20;
@MaterialProperty<constant> 'tau_0' 363;
@MaterialProperty<constant> 'tau_f' 20;
@MaterialProperty<constant> 'xi_irr' '4.0';
@MaterialProperty<constant> 'y_at' 1e-06;

// Internal state variables
@InternalStateVariable 'ElasticStrain' {0,0,0,0,0,0};
@InternalStateVariable 'omega[0]' 6.1504e-09;
@InternalStateVariable 'omega[1]' 6.1504e-09;
@InternalStateVariable 'omega[2]' 6.1504e-09;
@InternalStateVariable 'omega[3]' 6.1504e-09;
@InternalStateVariable 'omega[4]' 6.1504e-09;
@InternalStateVariable 'omega[5]' 6.1504e-09;
@InternalStateVariable 'omega[6]' 6.1504e-09;
@InternalStateVariable 'omega[7]' 6.1504e-09;
@InternalStateVariable 'omega[8]' 6.1504e-09;
@InternalStateVariable 'omega[9]' 6.1504e-09;
@InternalStateVariable 'omega[10]' 6.1504e-09;
@InternalStateVariable 'omega[11]' 6.1504e-09;
@InternalStateVariable 'omega_irr[0]' 6.1504e-09;
@InternalStateVariable 'omega_irr[1]' 6.1504e-09;
@InternalStateVariable 'omega_irr[2]' 6.1504e-09;
@InternalStateVariable 'omega_irr[3]' 6.1504e-09;
@InternalStateVariable 'omega_irr[4]' 6.1504e-09;
@InternalStateVariable 'omega_irr[5]' 6.1504e-09;
@InternalStateVariable 'omega_irr[6]' 6.1504e-09;
@InternalStateVariable 'omega_irr[7]' 6.1504e-09;
@InternalStateVariable 'omega_irr[8]' 6.1504e-09;
@InternalStateVariable 'omega_irr[9]' 6.1504e-09;
@InternalStateVariable 'omega_irr[10]' 6.1504e-09;
@InternalStateVariable 'omega_irr[11]' 6.1504e-09;

// External state variables
@ExternalStateVariable<evolution> 'Temperature' {0 : 250, 1.0 : 250};

@Stress {0,0,0,0,0,0};

@ImposedStrain<evolution> 'EXX' {0:0, 1.0 : -1.50365E-04};
@ImposedStrain<evolution> 'EYY' {0:0, 1.0 : -1.54009E-05};
@ImposedStrain<evolution> 'EZZ' {0:0, 1.0 :  2.99382E-04};
@ImposedStrain<evolution> 'EXY' {0:0, 1.0 :  3.97547514e-05};
@ImposedStrain<evolution> 'EXZ' {0:0, 1.0 :  7.15120602e-05};
@ImposedStrain<evolution> 'EYZ' {0:0, 1.0 : 0.0003576288};


// Times
@Times {0, 1. in 100};


@Test<file> '@top_srcdir@/mfront/tests/behaviours/references/monocrystal_dd_cc_irradiation_numericaljacobian.ref' {'SZZ': 10} 2.e-2 ;
@Test<file> '@top_srcdir@/mfront/tests/behaviours/references/monocrystal_dd_cc_irradiation_numericaljacobian.ref' {'omega[4]':26} 2.e-12 ;
