/*!
 * \file   castemmonocrystal_dd_cfc_irradiation.mtest
 * \brief
 * \author jmp
 * \brief  23 mai 2013
 */

@Real 'G'     80000.;
@Real 'nu'    0.3;
@Real 'young' 'G*2.6';

@StiffnessMatrixType 'ConsistentTangentOperator';
@Behaviour<umat> @library@ 'umatmonocrystal_dd_cfc_irradiation';

@MaterialProperty<constant> 'YoungModulus1'     'young';
@MaterialProperty<constant> 'YoungModulus2'     'young';
@MaterialProperty<constant> 'YoungModulus3'     'young';
@MaterialProperty<constant> 'PoissonRatio12'       'nu';
@MaterialProperty<constant> 'PoissonRatio13'       'nu';
@MaterialProperty<constant> 'PoissonRatio23'       'nu';
@MaterialProperty<constant> 'ShearModulus12'    'G';
@MaterialProperty<constant> 'ShearModulus13'    'G';
@MaterialProperty<constant> 'ShearModulus23'    'G';
@MaterialProperty<constant> 'ThermalExpansion1' 0.;
@MaterialProperty<constant> 'ThermalExpansion2' 0.;
@MaterialProperty<constant> 'ThermalExpansion3' 0.;
@MaterialProperty<constant> 'MassDensity'       0.;
@MaterialProperty<constant> 'V1X'   1.;
@MaterialProperty<constant> 'V1Y'   0.;
@MaterialProperty<constant> 'V1Z'   0.;
@MaterialProperty<constant> 'V2X'   0.;
@MaterialProperty<constant> 'V2Y'   1.;
@MaterialProperty<constant> 'V2Z'   0.;

@MaterialProperty<constant> 'tauf'   80.;
@MaterialProperty<constant> 'y'      2.5E-7;
@MaterialProperty<constant> 'pn'     20.;
@MaterialProperty<constant> 'gamma0' 1.E-3;
@MaterialProperty<constant> 'a'      0.13;
@MaterialProperty<constant> 'b'      0.005;
@MaterialProperty<constant> 'rhoref' 1.E6;
@MaterialProperty<constant> 'alpha'  0.35;
@MaterialProperty<constant> 'beta'   2.54E-7;
@MaterialProperty<constant> 'Mu'     'G';
@MaterialProperty<constant> 'RHO_VOID' 1.E3 ;
@MaterialProperty<constant> 'PHI_LOOP' 5.9E-6;
@MaterialProperty<constant> 'ALP_VOID' 0. ;
@MaterialProperty<constant> 'ALP_LOOP' 0.1;
@MaterialProperty<constant> 'RHO_SAT'  0. ;
@MaterialProperty<constant> 'PHI_SAT'  4.E-2;
@MaterialProperty<constant> 'XI_IRRA'  10. ;
@MaterialProperty<constant> 'DZ_IRRA'  1.E7 ;

@Real 'rho0'       '1.e5*2.54e-7*2.54e-7' ;
@Real 'ome_loops0' '7.4e13*2.54e-7*2.54e-7' ;
@Real 'phi_voids0' '1.e-3' ;

@InternalStateVariable 'omega[0]'  'rho0';
@InternalStateVariable 'omega[1]'  'rho0';
@InternalStateVariable 'omega[2]'  'rho0';
@InternalStateVariable 'omega[3]'  'rho0';
@InternalStateVariable 'omega[4]'  'rho0';
@InternalStateVariable 'omega[5]'  'rho0';
@InternalStateVariable 'omega[6]'  'rho0';
@InternalStateVariable 'omega[7]'  'rho0';
@InternalStateVariable 'omega[8]'  'rho0';
@InternalStateVariable 'omega[9]'  'rho0';
@InternalStateVariable 'omega[10]' 'rho0';
@InternalStateVariable 'omega[11]' 'rho0';

@InternalStateVariable 'ome_loops[0]'  'ome_loops0';
@InternalStateVariable 'ome_loops[1]'  'ome_loops0';
@InternalStateVariable 'ome_loops[2]'  'ome_loops0';
@InternalStateVariable 'ome_loops[3]'  'ome_loops0';
@InternalStateVariable 'ome_loops[4]'  'ome_loops0';
@InternalStateVariable 'ome_loops[5]'  'ome_loops0';
@InternalStateVariable 'ome_loops[6]'  'ome_loops0';
@InternalStateVariable 'ome_loops[7]'  'ome_loops0';
@InternalStateVariable 'ome_loops[8]'  'ome_loops0';
@InternalStateVariable 'ome_loops[9]'  'ome_loops0';
@InternalStateVariable 'ome_loops[10]' 'ome_loops0';
@InternalStateVariable 'ome_loops[11]' 'ome_loops0';


@InternalStateVariable 'phi_voids[0]'  'phi_voids0';
@InternalStateVariable 'phi_voids[1]'  'phi_voids0';
@InternalStateVariable 'phi_voids[2]'  'phi_voids0';
@InternalStateVariable 'phi_voids[3]'  'phi_voids0';
@InternalStateVariable 'phi_voids[4]'  'phi_voids0';
@InternalStateVariable 'phi_voids[5]'  'phi_voids0';
@InternalStateVariable 'phi_voids[6]'  'phi_voids0';
@InternalStateVariable 'phi_voids[7]'  'phi_voids0';
@InternalStateVariable 'phi_voids[8]'  'phi_voids0';
@InternalStateVariable 'phi_voids[9]'  'phi_voids0';
@InternalStateVariable 'phi_voids[10]' 'phi_voids0';
@InternalStateVariable 'phi_voids[11]' 'phi_voids0';

@ExternalStateVariable 'Temperature' 293.15;

@ImposedStrain 'EZZ' {0.: 0., 1. : 0.05 };

@Times {0.,0.2 in 100, 1. in 100};

@Test<file> '@top_srcdir@/mfront/tests/behaviours/references/monocrystal_dd_cfc_irradiation.ref' {'SZZ':10} 4.e-3 ;
@Test<file> '@top_srcdir@/mfront/tests/behaviours/references/monocrystal_dd_cfc_irradiation.ref' {'omega[0]':22} 4.e-8 ;
