/*!
 * \file  mono_dd_cfc.mtest
 * \brief
 * \author jmp
 * \brief 23 mai 2013
 */

@StiffnessMatrixType 'ConsistentTangentOperator';

@Real 'G'     80000.;
@Real 'nu'    0.3;
@Real 'young' 'G*2.6';

@Behaviour<umat> @library@ 'umatmonocrystal_dd_cfc_numericaljacobian';

@MaterialProperty<constant> 'YoungModulus1'     'young';
@MaterialProperty<constant> 'YoungModulus2'     'young';
@MaterialProperty<constant> 'YoungModulus3'     'young';
@MaterialProperty<constant> 'PoissonRatio12'       'nu';
@MaterialProperty<constant> 'PoissonRatio13'       'nu';
@MaterialProperty<constant> 'PoissonRatio23'       'nu';
@MaterialProperty<constant> 'ShearModulus12'    'G';
@MaterialProperty<constant> 'ShearModulus13'    'G';
@MaterialProperty<constant> 'ShearModulus23'    'G';
@MaterialProperty<constant> 'ThermalExpansion1' 0.;
@MaterialProperty<constant> 'ThermalExpansion2' 0.;
@MaterialProperty<constant> 'ThermalExpansion3' 0.;
@MaterialProperty<constant> 'MassDensity'       0.;
@MaterialProperty<constant> 'V1X'   1.;
@MaterialProperty<constant> 'V1Y'   0.;
@MaterialProperty<constant> 'V1Z'   0.;
@MaterialProperty<constant> 'V2X'   0.;
@MaterialProperty<constant> 'V2Y'   1.;
@MaterialProperty<constant> 'V2Z'   0.;

@MaterialProperty<constant> 'tauf'   105.;
@MaterialProperty<constant> 'y'      2.5e-7;
@MaterialProperty<constant> 'pn'     5.;
@MaterialProperty<constant> 'gamma0' 1.e-3;
@MaterialProperty<constant> 'a'      0.13;
@MaterialProperty<constant> 'b'      0.005;
@MaterialProperty<constant> 'rhoref' 1.E6;
@MaterialProperty<constant> 'alpha'  0.35;
@MaterialProperty<constant> 'beta'   2.54e-7;
@MaterialProperty<constant> 'Mu'     'G';

@Real 'rho0' '1.e6*beta*beta' ;

@InternalStateVariable 'omega[0]'  'rho0';
@InternalStateVariable 'omega[1]'  'rho0';
@InternalStateVariable 'omega[2]'  'rho0';
@InternalStateVariable 'omega[3]'  'rho0';
@InternalStateVariable 'omega[4]'  'rho0';
@InternalStateVariable 'omega[5]'  'rho0';
@InternalStateVariable 'omega[6]'  'rho0';
@InternalStateVariable 'omega[7]'  'rho0';
@InternalStateVariable 'omega[8]'  'rho0';
@InternalStateVariable 'omega[9]'  'rho0';
@InternalStateVariable 'omega[10]' 'rho0';
@InternalStateVariable 'omega[11]' 'rho0';

@ExternalStateVariable 'Temperature' 293.15;

@ImposedStress 'SZZ' {0.: 0., 1. : 550. };

@Times {0.,1. in 1000};

@Test<file> '@top_srcdir@/mfront/tests/behaviours/references/monocrystal_dd_cfc.ref' {'EZZ':4}       1.e-6;
@Test<file> '@top_srcdir@/mfront/tests/behaviours/references/monocrystal_dd_cfc.ref' {'omega[0]':22} 1.e-10;
