/*!
 * \file   norton2.mtest
 * \brief
 * \author Helfer Thomas
 * \brief  09 avril 2013
 */

@ModellingHypothesis 'GeneralisedPlaneStrain';

@PredictionPolicy 'ElasticPrediction';
@StiffnessMatrixType 'ConsistentTangentOperator';

@Behaviour<umat> @library@ 'umatnorton';
@MaterialProperty<constant> 'YoungModulus'     150.e9;
@MaterialProperty<constant> 'PoissonRatio'       0.3;
@MaterialProperty<constant> 'MassDensity'        0.;
@MaterialProperty<constant> 'ThermalExpansion'   0.;
@Real 'A' 8.e-67;
@Real 'E' 8.2;
@MaterialProperty<constant> 'NortonCoefficient' 'A';
@MaterialProperty<constant> 'NortonExponent' 'E';

@Real 'tmax' 2500;
@Real 'emax' 2.5e-2;
@ImposedStrain<function> 'EXX' 'emax/tmax*t';
@ExternalStateVariable 'Temperature' 293.15;

@Times {0.,100. in 10, 'tmax' in 100};
