@Author th202608;
@Date   28 janv. 2016;
@Description{

};

@MaximumNumberOfSubSteps 100;
@OutputFilePrecision 14;
@OutputFrequency 'EveryPeriod';
@DynamicTimeStepScaling true;
@MinimalTimeStep 1.e-3;
@MaximalTimeStep 400;
@MinimalTimeStepScalingFactor 0.1;
@MaximalTimeStepScalingFactor 1.2;

@PredictionPolicy 'LinearPrediction';
@StiffnessMatrixType 'ConsistentTangentOperator';
@Behaviour<castem> @library@ 'umatnorton2';
@MaterialProperty<constant> 'YoungModulus'     150.e9;
@MaterialProperty<constant> 'PoissonRatio'       0.3;

@Real 'tmax' 2500;
@Real 'emax' 2.5e-2;
@ImposedStrain 'EZZ' {0.:0.,'tmax':'emax','2*tmax':'4*emax'};
@ExternalStateVariable 'Temperature' 293.15;

@Times {0.,'2*tmax' };
@Test<file> '@top_srcdir@/mfront/tests/behaviours/references/tssf2.ref' {'EquivalentViscoplasticStrain':20} 1.e-10 ;
