@Author Jeremy Hure;
@Date 08 Aout 2013;

@Behaviour<umat> @library@ 'umatviscoplasisocin';
@StiffnessMatrixType 'ConsistentTangentOperator';

@MaterialProperty<constant> 'YoungModulus' 200000.;
@MaterialProperty<constant> 'PoissonRatio' 0.3;
@MaterialProperty<constant> 'MassDensity' 0.;
@MaterialProperty<constant> 'ThermalExpansion' 0.;

@ExternalStateVariable 'Temperature' 0.;

@MaterialProperty<constant> 'R0' 600.;
@MaterialProperty<constant> 'Q1' 300.;
@MaterialProperty<constant> 'b1' 1.;
@MaterialProperty<constant> 'Q2' 300.;
@MaterialProperty<constant> 'b2' 10.;
@MaterialProperty<constant> 'C1' 1000.;
@MaterialProperty<constant> 'D1' 5.;
@MaterialProperty<constant> 'C2' 0.;
@MaterialProperty<constant> 'D2' 0.;
@MaterialProperty<constant> 'k1' 80.;
@MaterialProperty<constant> 'n1' 10.;
@MaterialProperty<constant> 'k2' 0.2;
@MaterialProperty<constant> 'n2' 1.;

@ImposedStrain<function> 'EXX' 'min(t*0.0005,0.2-t*0.0005)';
@Times {0.,400 in 2000};

@Test<function> 'SYY'  '0' 1.e-3;
@Test<function> 'SZZ'  '0' 1.e-3;
@Test<function> 'SXY'  '0' 1.e-3;
@Test<function> 'SXZ'  '0' 1.e-3;
@Test<function> 'SYZ'  '0' 1.e-3;

@Test<function> 'EXY'  '0' 1.e-3;
@Test<function> 'EXZ'  '0' 1.e-3;
@Test<function> 'EYZ'  '0' 1.e-3;

@Test<file> '@top_srcdir@/mfront/tests/behaviours/references/viscoplasisocin.ref' {'SXX':8} 1.e-3 ;
