/*!
 * \file   ddif2-2.mtest
 * \brief
 * \author Helfer Thomas
 * \brief  09 avril 2013
 */

@MaximumNumberOfSubSteps 1;
@AccelerationAlgorithm 'Crossed2Deltabis';

@Behaviour<umat> @library@ 'umatddif2';
@MaterialProperty<constant> 'YoungModulus'     150.e9;
@MaterialProperty<constant> 'PoissonRatio'       0.3;
@MaterialProperty<constant> 'ThermalExpansion'   0.;
@MaterialProperty<constant> 'FractureStress' 150e6; /* rupture stress */
@MaterialProperty<constant> 'NortonCoefficient'  0.;
@MaterialProperty<constant> 'NortonExponent'     1.;

@ExternalStateVariable 'Temperature' {0:293.15,3600.:800};

@ImposedStrain 'EZZ' {0:0,1:1.5e-3,2:0,3:-1e-3,4:0,5:3.e-3};

@Times {0.,5 in 50};

@Test<file> '@top_srcdir@/mfront/tests/behaviours/references/ddif2-uniaxialtesting.ref' {'SZZ':9} 1.e-3 ;
@Test<function> {'SXX':'0.','SYY':'0.','SXY':'0.','SXZ':'0.','SYZ':'0.'} 1.e-2;
