/*!
 * \file   elasticity20.mtest
 * \brief
 * \author Helfer Thomas
 * \brief  09 avril 2013
 */

@ModellingHypothesis 'AxisymmetricalGeneralisedPlaneStrain';
@Behaviour<cyrano> @library@ 'cyranoelasticity3';

@Real 'E'  150.e9;
@Real 'nu'   0.3333;
@Real 'Tref' 273.15;
@Real 'Ti'   1800.;
@Evolution 'T'  {0:'Ti',3600.:800};
@Parameter 'referenceTemperatureForThermalExpansion' 'Ti';

@MaterialProperty<constant> 'YoungModulus'     'E';
@MaterialProperty<constant> 'PoissonRatio'     'nu';

@ExternalStateVariable<function> 'Temperature' 'T';

@ImposedStrain 'ERR' 0.;
@ImposedStrain 'EZZ' 0.;
@ImposedStrain 'ETT' 0.;

@Times {0.,3600 in 20};

@Evolution<function> 'a_Ti' '2.e-5*(1+(Ti-273.15)/500)';
@Evolution<function> 'a'    '2.e-5*(1+(T-273.15)/500)';

@Evolution<function> 'dl_l' '1/(1+a_Ti*(Ti-Tref))*(a*(T-Tref)-a_Ti*(Ti-Tref))' ;

@Test<function> 'SRR' '-E/(1-2*nu)*dl_l'  1.e-3;
@Test<function> 'SZZ' '-E/(1-2*nu)*dl_l'  1.e-3;
@Test<function> 'STT' '-E/(1-2*nu)*dl_l'  1.e-3;
