@Author Helfer Thomas;
@Date  06/08/2016;
@Description{
  "This test checks that an isotropic swelling is correctly "
  "taken into account."
};

@ModellingHypothesis 'AxisymmetricalGeneralisedPlaneStrain';
@Behaviour<cyrano> @library@ 'cyranoisotropicvolumeswelling';

@MaterialProperty<constant> 'YoungModulus' 150.e9;
@MaterialProperty<constant> 'PoissonRatio'   0.3;

@ExternalStateVariable 'Temperature' 293.15;
@ExternalStateVariable 'VolumeSwelling' {0:0,3600:1.e-2};

@ImposedStrain 'ERR' 0.;
@ImposedStrain 'EZZ' 0.;
@ImposedStrain 'ETT' 0.;

@Times {0.,3600 in 20};

@Test<function> 'SRR' '-YoungModulus/(1-2*PoissonRatio)*VolumeSwelling/3'  1.e-3;
@Test<function> 'SZZ' '-YoungModulus/(1-2*PoissonRatio)*VolumeSwelling/3'  1.e-3;
@Test<function> 'STT' '-YoungModulus/(1-2*PoissonRatio)*VolumeSwelling/3'  1.e-3;
