@Author Helfer Thomas;
@Date   2/09/2015;
@Description{
  This test checks that an exception is throw
  when a material property is out its physical
  bounds.
};

@MaximumNumberOfSubSteps 1;
@ModellingHypothesis 'AxisymmetricalGeneralisedPlaneStrain';
@Behaviour<cyrano> @library@ 'cyranomaterialpropertiesboundscheck';
@OutOfBoundsPolicy 'None';
@MaterialProperty<constant> 'YoungModulus'  150.e9;
@MaterialProperty<constant> 'PoissonRatio'   -2;

@ExternalStateVariable 'Temperature' 293.15;

@Times {0.,1};
