/*!
 * \file   cyranonorton_LogarithmicStrain1DWrapper-uniaxialloading-2-1D.mtest
 * \brief
 * \author Helfer Thomas
 * \brief  11 dec. 2013
 */

@ModellingHypothesis 'AxisymmetricalGeneralisedPlaneStrain';
@MaximumNumberOfSubSteps 1;

@Behaviour<cyrano> @library@ 'cyranologarithmicstrainnortoncreep';
@StrainEpsilon 1.e-10;
@StressEpsilon 2.e3;

@Parameter 'theta' 0.5;

@MaterialProperty<constant> 'YoungModulus'      80.e9;
@MaterialProperty<constant> 'PoissonRatio'       0.35;
@MaterialProperty<constant> 'A' '0.003944e-6**4.39';
@MaterialProperty<constant> 'E' 4.39;

@ImposedDrivingVariable 'ETT' {0:0.,1.:3.5};

@ExternalStateVariable 'Temperature' 293.15;

@Times {0.,1 in 500};

@Test<file> '@top_srcdir@/mfront/tests/behaviours/references/norton_log1D-uniaxialtesting.ref' {'EquivalentViscoplasticStrain':11} 1e-5;
@Test<function> {'SRR':'0','SZZ':'0'}           1.e3;
