@Author Thomas Helfer;
@Date   19/11/2021;
@Description{
  Test support of tensorial external state variables.
};

@MaximumNumberOfSubSteps 1;
@ModellingHypothesis 'AxisymmetricalGeneralisedPlaneStrain';
@Behaviour<cyrano> @library@ 'cyranotensorialexternalstatevariabletest';

// material properties
@MaterialProperty<constant> 'YoungModulus' 150e9;
@MaterialProperty<constant> 'PoissonRatio' 0.3;

@InternalStateVariable 'v_isv' {2};
@InternalStateVariable 'v2_isv[0]' {3};
@InternalStateVariable 'v2_isv[1]' {0};
@InternalStateVariable 's_isv' {0, 1, 2};
@InternalStateVariable 's2_isv[0]' {0, 2, 0};
@InternalStateVariable 's2_isv[1]' {0, 2, 0};
@InternalStateVariable 't_isv' {0, 1, 2};
@InternalStateVariable 't2_isv[0]' {0, 2, 0};
@InternalStateVariable 't2_isv[1]' {0, 2, 0};

// External state variable
@ExternalStateVariable 'Temperature' 293.15;
// Vectorial external state variables
@ExternalStateVariable<function> 'v_esv' {'2'};
@ExternalStateVariable<function> 'v2_esv[0]R'  '3';
@ExternalStateVariable<function> 'v2_esv[1]' {'5*t'};
// Symmetric tensors external state variables
@ExternalStateVariable<function> 's_esv' {'0', '1', '2'};
@ExternalStateVariable<function> 's2_esv[0]RR'  '0';
@ExternalStateVariable<function> 's2_esv[0]TT'  '2';
@ExternalStateVariable<function> 's2_esv[0]ZZ'  't';
@ExternalStateVariable<function> 's2_esv[1]' {'0',     '1', '2'};
// Tensors external state variables
@ExternalStateVariable<function> 't_esv' {'0', '1', '2'};
@ExternalStateVariable<function> 't2_esv[0]RR'  '0';
@ExternalStateVariable<function> 't2_esv[0]TT'  '2';
@ExternalStateVariable<function> 't2_esv[0]ZZ'  't';
@ExternalStateVariable<function> 't2_esv[1]' {'0', '1', '2'};

@Times{0, 1};// in 10};
//
@Test<function> {'v_isvR' : 'v_esvR'} 1.e-14;
@Test<function> {'v2_isv[0]R' : 'v2_esv[0]R'} 1.e-14;
@Test<function> {'v2_isv[1]R' : 'v2_esv[1]R'} 1.e-14;
//
@Test<function> {'s_isvRR' : 's_esvRR',
                 's_isvTT' : 's_esvTT',
                 's_isvZZ' : 's_esvZZ'} 1.e-14;
@Test<function> {'s2_isv[0]RR' : 's2_esv[0]RR',
                 's2_isv[0]TT' : 's2_esv[0]TT',
                 's2_isv[0]ZZ' : 's2_esv[0]ZZ'} 1.e-14;
@Test<function> {'s2_isv[1]RR' : 's2_esv[1]RR',
                 's2_isv[1]TT' : 's2_esv[1]TT',
                 's2_isv[1]ZZ' : 's2_esv[1]ZZ'} 1.e-14;
//
@Test<function> {'t_isvRR' : 't_esvRR',
                 't_isvTT' : 't_esvTT',
                 't_isvZZ' : 't_esvZZ'} 1.e-14;
@Test<function> {'t2_isv[0]RR' : 't2_esv[0]RR',
                 't2_isv[0]TT' : 't2_esv[0]TT',
                 't2_isv[0]ZZ' : 't2_esv[0]ZZ'} 1.e-14;
@Test<function> {'t2_isv[1]RR' : 't2_esv[1]RR',
                 't2_isv[1]TT' : 't2_esv[1]TT',
                 't2_isv[1]ZZ' : 't2_esv[1]ZZ'} 1.e-14;
