@Author Helfer Thomas;
@Date   2/09/2015;
@Description{
  This test checks that an exception is throw
  when a state variable is out its physical
  bounds at the beginning of the time step.
};

@MaximumNumberOfSubSteps 1;
@Behaviour<dianafea> @library@ 'StateVariablesBoundsCheck';
@InternalStateVariable 'StateVariable' -0.1;
@ExternalStateVariable 'Temperature' 293.15;

@Times {0.,1};
