@Author Thomas Helfer;
@Date   24/08/2022;
@Description{
  This test checks that an initialization failure
  is correctly taken into account
};

@MaximumNumberOfSubSteps 1;
@Behaviour<epx> @library@ 'InitializationFailureTest';
@ExternalStateVariable 'Temperature' 293.15;

@ImposedDeformationGradient 'FYX' 0.;
@ImposedDeformationGradient 'FXZ' 0.;
@ImposedDeformationGradient 'FZX' 0.;
@ImposedDeformationGradient 'FYZ' 0.;
@ImposedDeformationGradient 'FZY' 0.;

@Times {0., 1};
