/*!
 * \file   anisotropiclemaitreviscoplasticbehaviour.mtest
 * \brief  Loi de Lemaître anisotrope
 * \author jmp
 * \brief  11 avril 2014
 */

@AccelerationAlgorithm 'FAnderson';
@Behaviour<umat> @library@ 'umatanistropiclemaitreviscoplasticbehaviour';

@Real 'young' 80000.;
@Real 'nu'    0.35;
@Real 'G'     'young/(2*(1+nu))';

@MaterialProperty<constant> 'YoungModulus1'  'young';
@MaterialProperty<constant> 'YoungModulus2'  'young';
@MaterialProperty<constant> 'YoungModulus3'  'young';
@MaterialProperty<constant> 'PoissonRatio12'    'nu';
@MaterialProperty<constant> 'PoissonRatio13'    'nu';
@MaterialProperty<constant> 'PoissonRatio23'    'nu';
@MaterialProperty<constant> 'ShearModulus12'     'G';
@MaterialProperty<constant> 'ShearModulus13'     'G';
@MaterialProperty<constant> 'ShearModulus23'     'G';

@MaterialProperty<constant> 'YoungModulus' 'young';
@MaterialProperty<constant> 'PoissonRatio' 'nu';

@MaterialProperty<constant> 'a[0]' 2.4 ;
@MaterialProperty<constant> 'a[1]' 0.2 ;
@MaterialProperty<constant> 'a[2]' 9.4 ;

@MaterialProperty<constant> 'm[0]' 0. ;
@MaterialProperty<constant> 'm[1]' 0.80E-04 ;
@MaterialProperty<constant> 'm[2]' 0.99E-04 ;

@MaterialProperty<constant> 'pn[0]' 4.4 ;
@MaterialProperty<constant> 'pn[1]' 3.0 ;
@MaterialProperty<constant> 'pn[2]' 6.1 ;

@MaterialProperty<constant> 'Q[0]' 19900. ;
@MaterialProperty<constant> 'Q[1]' 21000. ;
@MaterialProperty<constant> 'Q[2]' 6200. ;

@MaterialProperty<constant> 'M1[0]' 1. ;
@MaterialProperty<constant> 'M1[1]' 1. ;
@MaterialProperty<constant> 'M1[2]' 1. ;
@MaterialProperty<constant> 'M1[3]' 0.75 ;
@MaterialProperty<constant> 'M1[4]' 0.75 ;
@MaterialProperty<constant> 'M1[5]' 0.75 ;

@MaterialProperty<constant> 'M3[0]' 1. ;
@MaterialProperty<constant> 'M3[1]' 1. ;
@MaterialProperty<constant> 'M3[2]' 1. ;
@MaterialProperty<constant> 'M3[3]' 0.75 ;
@MaterialProperty<constant> 'M3[4]' 0.75 ;
@MaterialProperty<constant> 'M3[5]' 0.75 ;


@ExternalStateVariable 'Temperature'  700. ;

@ExternalStateVariable 'ALPHPUR'  1. ;
@ExternalStateVariable 'ALPHBETA' 0. ;

@Evolution<function> 'TC' 'Temperature';

@Real 'e1' '1.6875e-3*1.414';
@Real 'e2' '8.4375e-4*1.414';
@Real 'e3' '2.53125e-3*1.414';


@ImposedStrain 'EXY' { 0.0: 0.0, 0.625 : 'e1', 1.25 :'e2', 1.875:'e3',
2.5: 0.0, 3.125: '-e3', 3.75: '-e2' , 4.375:'-e1' , 5.0: 0.0};

@ImposedStrain 'EXZ' {0.0: 0.0, 0.625: '-e2', 1.25: 'e2', 1.875: 'e1',
2.5: 0.0, 3.125: '-e1', 3.75: '-e2', 4.375: 'e2', 5.0: 0.0};

@ImposedStrain 'EYZ' {0.0: 0.0, 0.625: 0.0, 1.25: 'e1', 1.875: '-e2',
2.5: 0.0, 3.125: 'e2', 3.75: '-e1', 4.375: 0.0, 5.0: 0.0 };

@ImposedStrain 'EXX' { 0.: 0.0, 10. : 0 };
@ImposedStrain 'EYY' { 0.: 0.0, 10. : 0 };
@ImposedStrain 'EZZ' { 0.: 0.0, 10. : 0 };


@Times { 0.0, 0.625 in 5, 1.25 in 5, 1.875 in 5,
2.5 in 5, 3.125 in 5, 3.75in 5, 4.375 in 5 , 5.0 in 5};

@Test<file> '@top_srcdir@/mfront/tests/behaviours/references/AnistropicLemaitreViscoplasticBehaviour.ref' {'SXY':31} 3.e-2 ;
@Test<file> '@top_srcdir@/mfront/tests/behaviours/references/AnistropicLemaitreViscoplasticBehaviour.ref' {'SXZ':32} 3.e-2 ;
@Test<file> '@top_srcdir@/mfront/tests/behaviours/references/AnistropicLemaitreViscoplasticBehaviour.ref' {'SYZ':33} 3.e-2 ;
