@AccelerationAlgorithm 'FAnderson';
@Behaviour<umat> @library@ 'umatgeneralizedmaxwell';

@MaterialProperty<constant> 'YoungModulus' 5.e9;
@MaterialProperty<constant> 'PoissonRatio'  0.25;

@MaterialProperty<constant> 'BulkModulus'  3.58873e9;
@MaterialProperty<constant> 'ShearModulus' 3.10474e9;

@Real 'one_day' '3600.*24.';
// First viscolastic flow
@MaterialProperty<constant> 'ViscoelasticBulkModulus[0]'  6.4781e9;
@MaterialProperty<constant> 'ViscoelasticShearModulus[0]' 3.0942e9;
@MaterialProperty<constant> 'TimeScale[0]' '2.*one_day';
// Second viscolastic flow
@MaterialProperty<constant> 'ViscoelasticBulkModulus[1]'  7.51552e9;
@MaterialProperty<constant> 'ViscoelasticShearModulus[1]' 3.16435e9;
@MaterialProperty<constant> 'TimeScale[1]' '20.*one_day';
// Third viscolastic flow
@MaterialProperty<constant> 'ViscoelasticBulkModulus[2]'  5.10283e9;
@MaterialProperty<constant> 'ViscoelasticShearModulus[2]' 3.15347e9;
@MaterialProperty<constant> 'TimeScale[2]' '200.*one_day';

@ExternalStateVariable 'Temperature' 293.15;

@Real 'p' -25.8e6;
@ImposedStress 'SZZ' 'p';
// Initial value of the elastic strain
@Real 'EELZZ0' 'p/YoungModulus';
@Real 'EELXX0' '-PoissonRatio*EELZZ0';
// Initial value of the total strain
@Strain {'EELXX0','EELXX0','EELZZ0',0.,0.,0.};
// Initial value of the stresses
@Stress {0.,0.,'p',0.,0.,0.};

@Times{ 0.,10.,  10000., 100000. in 10, 1.e6 in 20, 1.e7 in 20,
  2.592e7 in 30};

@Test<file> '@top_srcdir@/mfront/tests/behaviours/references/generalizedmaxwell.ref' {'EZZ':4} 1.e-8;
