@XMLOutputFile @xml_output@;
@Behaviour @library@ 'PoroPlasticity';

@MaximumNumberOfSubSteps 1;

@MaterialProperty<constant> 'k' 100.e6;
@MaterialProperty<constant> 'mu' 100.e6;
@MaterialProperty<constant> 'biot' 1.;
@MaterialProperty<constant> 'Nbiot' 1.e9;
@MaterialProperty<constant> 'pc0' 1.e6;
@MaterialProperty<constant> 'h' 1.e6;

@ExternalStateVariable 'Temperature' {0:0};

@ImposedThermodynamicForce 'Pressure' {0:0, 1: 1.e6, 2: 1.e6};
@ImposedGradient 'StrainXX' {0:0, 1:-1.e-2, 2:-5.e-2};

@Times {0, 1 in 50, 2 in 50};

@Test<file> @reference_file@ {
  'PorosityVariation' : 8
}
1e-10;

@Test<function> {
  'StrainXY' : '0',
  'StrainXY' : '0',
  'StrainXY' : '0'
}
1e-12;
@Test<file> @reference_file@ {
  'StressYY' : 10, 'StressZZ' : 11, 'StressXY' : 12, 'StressXZ' : 13,
      'StressYZ' : 14
}
1e-5;
@Test<file> @reference_file@ {
  'ElasticPorosity' : 22,
  'CumPlastStrain' : 23
}
1e-10;
