@Author Thomas Helfer;
@Date   27/07/2018;

@Description{
  "Test of the Elasticity4 behaviour which describes "
  "a simple isotropic elastic behaviour whose stiffness "
  "tensor is defined using the `@ComputeStiffnessTensor` "
  "keyword."
};

@XMLOutputFile @xml_output@;
@MaximumNumberOfSubSteps 1;
@Behaviour<generic> @library@ 'Elasticity10';

@ExternalStateVariable 'Temperature' 293.15;
@ImposedStrain<function> 'EXX' '1.e-3*sin(t/900.)';

@Times {0.,3600 in 20};

// stresses
@Real 'E'  7.8e+10;
@Real 'nu' 0.39991;
@Test<function> 'SXX' 'E*EXX' 1.e-3;
@Test<function> 'SYY' '0.'    1.e-3;
@Test<function> 'SZZ' '0.'    1.e-3;
@Test<function> 'SXY' '0.'    1.e-3;
@Test<function> 'SXZ' '0.'    1.e-3;
@Test<function> 'SYZ' '0.'    1.e-3;
// strains
@Test<function> 'EYY' '-nu*EXX' 1.e-8;
@Test<function> 'EZZ' '-nu*EXX' 1.e-8;
@Test<function> 'EXY' '0.' 1.e-8;
@Test<function> 'EXZ' '0.' 1.e-8;
@Test<function> 'EYZ' '0.' 1.e-8;
