@Author Thomas Helfer;
@Date   27/07/2018;

@ModellingHypothesis 'PlaneStress';
@XMLOutputFile @xml_output@;
@MaximumNumberOfSubSteps 1;
@Behaviour<generic> @library@ 'OrthotropicElastic';

@MaterialProperty<constant> 'YoungModulus1'     100.e9;
@MaterialProperty<constant> 'YoungModulus2'     100.e9;
@MaterialProperty<constant> 'YoungModulus3'     100.e9;
@MaterialProperty<constant> 'PoissonRatio12'      0.3;
@MaterialProperty<constant> 'PoissonRatio13'      0.3;
@MaterialProperty<constant> 'PoissonRatio23'      0.3;
@MaterialProperty<constant> 'ShearModulus12'    100.e9;
@MaterialProperty<constant> 'ThermalExpansion1'   0.;
@MaterialProperty<constant> 'ThermalExpansion2'   0.;
@MaterialProperty<constant> 'ThermalExpansion3'   0.;

@ExternalStateVariable 'Temperature' 293.15;

@ImposedStress 'SXX' {0.:0.,1:50.e6};

@Times {0.,1.};

@Test<function> {'EXX':'SXX/YoungModulus1',
    'EYY':'-PoissonRatio12*SXX/YoungModulus1',
    'EXY':'0.'} 1.e-12;
