/*!
 * \file    finiterotationsmallstrainelasticity2-shear-3-3D.mtest
 * \brief
 * \author Helfer Thomas
 * \brief  26 nov. 2013
 */

@MaximumNumberOfSubSteps 1;
@Behaviour<generic> @library@ 'FiniteRotationSmallStrainElasticity2' {
  stress_measure : @stress_measure@, tangent_operator : @tangent_operator@
};
@MaterialProperty<constant> 'YoungModulus'     215.e9;
@MaterialProperty<constant> 'PoissonRatio'       0.3;

@ImposedDrivingVariable 'FXX' 1.;
@ImposedDrivingVariable 'FYY' 1.;
@ImposedDrivingVariable 'FZZ' 1.;
@ImposedDrivingVariable 'FXY' 0.;
@ImposedDrivingVariable 'FYX' 0.;
@ImposedDrivingVariable 'FXZ' {0:0.,1.:0.2};
@ImposedDrivingVariable 'FZX' 0.;
@ImposedDrivingVariable 'FYZ' 0.;
@ImposedDrivingVariable 'FZY' 0.;

@ExternalStateVariable 'Temperature' 293.15;

@Times {0.,1 in 10};

@Real 'lambda' 'PoissonRatio*YoungModulus/((1+PoissonRatio)*(1-2*PoissonRatio))';
@Real 'mu'     'YoungModulus/(2*(1+PoissonRatio))';
@Test<function> {'SXX':'((2*mu+lambda)*FXZ**4+(4*mu+lambda)*FXZ**2)/2'} 1.e-2;
@Test<function> {'SYY':'(lambda*FXZ**2)/2 '} 1.e-2;
@Test<function> {'SZZ':'((2*mu+lambda)*FXZ**2)/2'} 1.e-2;
@Test<function> {'SXZ':'sqrt(2)*((2*mu+lambda)*FXZ**3+2*mu*FXZ)/2'} 1.e-2;
@Test<function> {'SXY':'0.','SYZ':'0.'} 1.e-2;
