/*!
 * \file   astersinglecrystal.mtest
 * \brief
 * \author jmp
 * \brief 20 mai 2013
 */

@XMLOutputFile @xml_output@;
@MaximumNumberOfSubSteps 1;
@PredictionPolicy 'LinearPrediction';

@Real 'young' 208000.;
@Real 'nu'    0.3;
@Real 'G'     'young/2.6';

@Behaviour<generic> @library@ 'FiniteStrainSingleCrystal_NumericalJacobian_WithCorrections' {
  stress_measure : @stress_measure@, tangent_operator : @tangent_operator@
};

@MaterialProperty<constant> 'YoungModulus1'     'young';
@MaterialProperty<constant> 'YoungModulus2'     'young';
@MaterialProperty<constant> 'YoungModulus3'     'young';
@MaterialProperty<constant> 'PoissonRatio12'       'nu';
@MaterialProperty<constant> 'PoissonRatio13'       'nu';
@MaterialProperty<constant> 'PoissonRatio23'       'nu';
@MaterialProperty<constant> 'ShearModulus12'    'young';
@MaterialProperty<constant> 'ShearModulus13'    'young';
@MaterialProperty<constant> 'ShearModulus23'    'young';
@MaterialProperty<constant> 'm'      10.0;
@MaterialProperty<constant> 'K'      25.0;
@MaterialProperty<constant> 'C'      14363.;
@MaterialProperty<constant> 'R0'     66.62;
@MaterialProperty<constant> 'Q'      11.43;
@MaterialProperty<constant> 'b'      2.1;
@MaterialProperty<constant> 'd1'     494.0;

@ExternalStateVariable 'Temperature' 293.15;

@InternalStateVariable 'Fe' {1.,1.,1.,
                             0.,0.,0.,
                             0.,0.,0.};

@ImposedDeformationGradient 'FZZ' {0.: 1., 2.0E-1 : 1.2 };
@ImposedDeformationGradient 'FXX' 1;
@ImposedDeformationGradient 'FYY' 1;
@ImposedDeformationGradient 'FXY' 0;
@ImposedDeformationGradient 'FYX' 0;
@ImposedDeformationGradient 'FXZ' 0;
@ImposedDeformationGradient 'FZX' 0;
@ImposedDeformationGradient 'FYZ' 0;
@ImposedDeformationGradient 'FZY' 0;

@RotationMatrix {{ 1.0 , 0 , 0.0 },
                 { 0.0 , 0.89442719099991586 ,  -0.44721359549995793},
                 { 0.0 , 0.44721359549995793,    0.89442719099991586}};

@Times {0.,2.e-1 in 10};

@Test<file> @reference_file@ {'SXX' : 11} 1.e-1;
@Test<file> @reference_file@ {
  'g[0]' : 17,
  'g[1]' : 18,
  'g[2]' : 19,
  'g[3]' : 20,
  'g[4]' : 21,
  'g[5]' : 22,
  'g[6]' : 23,
  'g[7]' : 24,
  'g[8]' : 25,
  'g[9]' : 26,
  'g[10]' : 27,
  'g[11]' : 28
} 1.e-6;
