@Author Tristan Chenaille;
@Date 03/11/2026;

// same test as implicitnorton2.mtest, with the ImplicitNorton2_qt behaviour
@PredictionPolicy 'LinearPrediction';
@XMLOutputFile @xml_output@;
@MaximumNumberOfSubSteps 1;
@Behaviour<generic> @library@ 'ImplicitNorton2_qt';

@MaterialProperty<constant> 'YoungModulus'     150.e9;
@MaterialProperty<constant> 'PoissonRatio'       0.3;

@Real 'sxx' 20e6;
@ImposedStress 'SXX' 'sxx';
// Initial value of the elastic strain
@Real 'EELXX0' 0.00013333333333333333;
@Real 'EELZZ0' -0.00004;
@InternalStateVariable 'ElasticStrain' {'EELXX0','EELZZ0','EELZZ0',0.,0.,0.};
// Initial value of the total strain
@Strain {'EELXX0','EELZZ0','EELZZ0',0.,0.,0.};
// Initial value of the total stresses
@Stress {'sxx',0.,0.,0.,0.,0.};

@ExternalStateVariable 'Temperature' 293.15;

@Times {0.,3600 in 20};

// A * SXX ** E is the creep rate of the two mechanisms
@Real 'A' 8.e-67;
@Real 'E' 8.2;
@Test<function> 'EXX' 'EELXX0+A*SXX**E*t'     1.e-9;
@Test<function> 'EYY' 'EELZZ0-0.5*A*SXX**E*t' 1.e-10;
@Test<function> 'EZZ' 'EELZZ0-0.5*A*SXX**E*t' 1.e-10;
@Test<function> 'EXY' '0.'                    1.e-10;
// tests on internal state variables
@Test<function> 'ElasticStrainXX' 'EELXX0'  1.e-12;
@Test<function> 'ElasticStrainYY' 'EELZZ0'  1.e-12;
@Test<function> 'ElasticStrainZZ' 'EELZZ0'  1.e-12;
@Test<function> 'ElasticStrainXY' '0.'      1.e-12;
@Test<function> 'EquivalentViscoplasticStrain[0]' '0.5*A*SXX**E*t' 1.e-12;
@Test<function> 'EquivalentViscoplasticStrain[1]' '0.5*A*SXX**E*t' 1.e-12;
@Test<function> 'SXX' 'SXX'     1.e-3;
@Test<function> 'SYY' '0.'      1.e-3;
@Test<function> 'SZZ' '0.'      1.e-3;
@Test<function> 'SXY' '0.'      1.e-3;
