/*!
 * \file   castemmieheapellambrechtlogarithmicstrain-uniaxialloading-1-2D.mtest
 * \brief
 * \author Helfer Thomas
 * \brief  4 dec. 2013
 */

@XMLOutputFile @xml_output@;
@ModellingHypothesis 'Axisymmetrical';
@Behaviour<generic> @library@ 'LogarithmicStrainElasticity' {
 stress_measure : @stress_measure@, tangent_operator : @tangent_operator@
};
@MaterialProperty<constant> 'YoungModulus'     215.e9;
@MaterialProperty<constant> 'PoissonRatio'       0.3;

@ImposedDrivingVariable 'FRR' {0:1.,1.:1.};
@ImposedDrivingVariable 'FTT' {0:1.,1.:1.};
@ImposedDrivingVariable 'FZZ' {0:1.,1.:1.};
@ImposedDrivingVariable 'FRZ' {0:0.,1.:0.8};
@ImposedDrivingVariable 'FZR' 0.;

@ExternalStateVariable 'Temperature' 293.15;

@Times {0.,1 in 15};

@Test<file> @reference_file@ {'SRR':7} 1.;
@Test<file> @reference_file@ {'SZZ':8} 1.;
@Test<file> @reference_file@ {'STT':9} 1.;
@Test<file> @reference_file@ {'SRZ':10} 1.;
