/*!
 * \file   castemmieheapellambrechtlogarithmicstrainnorton-uniaxialloading-3-3D.mtest
 * \brief
 * \author Helfer Thomas
 * \brief  4 dec. 2013
 */

@XMLOutputFile @xml_output@;
@MaximumNumberOfSubSteps 1;
@Behaviour<generic> @library@ 'LogarithmicStrainNortonCreep' {
 stress_measure : @stress_measure@, tangent_operator : @tangent_operator@
};
@DrivingVariableEpsilon 4.e-8;
@StressEpsilon          3.5e3;

@MaterialProperty<constant> 'YoungModulus'      80.e9;
@MaterialProperty<constant> 'PoissonRatio'       0.35;
@MaterialProperty<constant> 'A'   '0.003944e-6**4.39';
@MaterialProperty<constant> 'E'   4.39;

@ImposedDrivingVariable 'FZZ' {0:1.,1.:4.5};
@ImposedDrivingVariable 'FXY' 0.;
@ImposedDrivingVariable 'FYX' 0.;
@ImposedDrivingVariable 'FXZ' 0.;
@ImposedDrivingVariable 'FZX' 0.;
@ImposedDrivingVariable 'FYZ' 0.;
@ImposedDrivingVariable 'FZY' 0.;

@ExternalStateVariable 'Temperature' 293.15;

@Times {0.,1 in 500};

@Test<file> @reference_file@ {'FZZ':2,'FXX':3,'FYY':3} 1e-5;
@Test<file> @reference_file@ {'SZZ':4} 4e3;
@Test<file> @reference_file@ {'EquivalentViscoplasticStrain':5} 1e-4;
@Test<function> {'SXX':'0','SYY':'0'}           4.e3;
@Test<function> {'SXY':'0','SXZ':'0','SYZ':'0'} 4.e3;
@Test<function> {'FXY': '0', 'FZY':'0'} 1.e-10;
@Test<function> {'FXZ': '0', 'FZX':'0'} 1.e-10;
@Test<function> {'FYZ': '0', 'FZY':'0'} 1.e-10;
