@Author Tristan Chenaille;
@Date 03/11/2026;
@Description{
  "This test describes an uniaxial loading "
  "by imposing the deformation gradient in "
  "one direction. "
  "The perpendicular directions are "
  "stress-free. The shear components of the "
  "deformation gradient are set to zero. "
  "The results are compared to analytical solutions. "
  "The prediction operator of the behaviour is "
  "used at the beginning of each time step."
};

@XMLOutputFile @xml_output@;
@MaximumNumberOfSubSteps 1;
@PredictionPolicy 'ElasticPrediction';
@Behaviour<generic> @library@ 'SaintVenantKirchhoffElasticity' {
  stress_measure : @stress_measure@, tangent_operator : @tangent_operator@
};

@MaterialProperty<constant> 'YoungModulus'     215.e9;
@MaterialProperty<constant> 'PoissonRatio'       0.3;

@ImposedDrivingVariable 'FYY' {0:1.,1.:1.2};
@ImposedDrivingVariable 'FXY' 0.;
@ImposedDrivingVariable 'FYX' 0.;
@ImposedDrivingVariable 'FXZ' 0.;
@ImposedDrivingVariable 'FZX' 0.;
@ImposedDrivingVariable 'FYZ' 0.;
@ImposedDrivingVariable 'FZY' 0.;

@ExternalStateVariable 'Temperature' 293.15;

@Times {0.,1 in 10};

@Test<function> {'SYY':'YoungModulus*(FYY**2-1)*FYY/(2*(1-PoissonRatio*(FYY**2-1)))'} 1.e-2;
@Test<function> {'SXY':'0','SXZ':'0','SYZ':'0'}          1.e-2;

@Test<function> {'FXX':'sqrt(1-PoissonRatio*(FYY**2-1))'} 1.e-8;
@Test<function> {'FZZ':'sqrt(1-PoissonRatio*(FYY**2-1))'} 1.e-8;
