@Author Helfer Thomas;
@Date 16/08/2020;

@XMLOutputFile @xml_output@;
@MaximumNumberOfSubSteps 1;

@Behaviour<generic> @library@ 'SaintVenantKirchhoffElasticity4';
@MaterialProperty<constant> 'YoungModulus'     215.e9;
@MaterialProperty<constant> 'PoissonRatio'       0.3;

@Gradient{1, 1, 1, 0, 0, 0, 0, 0, 0};

@Evolution 'FYY' {0 : 1., 1. : 1.2};

@ImposedGradient<function> 'DeformationGradientYY' 'FYY';
@ImposedGradient 'DeformationGradientXY' 0.;
@ImposedGradient 'DeformationGradientYX' 0.;
@ImposedGradient 'DeformationGradientXZ' 0.;
@ImposedGradient 'DeformationGradientZX' 0.;
@ImposedGradient 'DeformationGradientYZ' 0.;
@ImposedGradient 'DeformationGradientZY' 0.;

@ExternalStateVariable 'Temperature' 293.15;

@Times {0.,1 in 10};

@Evolution<function> 'FXX' 'sqrt(1.-PoissonRatio*(FYY**2-1))';
@Evolution<function> 'J' 'FXX*FXX*FYY';
@Test<function> {
  'DeformationGradientXX' : 'FXX', 'DeformationGradientZZ' : 'FXX'
}
1.e-8;

@Test<function> {'FirstPiolaKirchhoffStressXX':'0.','FirstPiolaKirchhoffStressZZ':'0.'}         1.e-2;
@Test<function> {'FirstPiolaKirchhoffStressXY':'0','FirstPiolaKirchhoffStressXZ':'0','FirstPiolaKirchhoffStressYZ':'0'} 1.e-2;
@Test<function> {
  'FirstPiolaKirchhoffStressYY' : 'FYY*YoungModulus*(FYY**2-1)/2'
}
1.e-2;
