@DSL ImplicitModelDSL;
@Model ode_implicit;
@Author Thomas Helfer;
@Date 21 / 09 / 2021;
@Description {
}

@UseQt true;

@Algorithm NewtonRaphson;
@Epsilon 1.e-14;
@Theta 0.5;

@StateVariable real x;
@Parameter frequency A = 1.2;

@Integrator{
  fx += dt * A * (x + theta * dx);
  dfx_ddx += theta * A * dt;
}
