/*!
 * \file   castemmieheapellambrechtlogarithmicstrainnorton-uniaxialloading-1-2D.mtest
 * \brief
 * \author Helfer Thomas
 * \brief  4 dec. 2013
 */

@ModellingHypothesis 'GeneralisedPlaneStrain';
@PredictionPolicy 'LinearPrediction';
@AccelerationAlgorithm 'Steffensen';
@MaximumNumberOfSubSteps 1;

@Behaviour<umat> @library@ 'umatlogarithmicstrainnortoncreep';
@DrivingVariableEpsilon 1.e-10;
@StressEpsilon          2.e3;

@MaterialProperty<constant> 'YoungModulus'      80.e9;
@MaterialProperty<constant> 'PoissonRatio'       0.35;
@MaterialProperty<constant> 'A'   '0.003944e-6**4.39';
@MaterialProperty<constant> 'E'   4.39;

@ImposedDrivingVariable 'FXX' {0:1.,1.:4.5};
@ImposedDrivingVariable 'FXY' 0.;
@ImposedDrivingVariable 'FYX' 0.;

@ExternalStateVariable 'Temperature' 293.15;

@Times {0.,1 in 500};

@Test<file> '@top_srcdir@/mfront/tests/behaviours/references/logarithmicstrainnortoncreepuniaxialtesting.ref' {'FXX':2,'FYY':3,'FZZ':3} 1e-5;
@Test<file> '@top_srcdir@/mfront/tests/behaviours/references/logarithmicstrainnortoncreepuniaxialtesting.ref' {'SXX':4} 1.3e3;
@Test<file> '@top_srcdir@/mfront/tests/behaviours/references/logarithmicstrainnortoncreepuniaxialtesting.ref' {'EquivalentViscoplasticStrain':5} 1e-4;
@Test<function> {'SZZ':'0','SYY':'0','SXY':'0'} 1.e3;
@Test<function> {'FXY': '0', 'FYX':'0'} 1.e-10;
