/*!
 * \file   castemmieheapellambrechtlogarithmicstrainnorton-uniaxialloading-3-1D.mtest
 * \brief
 * \author Helfer Thomas
 * \brief  4 dec. 2013
 */

@ModellingHypothesis 'AxisymmetricalGeneralisedPlaneStrain';
@PredictionPolicy 'LinearPrediction';
@AccelerationAlgorithm 'Steffensen';
@MaximumNumberOfSubSteps 1;

@Behaviour<umat> @library@ 'umatlogarithmicstrainnortoncreep';
@DrivingVariableEpsilon 1.e-10;
@StressEpsilon          2.e3;

@MaterialProperty<constant> 'YoungModulus'      80.e9;
@MaterialProperty<constant> 'PoissonRatio'       0.35;
@MaterialProperty<constant> 'A'   '0.003944e-6**4.39';
@MaterialProperty<constant> 'E'   4.39;

@ImposedDrivingVariable 'FZZ' {0:1.,1.:4.5};

@ExternalStateVariable 'Temperature' 293.15;

@Times {0.,1 in 500};

@Test<file> '@top_srcdir@/mfront/tests/behaviours/references/logarithmicstrainnortoncreepuniaxialtesting.ref' {'FZZ':2,'FRR':3,'FTT':3} 1e-5;
@Test<file> '@top_srcdir@/mfront/tests/behaviours/references/logarithmicstrainnortoncreepuniaxialtesting.ref' {'SZZ':4} 1.3e3;
@Test<file> '@top_srcdir@/mfront/tests/behaviours/references/logarithmicstrainnortoncreepuniaxialtesting.ref' {'EquivalentViscoplasticStrain':5} 1e-4;
@Test<function> {'SRR':'0','STT':'0'}           1.e3;
