@DSL Implicit;
@Behaviour TDLSElasticity2;
@LinearSystemSolver TDLS {
  tile_size : "StensorSize",
  schedule : "RightLooking",
  out_of_tile_search_strategy : "FirstAcceptable",
  unroll_inner_loop : true
};
@Import "TDLSElasticity-common.mfront";
