/*!
 * \file  polycrystal.mtest
 * \brief tst pokycrystal BZ 30 grains cf. mfron03d
 * \author jmp
 * \brief 31 mai 2013
 */

@Real 'young' 145200.;
@Real 'nu'    0.3;
@Real 'G'     'young/2.6';

@AccelerationAlgorithm 'UAnderson';
@Behaviour<umat> @library@ 'umatpolycrystals';

@StiffnessMatrixType 'Elastic' ;

@MaterialProperty<constant> 'YoungModulus1'     'young';
@MaterialProperty<constant> 'YoungModulus2'     'young';
@MaterialProperty<constant> 'YoungModulus3'     'young';
@MaterialProperty<constant> 'PoissonRatio12'       'nu';
@MaterialProperty<constant> 'PoissonRatio13'       'nu';
@MaterialProperty<constant> 'PoissonRatio23'       'nu';
@MaterialProperty<constant> 'ShearModulus12'    'G';
@MaterialProperty<constant> 'ShearModulus13'    'G';
@MaterialProperty<constant> 'ShearModulus23'    'G';

@MaterialProperty<constant> 'm'      10.0;
@MaterialProperty<constant> 'K'      40.0;
@MaterialProperty<constant> 'C'      0.;
@MaterialProperty<constant> 'R0'     75.5;
@MaterialProperty<constant> 'Q'      9.77;
@MaterialProperty<constant> 'b'      19.34;
@MaterialProperty<constant> 'H'      1.;
@MaterialProperty<constant> 'd1'     36.68;
@MaterialProperty<constant> 'Mu'      'G';

@ExternalStateVariable 'Temperature' 293.15;

@ImposedStrain 'EZZ' {0.: 0., 5. : 0.005 };

@Times {0.,5. in 100};

@Test<file> '@top_srcdir@/mfront/tests/behaviours/references/polycrystals.ref' {'SZZ':10} 1.e-3 ;
