@DSL Default;
@Behaviour BehaviourVariable3;
@Description{
  "Test failing because the temperature is not shared"
}

@BehaviourVariable b1{
  file : "Plasticity.mfront",
  store_gradients : false,
  store_thermodynamic_forces : false
};
