@DSL       DefaultDSL;
@Behaviour ComputeThermalExpansion6;
@Author    Helfer Thomas;
@Date      25/02/16;
@Description{
  "A simple behaviour used to check that one cannot use "
  "the @ComputeThermalExpansion keyword without "
  "specifying an orthotropic axes convention if "
  "modelling hypotheses different than 'Tridimensional'"
  "are supported."
}

@OrthotropicBehaviour;
@RequireStiffnessTensor;
@ProvidesSymmetricTangentOperator;

@ComputeThermalExpansion {"ThermalExpansionCoefficientTest_1.mfront",
                          "ThermalExpansionCoefficientTest_2.mfront",
                          "ThermalExpansionCoefficientTest_3.mfront"};

@Integrator{
  sig = D*(eto+deto);
  if(computeTangentOperator_){
    Dt = D;
  }
}
