@DSL IsotropicPlasticMisesFlow;
@Behaviour InvalidExternalBehaviour1;

@Epsilon 1e-14;

@MaterialProperty stress H;
@MaterialProperty stress s0;

@LocalVariable StressStensor sig0;

@InitLocalVariables {
  sig0 = sig;
}

@FlowRule {
  f = seq - H * p - s0;
  df_dseq = 1;
  df_dp = -H;
}
