@DSL IsotropicPlasticMisesFlow;
@Behaviour InvalidExternalBehaviour3;

@Epsilon 1e-14;

@MaterialProperty stress H;
@MaterialProperty stress s0;

@LocalVariable StrainStensor deto0;

@InitLocalVariables {
  deto0 = deto;
}

@FlowRule {
  f = seq - H * p - s0;
  df_dseq = 1;
  df_dp = -H;
}
