@DSL IsotropicPlasticMisesFlow;
@Behaviour WarningTest10;

@Epsilon<safe> 1e-20;

@MaterialProperty stress H;
@MaterialProperty stress s0;

@FlowRule {
  f = seq - H * p - s0;
  df_dseq = 1;
  df_dp = -H;
}
