@DSL IsotropicPlasticMisesFlow;
@Behaviour WarningTest11;
@Description {
  "print as warning because dt is used in the body of @FlowRule"
}

@Epsilon 1e-12;

@MaterialProperty stress H;
@MaterialProperty stress s0;

@FlowRule {
  dt;
  f = seq - H * p - s0;
  df_dseq = 1;
  df_dp = -H;
}
