@DSL IsotropicPlasticMisesFlow;
@Behaviour WarningTest12;
@Description {
  "print as warning because eto is used in the body of @FlowRule"
}

@Epsilon 1e-12;

@MaterialProperty stress H;
@MaterialProperty stress s0;

@FlowRule {
  eto;
  f = seq - H * p - s0;
  df_dseq = 1;
  df_dp = -H;
}
