@DSL IsotropicPlasticMisesFlow;
@Behaviour WarningTest16;
@Description {
  "don't print a warning because theta is used in the body of @FlowRule"
}

@Epsilon 1e-12;

@MaterialProperty stress H;
@MaterialProperty stress s0;

@FlowRule<safe> {
  theta;
  f = seq - H * p - s0;
  df_dseq = 1;
  df_dp = -H;
}
