@DSL IsotropicPlasticMisesFlow;
@Behaviour WarningTest17;
@Description {
  "print a warning because theta (in unicode form) is used in the body of "
  "@FlowRule"
}

@Epsilon 1e-12;

@MaterialProperty stress H;
@MaterialProperty stress s0;

@FlowRule {
  θ;
  f = seq - H * p - s0;
  df_dseq = 1;
  df_dp = -H;
}
