@DSL Implicit;
@Behaviour WarningTest25;
@Description {
  "print a warning for using the increment "
  "of a gradient @ComputeStress"
}

@Epsilon 1e-15;

@ComputeStress {
  constexpr auto id = Stensor::Id();
  constexpr auto l = computeLambda(150e9, 0.3);
  constexpr auto mu = computeMu(150e9, 0.3);
  sig = yg * tr(eel) * Id + 2 * mu * (eel + deto);
}

@Integrator {
  feel -= deto;
}
