@DSL Implicit;
@Behaviour WarningTest26;
@Description {
  "print a warning for not using "
  "the thermodynamic force in @ComputeStress"
}

@Epsilon 1e-15;

@ComputeStress {
  constexpr auto id = Stensor::Id();
  constexpr auto l = computeLambda(150e9, 0.3);
  constexpr auto mu = computeMu(150e9, 0.3);
  const auto sig0 = yg * tr(eel) * Id + 2 * mu * eel;
}

@Integrator {
  feel -= deto;
}
