@DSL Implicit;
@Behaviour WarningTest30;
@Description {
  "print a warning for using the increment "
  "of a gradient @ComputeFinalStress"
}

@Epsilon 1e-15;

@ComputeFinalStress {
  constexpr auto id = Stensor::Id();
  constexpr auto l = computeLambda(150e9, 0.3);
  constexpr auto mu = computeMu(150e9, 0.3);
  sig = yg * tr(eel) * Id + 2 * mu * (eel + deto);
}

@Integrator {
  feel -= deto;
}
