@DSL Implicit;
@Behaviour WarningTest32;
@Description {
  "print a warning for not using "
  "the time increment force in @ComputeFinalStress"
}

@Epsilon 1e-15;

@ComputeFinalStress {
  constexpr auto id = Stensor::Id();
  constexpr auto l = computeLambda(150e9, 0.3);
  constexpr auto mu = computeMu(150e9, 0.3);
  constexpr auto dt0 = time{1};
  sig = yg * (1 + (dt / dt0)) * tr(eel) * Id + 2 * mu * eel;
}

@Integrator {
  feel -= deto;
}
