@DSL IsotropicPlasticMisesFlow;
@Behaviour WarningTest34;

@Epsilon 1e-14;

@MaterialProperty stress H;
@MaterialProperty stress s0;

@AuxiliaryStateVariable real test;

@FlowRule<safe> {
  test;
  f = seq - H * p - s0;
  df_dseq = 1;
  df_dp = -H;
}
