@Behaviour WarningTest38;
@Description {
  "This test checks that no warning is reported when Dt is used in "
  "@Integrator when the @ProvidesSymmetricTangentOperator is used."
}

@ProvidesSymmetricTangentOperator;
@Integrator {
  deto;
  sig;
  Dt;
}
