@DSL DefaultFiniteStrain;
@Behaviour WarningTest51;
@Description {
  "This test checks that a warning is reported if "
  "the tangent operator is not used in @TangentOperator."
}

@Integrator {
  F1;
  sig;
  Dt;
}

@TangentOperator<DS_DC> {
  Dt;
}
