@DSL DefaultGenericBehaviour;
@Behaviour WarningTest55;
@Description {
  "This test checks that no warning is reported if "
  "all the explicitly declared tangent operator blocks "
  "are used in @TangentOperator."
}

@Gradient real a;
@ThermodynamicForce real b;
@Gradient real c;
@ThermodynamicForce real d;

@TangentOperatorBlocks {db_dda, db_ddc};

@Integrator {
  da;
  b;
  dc;
  d;
}

@TangentOperator {
  db_dda;
  db_ddc;
}
