@DSL DefaultCZM;
@Behaviour WarningTest65;
@Description {
  "This test checks that a warning is reported if "
  "the cohesive force and its tangential component are both used in "
  "@Integrator."
}

@Integrator {
  du;
  t;
  t_t;
}
