@DSL DefaultCZM;
@Behaviour WarningTest68;
@Description {
  "This test checks that no warning is reported if "
  "the consistent tangent operator is used in @Integrator."
}

@ProvidesTangentOperator;
@Integrator {
  du;
  t;
  Dt;
}
