@DSL DefaultCZM;
@Behaviour WarningTest71;
@Description {
  "This test checks that a warning is reported "
  "if the only the normal part of the consistent "
  "tangent operator is used in @Integrator."
}

@Integrator {
  du;
  t;
}

@TangentOperator{
  Dt_nn;
}
