@DSL IsotropicPlasticMisesFlow;
@Behaviour WarningTest75;
@Description {
  "This test checks that a warning is reported "
  "if df_dseq is not used in @FlowRule."
}

@Epsilon 1e-14;

@FlowRule{
  f;
  df_dp;
}
