@DSL IsotropicPlasticMisesFlow;
@Behaviour WarningTest78;
@Description {
  "This test checks that a warning is reported "
  "if R is not used in @FlowRule when"
  "an isotropic hardening rule is defined."
}

@Epsilon 1e-14;

@IsotropicHardeningRule "Linear" {R0 : 150e6, H : 2e9};

@FlowRule{
  f;
  df_dseq;
  df_dp;
  dR_dp;
}
