@DSL Implicit;
@Behaviour WarningTest84;
@Description {
  "This file checks that a warning is reported if physical bounds are "
  "set on an integration variable which is not a state variable"
}

@Epsilon 1e-12;
@IntegrationVariable real x;
@PhysicalBounds x in [0:*[;
@Integrator {
}
