@DSL IsotropicPlasticMisesFlow;
@Behaviour WarningTest9;

@Epsilon 1e-20;

@MaterialProperty stress H;
@MaterialProperty stress s0;

@FlowRule {
  f = seq - H * p - s0;
  df_dseq = 1;
  df_dp = -H;
}
