@Parser   MaterialLaw ;
@Material T91AusteniticSteel;
@Law      YoungModulus_ROUX2007 ;
@Author   F. Milliard ;
@Date     11/12/2013 ;
@Description{
  // Module d'Young martensite T91
  // [Roux 07]
}

// Input of law
@Input T ;
T.setGlossaryName("Temperature") ;

// Output of law
@Output E;
E.setGlossaryName("YoungModulus");

@PhysicalBounds T in [0.:*[;

// Function
@Function{
  const real TC = T-273.15;
  E = -2.1080000000e+08 * TC +2.7248000000e+11 ;

} // end of Function
