@Author Thomas Helfer;
@Date   16 sept. 2016;
@Description{
  Test of the castem_umat_small_strain
  interface on an elastic beavhour.
};

@Behaviour<castem_umat_small_strain> @CASTEMUMATLIBRARY@ 'umat_'{
 'NUME_LOI'   : 10,
 'SYMETRIE'   : 'ISOTROPE',
 'C_MATERIAU' : {'YOUN','NU'}
};
@MaterialProperty<constant> 'YOUN'     150.e9;
@MaterialProperty<constant> 'NU'       0.3;

@ExternalStateVariable 'Temperature' {0:293.15,3600.:800};

@Real 'e0' 1.e-3;
@ImposedStrain<function> 'EXX' 'e0*sin(t/900.)';

@Times {0.,3600 in 20};

// stresses
@Test<function> 'SXX' 'YOUN*EXX'       1.e-3;
@Test<function> {'SYY':'0.','SZZ':'0.'} 1.e-3;
@Test<function> {'SXY':'0.','SXZ':'0.','SYZ':'0.'} 1.e-3;
// strains
@Test<function> 'EYY' '-NU*EXX' 1.e-8;
@Test<function> 'EZZ' '-NU*EXX' 1.e-8;
@Test<function> {'EXY':'0.','EXZ':'0.','EYZ':'0.'} 1.e-8;
