@InnerRadius 4.2e-3;
@OuterRadius 4.7e-3;
@NumberOfElements 10;
@ElementType 'Linear';
@PerformSmallStrainAnalysis true;

@Behaviour<cyrano> @library@ 'cyranoelasticity';
@MaterialProperty<constant> 'YoungModulus' 150e9;
@MaterialProperty<constant> 'PoissonRatio' 0.3;

@Real 'Pi' 1.5e6;
@Real 'Pe' 10e6;
@Times {0,1};
@InnerPressureEvolution 'Pi';
@OuterPressureEvolution {0:'Pi',1:'Pe'};
@ExternalStateVariable 'Temperature' 293.15;

@OutputFilePrecision 14;

// inner and outer displacements given by the Lamé solution (end cap effect)
@Test<function> 'InnerDisplacement' 'Ri/YoungModulus*((Pi*(Ri*Ri+Re*Re)-2*Pe*Re*Re)/(Re*Re-Ri*Ri)+PoissonRatio*Pi-PoissonRatio*(Pi*Ri*Ri-Pe*Re*Re)/(Re*Re-Ri*Ri))' 1.e-10;
@Test<function> 'OuterDisplacement' 'Re/YoungModulus*((2*Pi*Ri*Ri-Pe*(Ri*Ri+Re*Re))/(Re*Re-Ri*Ri)+PoissonRatio*Pe-PoissonRatio*(Pi*Ri*Ri-Pe*Re*Re)/(Re*Re-Ri*Ri))' 1.e-10;
