@InnerRadius 4.2e-3;
@OuterRadius 4.7e-3;
@NumberOfElements 10;
@ElementType 'Linear';
@PerformSmallStrainAnalysis true;
@AxialLoading 'None';

@InnerPressureEvolution 20.e5;
@OuterPressureEvolution 15.e6;

@Behaviour<cyrano> @library@ 'cyranoelasticity';
@MaterialProperty<constant> 'YoungModulus' 84.e9;
@MaterialProperty<constant> 'PoissonRatio' 0.37;
@MaterialProperty<constant> 'ThermalExpansion' 7.e-6;

@Real 'Ti' 863.15;
@Real 'Te' 433.15;
@Real 'D' '(Te-Ti)/log(Re/Ri)';
@ExternalStateVariable<function> 'Temperature' '(Ti+D*log(r/Ri)-293.15)*t+293.15';

@Times {0,1};

// inner and outer displacements given by the thermoelastic Lamé solution
// (no axial force, logarithmic temperature profile)
@Test<function> 'InnerDisplacement' '3.68395010441353e-6' 1.e-8;
@Test<function> 'OuterDisplacement' '5.11902749779609e-6' 1.e-8;
