@InnerRadius 4.2e-3;
@OuterRadius 4.7e-3;
@NumberOfElements 10;
@ElementType 'Quadratic';
@PerformSmallStrainAnalysis true;
@AxialLoading 'None';

@InnerPressureEvolution 20.e5;
@OuterPressureEvolution 15.e6;

@Behaviour<cyrano> @library@ 'cyranoelasticity';
@MaterialProperty<constant> 'YoungModulus' 84.e9;
@MaterialProperty<constant> 'PoissonRatio' 0.37;
@MaterialProperty<constant> 'ThermalExpansion' 7.e-6;

@Real 'Ti' 863.15;
@Real 'Te' 433.15;
@Real 'D' '(Te-Ti)/log(Re/Ri)';
@ExternalStateVariable<function> 'Temperature' '(Ti+D*log(r/Ri)-293.15)*t+293.15';

@Times {0,1};

@Test<file,profile> '@top_srcdir@/mtest/tests/ptest/references/isotropic-thermoelastic-quadratic.ref' {'SRR':2,'STT':3,'SZZ':4} 1.e-3;
@Test<file,profile> '@top_srcdir@/mtest/tests/ptest/references/isotropic-thermoelastic-quadratic.ref' {'ERR':5,'ETT':6,'EZZ':7} 1.e-10;
