@InnerRadius 4.18e-3;
@OuterRadius '4.18e-3+0.57e-3';
@NumberOfElements 20;
@ElementType 'Quadratic';
@RadialLoading 'ImposedOuterRadius';
@AxialLoading  'None';
@PerformSmallStrainAnalysis true;
@OuterRadiusEvolution {  0:'4.18e-3+0.57e-3',
                       7.5:5.e-3};
@HandleThermalExpansion false;
@MaximumNumberOfSubSteps 1;
@ResidualEpsilon 1.;
@StiffnessMatrixType 'ConsistentTangentOperator';

@Behaviour<cyrano> @library@ 'cyranonorton_log1d';
@Parameter 'theta' 1;
@MaterialProperty<constant> 'YoungModulus' 70e9;
@MaterialProperty<constant> 'PoissonRatio' 0.3;
@MaterialProperty<constant> 'A' 5.e-10;
@MaterialProperty<constant> 'E' 1;
@ExternalStateVariable 'Temperature' 293.15;

@Times {0,7.5 in 50};
