@Author Thomas Helfer;
@Date   01-2016;
@Description{
  On modélise un tube ouvert décrit par une loi de Norton en déformations
  logarithmiques sans actualisation des forces de pression et soumis à
  une pression interne constante.
}

// mesh
@InnerRadius 4.18e-3;
@OuterRadius '4.18e-3+0.57e-3';
@NumberOfElements 20;
@ElementType 'Linear';

// modelling hypotheses
@AxialLoading 'None';
@HandleThermalExpansion false;
@PerformSmallStrainAnalysis true;

// numerical parameters
@PredictionPolicy 'LinearPrediction';
@MaximumNumberOfSubSteps 1;
@ResidualEpsilon 1.;
@StiffnessMatrixType 'ConsistentTangentOperator';

// mechanical behaviours
@Behaviour<cyrano> @library@ 'cyranonorton_log1d';
@MaterialProperty<constant> 'YoungModulus' 70e9;
@MaterialProperty<constant> 'PoissonRatio' 0.3;
@MaterialProperty<constant> 'A' 5.e-10;
@MaterialProperty<constant> 'E' 1;

// loadings
@ExternalStateVariable 'Temperature' 293.15;
@InnerPressureEvolution 3.e7;

// time discretization
@Times {0,7.5 in 50};

// post-processing
@OutputFilePrecision 14;
@Profile 'pipe1D-strains.txt'   {'ERR','EZZ','ETT'};
@Profile 'pipe1D-stresses.txt' {'SRR','SZZ','STT'};
