@Author Thomas Helfer;
@Date   7/01/2015;
@Description{

};

@InnerRadius 4.2e-3;
@OuterRadius 4.7e-3;
@NumberOfElements 5;
@ElementType 'Quadratic';

@AxialLoading 'None';
@InnerPressureEvolution {0:0.,1.:30.e6};
@OuterPressureEvolution {0:0.,1.:15.e6};
@PerformSmallStrainAnalysis true;

@Behaviour<cyrano> @library@ 'cyranoorthotropicelastic';
@MaterialProperty<constant> 'YoungModulus1' 170.e9;
@MaterialProperty<constant> 'YoungModulus2' 100.e9;
@MaterialProperty<constant> 'YoungModulus3' 130.e9;
@MaterialProperty<constant> 'PoissonRatio12' 0.3;
@MaterialProperty<constant> 'PoissonRatio13' 0.2;
@MaterialProperty<constant> 'PoissonRatio23' 0.4;
@ExternalStateVariable 'Temperature' 293.15;

@Times {0,1};

@Test<file,profile> '@top_srcdir@/mtest/tests/ptest/references/orthotropic-elastic-profile-quadratic.ref' {'SRR':2,'SZZ':3,'STT':4} 1e-3;
@Test<file,profile> '@top_srcdir@/mtest/tests/ptest/references/orthotropic-elastic-profile-quadratic.ref' {'ERR':5,'EZZ':6,'ETT':7} 1e-14;
