@InnerRadius 4.2e-3;
@OuterRadius 4.7e-3;
@NumberOfElements 1;
@ElementType 'Quadratic';
@RadialLoading 'TightPipe';
@FillingPressure      1.e5;
@FillingTemperature 293.15;

@Behaviour<cyrano,LogarithmicStrain1D> @library@ 'cyranoelasticity';
@MaterialProperty<constant> 'YoungModulus' 150e9;
@MaterialProperty<constant> 'PoissonRatio' 0.3;
@ExternalStateVariable 'Temperature' {0:293.15,1:693.15};

@Times {0,1};

// inner pressure given by the ideal gas law, inner and outer
// displacements given by the Lamé solution (end cap effect), the
// finite strain corrections being of the order of the strains (1e-5)
@Real 'Pi' '1.e5*693.15/293.15';
@Real 'Pe' 0;
@Test<function> 'InnerDisplacement' 'Ri/YoungModulus*((Pi*(Ri*Ri+Re*Re)-2*Pe*Re*Re)/(Re*Re-Ri*Ri)+PoissonRatio*Pi-PoissonRatio*(Pi*Ri*Ri-Pe*Re*Re)/(Re*Re-Ri*Ri))' 1.e-12;
@Test<function> 'OuterDisplacement' 'Re/YoungModulus*((2*Pi*Ri*Ri-Pe*(Ri*Ri+Re*Re))/(Re*Re-Ri*Ri)+PoissonRatio*Pe-PoissonRatio*(Pi*Ri*Ri-Pe*Re*Re)/(Re*Re-Ri*Ri))' 1.e-12;
