@DSL Implicit;
@Behaviour StandardElastoViscoPlasticityNortonTest5;
@Author Thomas Helfer;
@Date 31/03/2018;

@ModellingHypotheses {".+"};

@Epsilon 1.e-16;
@Theta 1;

@Brick "StandardElastoViscoPlasticity" {
  stress_potential : "Hooke" {young_modulus : 150e9, poisson_ratio : 0.3},
  inelastic_flow : "Norton" {
    criterion : "Mises",
    kinematic_hardening : "Prager" {C : 33e6},
    K : 250e6,
    n : 3.2
  }
};
