@DSL Implicit;
@Behaviour StandardElastoViscoPlasticityNortonTest8;
@Author Thomas Helfer;
@Date 06/04/2018;

@ModellingHypotheses {".+"};

@Epsilon 1.e-16;
@IterMax 100;
@Theta 1;

@Brick "StandardElastoViscoPlasticity" {
  stress_potential : "Hooke" {young_modulus : 160e9, poisson_ratio : 0.3},
  inelastic_flow : "Norton" {
    criterion : "Mises",
    isotropic_hardening : "Linear" {R0 : 120e6, H : 0},
    kinematic_hardening : "Burlet-Cailletaud" {C : 250e7, D : 100, eta : 0},
    K : 10e6,
    n : 2.9
  }
};
