@DSL Implicit;
@Behaviour StandardElastoViscoPlasticityNortonTest_nj;
@Author Thomas Helfer;
@Date 7/04/2018;

@ModellingHypotheses {".+"};

@Algorithm NewtonRaphson_NumericalJacobian;
@Epsilon 1.e-16;
@PerturbationValueForNumericalJacobianComputation 1.e-8;
@IterMax 100;
@Theta 1;

@Brick "StandardElastoViscoPlasticity" {
  stress_potential : "Hooke" {young_modulus : 150e9, poisson_ratio : 0.3},
  inelastic_flow : "Norton" {criterion : "Mises", K : 100e6, n : 3.2}
};
