@DSL Implicit;
@Behaviour StandardElastoViscoPlasticityPlasticityTest10_nanj;
@Author Thomas Helfer;
@Date 23/04/2018;

@OrthotropicBehaviour<Pipe>;
@ModellingHypotheses {".+"};

@Algorithm NewtonRaphson_NumericalJacobian;
@Epsilon 1.e-16;
@PerturbationValueForNumericalJacobianComputation 1.e-8;
@IterMax 100;
@Theta 1;

@Brick "StandardElastoViscoPlasticity" {
  stress_potential : "Hooke" {young_modulus : 160e9, poisson_ratio : 0.3},
  inelastic_flow : "Plastic" {
    criterion : "Barlat" {
      a : 8,
      l1 : {-0.069888, 0.079143, 0.936408, 0.524741, 1.00306, 1.36318, 0.954322,
            1.06906, 1.02377},
      l2 : {0.981171, 0.575316, 0.476741, 1.14501, 0.866827, -0.079294, 1.40462,
            1.1471, 1.05166}

    },  //
    flow_criterion : "Barlat" {
      a : 8,
      l1 : {-0.069888, 0.079143, 0.936408, 0.524741, 1.00306, 1.36318, 0.954322,
            1.06906, 1.02377},
      l2 : {0.981171, 0.575316, 0.476741, 1.14501, 0.866827, -0.079294, 1.40462,
            1.1471, 1.05166}

    },  //
    isotropic_hardening : "Linear" {R0 : 120e6}
  }
};
