@DSL       Implicit;
@Behaviour StandardElastoViscoPlasticityPlasticityTest13_na;
@Author    Thomas Helfer;
@Description{
  A simple implementation of a perfect
  plasticity behaviour using the
  Drucker 1949 yield criterion.
};

@ModellingHypotheses {".+"};
@Epsilon 1.e-16;
@Theta 1;

@Brick "StandardElastoViscoPlasticity" {
  stress_potential : "Hooke" {young_modulus : 150e9, poisson_ratio : 0.3},  //
  inelastic_flow : "Plastic" {
    criterion : "Drucker 1949" {c : 1.285},
    flow_criterion : "Drucker 1949" {c : 1.285},
    isotropic_hardening : "Linear" {R0 : 150e6}
  }
};
