@Author HELFER Thomas 202608;
@Date   04/05/2018;
@Description{

};

@XMLOutputFile @xml_output@;
@MaximumNumberOfSubSteps 1;
@Behaviour<castem> @library@ @behaviour@;

@MaterialProperty<constant> 'YoungModulus' 150e9;
@MaterialProperty<constant> 'PoissonRatio' 0.3;

@ExternalStateVariable 'Temperature' 293.15 ;

@Real 's' 5e6;
@Real 'e0' 's/YoungModulus';
@Strain{'e0', '-e0*PoissonRatio', '-e0*PoissonRatio', 0, 0, 0};
@Stress{'s', 0, 0, 0, 0, 0};
@InternalStateVariable 'ElasticStrain' {
  'e0', '-e0*PoissonRatio', '-e0*PoissonRatio', 0, 0, 0
};

@ImposedStress 'SXX' 's';
@Times {0,3600 in 10};


@Real 'K' 100e6;
@Real 'n' 3.2;
@Real 'p0' 1;

@Evolution 'dp' '(s/K)**n';

@Test<function> 'EquivalentViscoplasticStrain' 'dp*t' 1.e-12;
@Test<function> 'Damage' '1-exp(-dp*t/p0)' 1.e-12;
