@DSL    Implicit;
@Author T. Helfer;
@Date   26/02/2016;
@Behaviour ComputeStiffnessTensor2;
@Description{
  "This behaviour is invalid since an invalid "
  "number of elastic material properties is given."
}

@ComputeStiffnessTensor {"VanadiumAlloy_YoungModulus_SRMA.mfront",
    "VanadiumAlloy_YoungModulus_SRMA.mfront",
    "VanadiumAlloy_YoungModulus_SRMA.mfront",
    "VanadiumAlloy_PoissonRatio_SRMA.mfront",
    "VanadiumAlloy_PoissonRatio_SRMA.mfront",
    "VanadiumAlloy_ShearModulus_SRMA.mfront",
    "VanadiumAlloy_ShearModulus_SRMA.mfront",
    "VanadiumAlloy_ShearModulus_SRMA.mfront"};
