@Author T. Helfer;
@Date 24/02/2016;
@Behaviour ComputeThermalExpansion3;
@Description{
  "This behaviour is invalid "
  "it declares 4 thermal "
  "expansion coefficient."
}

@ComputeThermalExpansion {"ThermalExpansionCoefficientTest_1.mfront",
    "ThermalExpansionCoefficientTest_1.mfront",
    "ThermalExpansionCoefficientTest_1.mfront",
    "ThermalExpansionCoefficientTest_1.mfront"};
