@DSL MaterialLaw;
@Material Inconel600;
@Law YoungModulus;

@Input TK;
TK.setGlossaryName("Temperature");

@Output E;
E.setGlossaryName("YoungModulus");

@PhysicalBounds TK in [0:*[;
@Bounds TK in [0:*[;

@Function {
  const real TC = TK - 273.15;
  E = (-3.1636e-3 * TC * TC - 3.8654 * TC + 2.1421e+4) * 1e7;
}
