@DSL DefaultDSL;
@Behaviour OrthotropicElastic;
@Author    Helfer Thomas;
@Date      10/03/11;

@ModellingHypotheses {".+"};

@OrthotropicBehaviour;
@RequireStiffnessTensor<Altered>;
@ProvidesSymmetricTangentOperator;

@PredictionOperator{
  static_cast<void>(smt);
  Dt=D;
}

@Integrator{
  static_cast<void>(smt);
  sig = D*(eto+deto);
  if(computeTangentOperator_){
    Dt = D;
  }
}
