@DSL DefaultGenericBehaviour;
@Behaviour StationaryHeatTransfer2;
@Author Thomas Helfer;
@Date 15/02/2019;

@Gradient TemperatureGradient gT;
gT.setGlossaryName("TemperatureGradient");

@Flux HeatFlux j;
j.setGlossaryName("HeatFlux");

@AdditionalTangentOperatorBlock dj_ddT;

@Parameter A = 0.0375;
@Parameter B = 2.165e-4;

@LocalVariable thermalconductivity k;

@Integrator{
  const auto T_ = T + dT;
  k = 1 / (A + B * T_);
  j = -k * (gT + dgT);
} // end of @Integrator

@TangentOperator {
  dj_ddT  =  B * k * k * (gT + dgT);
  dj_ddgT = -k * tmatrix<N, N, real>::Id();
} // end of @TangentOperator
