@Author Helfer Thomas;
@Date  09 avril 2013;
@Description{
  "This test checks that thermal expansion is correctly taken into "
  "account for an orthotropic material."
};

@ModellingHypothesis 'AxisymmetricalGeneralisedPlaneStress';
@XMLOutputFile @xml_output@;
@Behaviour<cyrano> @library@ @behaviour@;

@ExternalStateVariable 'Temperature' 293.15;
@ExternalStateVariable 'AxialStress' 0;

@ImposedStress 'SRR' {0.:0.,1:50.e6};

@Times {0.,1.};

@Real 'YoungModulus1'  '7.8e+10';
@Test<function> {'ERR':'SRR/YoungModulus1'} 1.e-12;
