@DSL Implicit;
@Behaviour StandardElastoViscoPlasticityHyperbolicSineTest2;
@Author Thomas Helfer;
@Date 31/03/2018;

@ModellingHypotheses {".+"};

@Epsilon 1.e-14;
@Theta 1;

@Brick "StandardElastoViscoPlasticity" {
  stress_potential : "Hooke" {young_modulus : 150e9, poisson_ratio : 0.3},
  inelastic_flow : "HyperbolicSine" {
    //
    criterion : "Mises",
    K : 100e6,
    n : 3.2
  }
};
