@DSL Implicit;
@Behaviour StandardElastoViscoPlasticityIsotropicDamageHookeLaw2;
@Author Thomas Helfer;
@Date 2/05/2018;

@Epsilon 1.e-16;
@Theta 1;

@Brick StandardElastoViscoPlasticity{
  stress_potential : IsotropicDamage{young_modulus : 150e9, poisson_ratio : 0.3},
  inelastic_flow : "Norton" {criterion : "Mises", K : 100e6, n : 3.2}
};

@Parameter p0 = 1.;

@Integrator{
  const real ep = exp(-(p + dp) / p0);
  fd = d+dd -1+ep;
  dfd_ddp -= ep/p0;
}
