@DSL Implicit;
@Behaviour StandardElastoViscoPlasticityNortonTest4_nj;
@Author Thomas Helfer;
@Date 31/03/2018;

@ModellingHypotheses {".+"};

@Algorithm NewtonRaphson_NumericalJacobian;
@Epsilon 1.e-16;
@PerturbationValueForNumericalJacobianComputation 1.e-8;
@Theta 1;

@Brick "StandardElastoViscoPlasticity" {
  stress_potential : "Hooke" {young_modulus : 150e9, poisson_ratio : 0.3},
  inelastic_flow : "Norton" {
    criterion : "Mises",
    isotropic_hardening : "Linear" {R0 : 33e6, H : 12e6},
    K : 100e6,
    n : 3.2
  }
};
