@DSL Implicit;
@Behaviour StandardElastoViscoPlasticityNortonTest9_nj;
@Author Thomas Helfer;
@Date 23/04/2018;

@ModellingHypotheses {".+"};

@Algorithm NewtonRaphson_NumericalJacobian;
@Epsilon 1.e-16;
@PerturbationValueForNumericalJacobianComputation 1.e-8;
@IterMax 100;
@Theta 1;

@Brick "StandardElastoViscoPlasticity" {
  stress_potential : "Hooke" {young_modulus : 160e9, poisson_ratio : 0.3},
  inelastic_flow : "Norton Hoff" {
    criterion : "Mises",  //
    isotropic_hardening : "Linear" {R0 : 120e6},
    kinematic_hardening : "Chaboche 2012" {
      //
      C : 250e7,
      D : 100,
      m : 2,
      w : 0.6
    },
    K : 10e6,
    n : 2.9
  }
};
