@DSL Implicit;
@Behaviour StandardElastoViscoPlasticityPlasticityTest9_nanj;
@Author Thomas Helfer;
@Date 23/04/2018;

@ModellingHypotheses {".+"};

@Algorithm NewtonRaphson_NumericalJacobian;
@Epsilon 1.e-16;
@PerturbationValueForNumericalJacobianComputation 1.e-8;
@IterMax 100;
@Theta 1;

@Brick "StandardElastoViscoPlasticity" {
  stress_potential : "Hooke" {young_modulus : 160e9, poisson_ratio : 0.3},
  inelastic_flow : "Plastic" {
    criterion : "Hosford" {a : 6},  //
    flow_criterion : "Hosford" {a : 6},  //
    isotropic_hardening : "Linear" {R0 : 120e6}
  }
};
