@Author Thmmas Helfer;
@Date   31/03/2018;
@Description{

};

@XMLOutputFile @xml_output@;
@MaximumNumberOfSubSteps 1;
@Behaviour<castem> @library@ @behaviour@;

@MaterialProperty<constant> 'YoungModulus' 150e9;
@MaterialProperty<constant> 'PoissonRatio' 0.3;

@ExternalStateVariable 'Temperature' 293.15 ;

@Real 's' 8e6;
@Real 'e0' 's/YoungModulus';
@Strain{'e0', '-e0*PoissonRatio', '-e0*PoissonRatio', 0, 0, 0};
@Stress{'s', 0, 0, 0, 0, 0};
@InternalStateVariable 'ElasticStrain' {
  'e0', '-e0*PoissonRatio', '-e0*PoissonRatio', 0, 0, 0
};

@ImposedStress 'SXX' 's';
@Times {0,3600 in 10};

@Real 'K1' 89e6;
@Real 'K2' 123e6;
@Real 'n' 3.2;
@Test<function> 'EXX' 'e0+((s/K1)**n+(s/K2)**n)*t' 1.e-9;
