@Author T. Helfer;
@Date 29/06/2017;
@Description{
  "Test a behaviour handling free expansion using "
  "the ComputeFreeStressExpansion keyword"
};

@XMLOutputFile @xml_output@;
@MaximumNumberOfSubSteps 1;
@Behaviour<generic> @library@ 'ComputeStressFreeExpansion';

@Real 'E'  150.e9;
@Real 'nu'   0.3333;
@MaterialProperty<constant> 'YoungModulus'     'E';
@MaterialProperty<constant> 'PoissonRatio'     'nu';

@ExternalStateVariable 'Temperature' 293.15;
@ExternalStateVariable 'BurnUp_AtPercent' {0:0,228960000:10};

@ImposedStrain 'EXX' 0.;
@ImposedStrain 'EYY' 0.;
@ImposedStrain 'EZZ' 0.;
@ImposedStrain 'EXY' 0.;
@ImposedStrain 'EXZ' 0.;
@ImposedStrain 'EYZ' 0.;

@Times {0.,228960000 in 20};

@Real 'C' 0.6e-2;
@Test<function> 'SXX' '-E/(1-2*nu)*C*BurnUp_AtPercent'  1.e-3;
@Test<function> 'SYY' '-E/(1-2*nu)*C*BurnUp_AtPercent'  1.e-3;
@Test<function> 'SZZ' '-E/(1-2*nu)*C*BurnUp_AtPercent'  1.e-3;
@Test<function> 'SXY' '0.'                1.e-3;
@Test<function> 'SXZ' '0.'                1.e-3;
@Test<function> 'SYZ' '0.'                1.e-3;
