@Author Thomas Helfer;
@Date   20/03/2019;

@Description{
  "Test of the Elasticity behaviour in plane stress "
  "which describes a simple isotropic elastic behaviour."
};

@XMLOutputFile @xml_output@;
@MaximumNumberOfSubSteps 1;
@Behaviour<generic> @library@ 'Elasticity';

@Real 'E'  7.8e+10;
@Real 'nu' 0.39991;

@MaterialProperty<constant> 'YoungModulus' 'E';
@MaterialProperty<constant> 'PoissonRatio' 'nu';

@ExternalStateVariable 'Temperature' 293.15;
@ImposedStrain<function> 'EXX' '1.e-3*sin(t/900.)';

@Times {0.,3600 in 20};

// stresses
@Test<function> 'SXX' 'E*EXX' 1.e-3;
@Test<function> 'SYY' '0.'    1.e-3;
@Test<function> 'SZZ' '0.'    1.e-3;
@Test<function> 'SXY' '0.'    1.e-3;
@Test<function> 'SXZ' '0.'    1.e-3;
@Test<function> 'SYZ' '0.'    1.e-3;
// strains
@Test<function> 'EYY' '-nu*EXX' 1.e-8;
@Test<function> 'EZZ' '-nu*EXX' 1.e-8;
@Test<function> 'EXY' '0.' 1.e-8;
@Test<function> 'EXZ' '0.' 1.e-8;
@Test<function> 'EYZ' '0.' 1.e-8;
