@Author Helfer Thomas;
@Date   2/09/2015;
@Description{
  This test checks that an exception is throw
  when an external state variable is out its physical
  bounds.
};

@MaximumNumberOfSubSteps 1;
@Behaviour<generic> @library@ 'ExternalStateVariablesBoundsCheck';
@OutOfBoundsPolicy 'None';

@ExternalStateVariable 'Temperature' 293.15;
@ExternalStateVariable 'ExternalStateVariable' -100;

@Times {0.,1};
