/*!
 * \file    finiterotationsmallstrainelasticity2-uniaxialloading-2-3D.mtest
 * \brief
 * \author Helfer Thomas
 * \brief  26 nov. 2013
 */

@MaximumNumberOfSubSteps 1;
@Behaviour<generic> @library@ 'FiniteRotationSmallStrainElasticity2' {
  stress_measure : @stress_measure@, tangent_operator : @tangent_operator@
};
@MaterialProperty<constant> 'YoungModulus'     215.e9;
@MaterialProperty<constant> 'PoissonRatio'       0.3;

@ImposedDrivingVariable 'FXX' {0:1.,1.:1.2};
@ImposedDrivingVariable 'FYY' 1.;
@ImposedDrivingVariable 'FZZ' 1.;
@ImposedDrivingVariable 'FXY' 0.;
@ImposedDrivingVariable 'FYX' 0.;
@ImposedDrivingVariable 'FXZ' 0.;
@ImposedDrivingVariable 'FZX' 0.;
@ImposedDrivingVariable 'FYZ' 0.;
@ImposedDrivingVariable 'FZY' 0.;

@ExternalStateVariable 'Temperature' 293.15;

@Times {0.,1 in 10};

@Real 'lambda' 'PoissonRatio*YoungModulus/((1+PoissonRatio)*(1-2*PoissonRatio))';
@Real 'mu'     'YoungModulus/(2*(1+PoissonRatio))';
@Test<function> {'SXX':'FXX*(lambda+2*mu)*(FXX**2-1)/2'} 1.e-2;
@Test<function> {'SYY':'lambda*(FXX**2-1)/(2*FXX)'}      1.e-2;
@Test<function> {'SZZ':'lambda*(FXX**2-1)/(2*FXX)'}      1.e-2;
@Test<function> {'SXY':'0','SXZ':'0','SYZ':'0'}          1.e-2;
