/*!
 * \file    finiterotationsmallstrainelasticity2-uniaxialloading-3-2D.mtest
 * \brief
 * \author Helfer Thomas
 * \brief  26 nov. 2013
 */

@MaximumNumberOfSubSteps 1;
@ModellingHypothesis 'GeneralisedPlaneStrain';
@Behaviour<generic> @library@ 'FiniteRotationSmallStrainElasticity2' {
  stress_measure : @stress_measure@, tangent_operator : @tangent_operator@
};
@MaterialProperty<constant> 'YoungModulus'     215.e9;
@MaterialProperty<constant> 'PoissonRatio'       0.3;

@ImposedDrivingVariable 'FXX' 1.;
@ImposedDrivingVariable 'FYY' 1.;
@ImposedDrivingVariable 'FZZ' {0:1.,1.:1.2};
@ImposedDrivingVariable 'FXY' 0.;
@ImposedDrivingVariable 'FYX' 0.;

@ExternalStateVariable 'Temperature' 293.15;

@Times {0.,1 in 10};

@Real 'lambda' 'PoissonRatio*YoungModulus/((1+PoissonRatio)*(1-2*PoissonRatio))';
@Real 'mu'     'YoungModulus/(2*(1+PoissonRatio))';
@Test<function> {'SXX':'lambda*(FZZ**2-1)/(2*FZZ)'}      1.e-2;
@Test<function> {'SYY':'lambda*(FZZ**2-1)/(2*FZZ)'}      1.e-2;
@Test<function> {'SZZ':'FZZ*(lambda+2*mu)*(FZZ**2-1)/2'} 1.e-2;
@Test<function> {'SXY':'0'}          1.e-2;
