/*!
 * \file   castemmieheapellambrechtlogarithmicstrain-uniaxialloading-1-1D.mtest
 * \brief
 * \author Helfer Thomas
 * \brief  4 dec. 2013
 */

@XMLOutputFile @xml_output@;
@ModellingHypothesis 'AxisymmetricalGeneralisedPlaneStrain';
@Behaviour<generic> @library@ 'LogarithmicStrainElasticity2' {
 stress_measure : @stress_measure@, tangent_operator : @tangent_operator@
};
@MaterialProperty<constant> 'YoungModulus'     215.e9;
@MaterialProperty<constant> 'PoissonRatio'       0.3;

@ImposedDrivingVariable 'FRR' {0:1.,1.:1.8};

@ExternalStateVariable 'Temperature' 293.15;

@Times {0.,1 in 10};

@Evolution<function> 'err' 'log(FRR**2)/2';
@Evolution<function> 'ezz' '-PoissonRatio*err';
@Evolution<function> 'ett' '-PoissonRatio*err';
@Evolution<function> 'J'   'sqrt(exp(2*ett)*exp(2*ezz))*FRR';
@Evolution<function> 'Trr' 'YoungModulus*err';

@Test<function> {'SZZ':'0','STT':'0'} 1.e-3;
@Test<function> {'SRR':'Trr/J'}       5.e-4;
@Test<function> {'FTT': 'sqrt(exp(2*ett))','FZZ': 'sqrt(exp(2*ezz))'} 1.e-10;
