/*!
 * \file   castemmieheapellambrechtlogarithmicstrain-uniaxialloading-1-3D.mtest
 * \brief
 * \author Helfer Thomas
 * \brief  4 dec. 2013
 */

@XMLOutputFile @xml_output@;
@MaximumNumberOfSubSteps 1;
@Behaviour<generic> @library@ 'LogarithmicStrainElasticity2' {
 stress_measure : @stress_measure@, tangent_operator : @tangent_operator@
};
@MaterialProperty<constant> 'YoungModulus'     215.e9;
@MaterialProperty<constant> 'PoissonRatio'       0.3;

@ImposedDrivingVariable 'FXX' {0:1.,1.:1.8};
@ImposedDrivingVariable 'FXY' 0.;
@ImposedDrivingVariable 'FYX' 0.;
@ImposedDrivingVariable 'FXZ' 0.;
@ImposedDrivingVariable 'FZX' 0.;
@ImposedDrivingVariable 'FYZ' 0.;
@ImposedDrivingVariable 'FZY' 0.;

@ExternalStateVariable 'Temperature' 293.15;

@Times {0.,1 in 10};

@Evolution<function> 'exx' 'log(FXX**2)/2';
@Evolution<function> 'ezz' '-PoissonRatio*exx';
@Evolution<function> 'eyy' '-PoissonRatio*exx';
@Evolution<function> 'J'   'sqrt(exp(2*eyy)*exp(2*ezz))*FXX';
@Evolution<function> 'Txx' 'YoungModulus*exx';

@Test<function> {'SZZ':'0','SYY':'0'}           1.e-2;
@Test<function> {'SXX':'Txx/J'}                 1.e-2;
@Test<function> {'SXY':'0','SXZ':'0','SYZ':'0'} 1.e-2;
@Test<function> {'FYY': 'sqrt(exp(2*eyy))','FZZ': 'sqrt(exp(2*ezz))'} 1.e-7;
@Test<function> {'FXY': '0', 'FZY':'0'} 1.e-10;
@Test<function> {'FXZ': '0', 'FZX':'0'} 1.e-10;
@Test<function> {'FYZ': '0', 'FZY':'0'} 1.e-10;
