@Parser   MaterialLaw ;
@Material T91AusteniticSteel ;
@Law      ThermalExpansion_ROUX2007 ;
@Author   F. Milliard ;
@Date     11/12/2013 ;
@Description{
  // Coefficient de dilatation thermique austenite T91
  // [Roux 07]
}

// Input of law
@Input T ;
T.setGlossaryName("Temperature") ;

// Output of law
@Output alpha ;
alpha.setGlossaryName("ThermalExpansion");

@PhysicalBounds T in [0.:*[;

// Function
@Function{
  const real TC = T-273.15;
  alpha = 2.02e-5 + 1.42e-9 * TC ;
} // end of Function
